# Natural gas, processed, at plant

Dataset: openLCA process, unit process
Category: 21: Mining, Quarrying, and Oil and Gas Extraction/2111: Oil and Gas Extraction
Geography: Northern America
Time period: 2002-12-31 to 2002-12-31
Allocation method: no allocation
Generated by: Franklin Associates
Published in: THE PLASTICS DIVISION OF THE AMERICAN C
restrictionsDescription: All information can be accessed by everybody.
copyright: false

## General comment
Sulfur was given no coproduct allocation in this process. The amount of H2S in the sour natural gas varies widely depending on where it is extracted. Complete inventory data and metadata are available in full in the final report and appendices, Cradle-to-Gate Life Cycle Inventory of Nine Plastic Resins and Four Polyurethane Precursors. This report has been extensively reviewed within Franklin Associates and has undergone partial critical review by ACC Plastics Division members and is available at: www.americanchemistry.com. Quantities may vary slightly between the reference to main source and and this module due to rounding. Important note: although most of the data in the US LCI database has undergone some sort of review, the database as a whole has not yet undergone a formal validation process. Please email comments to lci@nrel.gov.

## Technology
Removal of heavier hydrocarbons followed by hydrogen sulfide removal with amine solution

## Geography
North America (US and Canada)

## Reference product
- Natural gas, processed, at plant, 1.357 m3/kg [RNA]: 1 m3

## Inputs from technosphere
- Diesel, combusted in industrial equipment [RNA]: 3.6995e-5 l
  Includes diesel fuel and distillate oil amounts.
- Electricity, at grid [RNA]: 0.015715 kWh; provider Electricity, at Grid, US, 2010
- Residual fuel oil, combusted in industrial boiler [RNA]: 3.653e-5 l
- Natural gas, extracted, 0.7369 kg/m3 [RNA]: 0.74091 kg; provider Natural gas, extracted
  This weight reflects material loss at processing. MATERIAL USE.
- Gasoline, combusted in equipment [RNA]: 3.5086e-5 l
- Natural gas, combusted in industrial boiler [RNA]: 0.025476 m3

## Emissions to nature
- Ethylbenzene [emission, air]: 8.844e-6 kg
- Xylene [emission, air]: 6.4119e-5 kg
- Toluene [emission, air]: 0.00011055 kg
- Methane [emission, air]: 0.0014003 kg
- Carbon dioxide [emission, air]: 0.039061 kg
  Updated to reflect the amount of carbon dioxide in extracted natural gas that is removed and vented during acid gas removal; Value calculated from the US GHG Inventory and EIA processed natural gas (2007).
- Benzene [emission, air]: 7.0752e-5 kg
- Sulfur dioxide [emission, air]: 0.0014003 kg
  Updated to adjust for the percentages of natural gas sweetened with and without sulfur recovery and for the hydrogen sulfide concentration in each fraction (previous value assumed all sour gas hydrogen sulfide content and that all hydrogen sulfide was converted to sulfur dioxide).
- Volatile organic compounds [emission, air]: 0.00056749 kg

## Sampling procedure
Data collected from secondary sources.

## Sources
- THE PLASTICS DIVISION OF THE AMERICAN C
