# Electricity, anthracite coal, at power plant

Dataset: openLCA process, unit process
Category: 22: Utilities/2211: Electric Power Generation, Transmission and Distribution
Geography: Northern America
Allocation method: no allocation
Generated by: Jeff Hernbloom
Published in: Franklin Associates
restrictionsDescription: All information can be accessed by everybody.
copyright: false

## General comment
Important note: although most of the data in the US LCI database has
undergone some sort of review, the database as a whole has not yet
undergone a formal validation process.
Please email comments to lci@nrel.gov.

## Geography
North America

## Reference product
- Electricity, anthracite coal, at power plant [RNA]: 1 kWh

## Inputs from technosphere
- Anthracite coal, at mine [RNA]: 0.35609 kg
  Fuel consumption: 0.356 kg/kWh (0.785lbs/KWh)
- Disposal, anthracite coal combustion byproducts, to unspecified reuse: 0.0041479 kg
- Disposal, solid waste, unspecified, to unspecified treatment: 0.013446 kg
- Transport, combination truck, average fuel mix [RNA]: 0.091692 t*km
  Represents transportation from anthracite production/processing to utility boilers.

## Emissions to nature
- Chromium [emission, air]: 4.9853e-6 kg
- Biphenyl [emission, air]: 4.4512e-6 kg
  Sources for PAH data are old or unverifiable. Use this PAH data with caution.
- Naphthalene [emission, air]: 2.3146e-5 kg
  Sources for PAH data are old or unverifiable. Use this PAH data with caution.
- Mercury [emission, air]: 2.3146e-8 kg
- Arsenic [emission, air]: 3.3829e-8 kg
- Sulfur oxides [emission, air]: 0.020888 kg
- Methane [emission, air]: 7.1219e-6 kg
- Cadmium [emission, air]: 1.2641e-8 kg
- Phenanthrene [emission, air]: 1.2107e-6 kg
  Sources for PAH data are old or unverifiable. Use this PAH data with caution.
- Nitrous oxide [emission, air]: 6.3436e-6 kg
- Radionuclides [emission, air]: 10.07 kBq
- Oils, unspecified [emission, water]: 8.5369e-7 kg
- Sulfur dioxide [emission, air]: 0.012222 kg
- Manganese [emission, air]: 6.4097e-7 kg
- Carbon dioxide [emission, air]: 1.011 kg
- Particulate matter [emission, air]: 9.2584e-6 kg
- Nitrogen oxides [emission, air]: 0.0016016 kg
- Suspended solids, inorganic [emission, water]: 1.7074e-6 kg
- Lead [emission, air]: 1.5846e-6 kg
- Carbon monoxide [emission, air]: 0.00010683 kg
- Volatile organic compounds [emission, air]: 5.3414e-5 kg
- Beryllium [emission, air]: 5.5194e-8 kg
- Nickel [emission, air]: 4.6292e-6 kg
- Selenium [emission, air]: 2.3146e-7 kg

## Sources
- Energy Information Administration
- U.S. EPA
- Energy Information Administration
- U.S. EPA
- U.S. Energy Information Administration
- Franklin Associates
- unspecified
- U.S. EPA
- Energy Information Administration
