# Harvesting, fresh fruit bunch, at farm, 2003

Dataset: openLCA process, unit process
Category: 11: Agriculture, Forestry, Fishing and Hunting/1151: Support Activities for Crop Production
Geography: Northern America
Time period: 2002-12-31 to 2002-12-31
Allocation method: no allocation
Generated by: Franklin Associates
Published in: THE PLASTICS DIVISION OF THE AMERICAN CH
restrictionsDescription: All information can be accessed by everybody.
copyright: false

## General comment
Assumes amount harvested is directly input to palm kernel production with no losses due to land-applied or animal feed wastes. Complete inventory data and metadata are available in full in the final report and appendices, Cradle-to-Gate Life Cycle Inventory of Nine Plastic Resins and Four Polyurethane Precursors. This report has been extensively reviewed within Franklin Associates and has undergone partial critical review by ACC Plastics Division members and is available at: www.americanchemistry.com. Quantities may vary slightly between the reference to main source and and this module due to rounding. Important note: although most of the data in the US LCI database has undergone some sort of review, the database as a whole has not yet undergone a formal validation process. Please email comments to lci@nrel.gov.

## Technology
Harvesting of palm trees in Malaysia; Harvested by manually cutting from palm trees

## Geography
North America (US and Canada)

## Reference product
- Harvesting, fresh fruit bunch, at farm [RNA]: 1 kg

## Inputs from technosphere
- Diesel, combusted in industrial equipment [RNA]: 0.016357 l
- Fresh fruit bunches [MY]: 1 kg
- Disposal, solid waste, unspecified, to unspecified landfill: 1.2e-5 kg

## Emissions to nature
- Volatile organic compounds [emission, air]: 1e-6 kg
- Nitrogen oxides [emission, air]: 5.5e-6 kg
- Sulfur oxides [emission, air]: 2.3e-6 kg
- Particulate matter [emission, air]: 6.6e-5 kg
- Carbon monoxide [emission, air]: 2.3e-6 kg
- Carbon dioxide [emission, air]: 0.00856 kg

## Sampling procedure
Data are from secondary sources.

## Sources
- THE PLASTICS DIVISION OF THE AMERICAN CH
