# Electricity, at eGrid, SRMV, 2010

Dataset: openLCA process, unit process
Category: 22: Utilities/2211: Electric Power Generation, Transmission and Distribution
Geography: Northern America
Time period: 2009-12-31 to 2009-12-31
Allocation method: no allocation
Generated by: Samantha Wascavage
Published in: Chris Goemans, Athena Institute
restrictionsDescription: All information can be accessed by everybody.
copyright: false

## General comment
The methodology used to put together the grid information is outlined in reference 1.

## Technology
Typical

## Geography
SRMV Mississippi Valley electricity grid to include eastern Arkansas (less SPSO), western Mississippi (less SRTV and SRSO), most of Louisiana (less SPSO) and a small portion of Texas.

## Reference product
- Electricity, at grid [RNA]: 1 kWh

## Inputs from technosphere
- Electricity, bituminous coal, at power plant [RNA]: 0.211638 kWh
  Subbituminous Coal
- Electricity, hydropower, at power plant, unspecified: 0.027951 kWh
  Hydroelectric WAT – Water (Conventional, Pumped Storage)
- Electricity, biomass, gas, landfill, at power plant: 0.000302 kWh
  Gaseous Renewable Fuels (Biomass) LFG, OBG - landfill gas
- Electricity, bituminous coal, at power plant [RNA]: 0.000937 kWh
  Bituminous Coal BIT, SC, SGC, WC - Anthracite Coal, and Bituminous Coal.
- Electricity, nuclear, at power plant [RNA]: 0.20815 kWh
  Nuclear Fission NUC – Nuclear (Uranium, Plutonium, Thorium)
- Electricity, petroleum coke, at power plant: 0.009156 kWh
  Petroleum (Other Fossil) PC, SG, WO - petroleum coke
- Electricity, biomass, solid, agriculture by-products, at power plant: 0.007443 kWh
  Solid Renewable Fuels (Biomass) AB, MSB, MSW, OBS, TDF, WDS – Agriculture Crop By-products / Straw / Energy Crops
- Electricity, residual fuel oil, at power plant [RNA]: 0.000931 kWh
  Petroleum (RFO) – Residual Fuel Oil (includes No. 5 and No. 6 Fuel Oils and Bunker C Fuel Oil)
- Electricity, other fuels, unspecified, at power plant: 0.002984 kWh
  Other Fuels OTH, MSN, PUR, WH – Other (Batteries, Chemicals, Coke Breeze, Hydrogen, Pitch, Sulfur, Tar Coal, and miscellaneous technologies)
- Electricity, natural gas, at power plant [RNA]: 0.50131 kWh
  Natural Gas
- Electricity, biomass,liquid, unspecified, at power plant: 0.017134 kWh
  Liquid Renewable Fuels (Biomass) BLQ, OBL, SLW, WDL - black liquor
- Electricity, diesel, at power plant [RNA]: 0.000669 kWh
  Petroleum (DFO, JF, KER) – Distillate Fuel Oil (includes all Diesel and No. 1, No. 2, and No. 4 Fuel Oils)
- Electricity, other gases, unspecified, at power plant: 0.011395 kWh
  Other Gases OG, BFG, PG – Other Gas (Butane, Coal Processes, Coke-Oven, Refinery, and other processes)

## Sampling procedure
based on EIA electricity reports for all power plants in the US.

## Sources
- EIA
- EIA
- Statistics Canada
- Statistics Canada
- Chris Goemans, Athena Institute
- EIA
- USEPA
- EIA
- Statistics Canada
- EIA
- Statistics Canada
- EIA
- unspecified
- EIA
- USEPA
- EIA
- EIA
- Statistics Canada
- US DOE
- International Energy Agency
- EIA
