# Iron, sand casted

Dataset: openLCA process, unit process
Category: 31-33: Manufacturing/3315: Foundries
Geography: Northern America
Time period: 2003-12-31 to 2003-12-31
Allocation method: no allocation
Generated by: James Littlefield, Franklin Associates
Published in: Franklin Associates
restrictionsDescription: All information can be accessed by everybody.
copyright: false

## General comment
No co-product allocation for scrap materials that are recycled or reused; all environmental flows for scrap are included in the environmental flows for the product.
Important note: although most of the data in the US LCI database has
undergone some sort of review, the database as a whole has not yet
undergone a formal validation process.
Please email comments to lci@nrel.gov.

## Geography
USA

## Reference product
- Iron, sand casted: 1 kg
  Represents average of 2 plants

## Inputs from technosphere
- Alloying metals and additives, at plant: 0.0666 kg
  Represents average of 2 plants
- Disposal, lead containing waste, to sanitary landfill: 1e-5 kg
  Represents 1 plant
- TEA gas, at plant: 0.0025 kg
  Represents average of 2 plants
- Gasoline, combusted in equipment [RNA]: 0.000297 l
  Represents average of 2 plants
- Electricity, at grid [RNA]: 1.2 kWh; provider Electricity, at Grid, US, 2010
  Represents average of 2 plants
- Shot blast, unspecified: 0.0109 kg
  Represents average of 2 plants
- Disposal, petroleum based wastes, unspecified, to sanitary landfill: 0.00207 kg
  Represents average of 2 plants
- Recycling, municipal solid wastes, unspecified: 0.00443 kg
  Represents average of 2 plants
- Oxygen, liquid, at plant [RNA]: 0.164 kg
  Represents average of 2 plants
- Recycling, baghouse dust, unspecified: 0.03 kg
  Represents average of 2 plants
- Disposal, sand, to sanitary landfill: 1.28 kg
  Represents 1 plant
- Core additives and catalyst for iron casting: 0.00141 kg
  Represents average of 2 plants
- Disposal, corrosive and toxic liquids, unspecified, to sanitary landfill: 5.3e-5 kg
  Represents average of 2 plants
- Disposal, resins, unspecified, to sanitary landfill: 0.00016 kg
  Represents 1 plant
- Nitrogen, at plant: 0.0156 kg
  Represents average of 2 plants
- Bituminous coal, combusted in industrial boiler [RNA]: 0.0796 kg
  Represents 1 plant
- Adhesives and binders, at plant: 0.00105 kg
  Represents average of 2 plants
- Recycling, cardboard: 0.00014 kg
  Represents average of 2 plants
- Recycling, biohazard waste, unspecified: 2.4e-6 kg
  Represents 1 plant
- Sodium hydroxide, production mix, at plant [US]: 0.00297 kg; provider Chlorine, production mix, at plant
  Represents average of 2 plants
- Release agent, unspecified, at plant: 0.00052 kg
  Represents average of 2 plants
- Core wash and paste for aluminum casting: 0.00988 kg
  Represents average of 2 plants
- Disposal, contaminated carbon, to sanitary landfill: 8.5e-5 kg
  Represents 1 plant. Represents packaging wastes.
- Diesel, combusted in industrial boiler [RNA]: 0.000968 l
  Represents average of 2 plants. Initially expressed as kg. Converted to L using the following conversion factor: 0.8675kg/L
- Disposal, grinding residue, to sanitary landfill: 0.0557 kg
  Represents 1 plant
- Recycling, fluorescent tubes and other mercury-containing wastes: 1.9e-5 kg
  Represents average of 2 plants
- Disposal, rubber, to sanitary landfill: 7.6e-5 kg
  Represents 1 plant
- Disposal, baghouse dust, to sanitary landfill: 1.4e-5 kg
  Represents 1 plant
- Chemicals, unspecified, used for wastewater treatment: 0.0011 kg
  Represents average of 2 plants
- Metallurgical coke, combusted in industrial boiler: 0.00022 kg
  Represents average of 2 plants
- Natural gas, combusted in industrial boiler [RNA]: 0.000199 m3
  Represents average of 2 plants
- Recycling, batteries: 0.00023 kg
  Represents average of 2 plants
- Recycling, rubber: 0.0368 kg
  Represents average of 2 plants
- Iron and steel, production mix [RNA]: 1.04 kg
  Represents average of 2 plants
- Disposal, municipal solid wastes, to sanitary landfill: 0.00437 kg
  Represents average of 2 plants
- Refractory material, unspecified, at plant: 0.0252 kg
  Represents average of 2 plants
- Disposal, refractory material, to sanitary landfill: 0.00015 kg
  Represents 1 plant
- TEA gas scrubber, at plant: 0.00085 kg
  Represents average of 2 plants
- Recycling, refractory material: 0.00298 kg
  Represents 1 plant
- Disposal, acid pickling waste, to sanitary landfill: 0.00088 kg
  Represents 1 plant
- Ceramic filters, at plant: 0.0003 kg
  Represents average of 2 plants
- Clay, at mine: 0.0204 kg
  Represents average of 2 plants
- Carbon dioxide, liquid, at plant: 0.00082 kg
  Represents average of 2 plants
- Curing agent, at plant: 0.0183 kg
  Represents average of 2 plants
- Recycling, construction debris, unspecified: 2e-5 kg
  Represents 1 plant
- Disposal, sludge, to sanitary landfill: 0.197 kg
  Represents average of 2 plants
- Disposal, biohazard waste, to sanitary landfill: 7.2e-7 kg
  Represents 1 plant
- Disposal, empty pails and drums, to sanitary landfill: 1.2e-5 kg
  Represents average of 2 plants
- Oil and grease, at plant: 0.00201 kg
  Represents average of 2 plants
- Recycling, petroleum based wastes, unspecified: 0.00045 kg
  Represents average of 2 plants
- Recycling, wood waste, unspecified: 0.0006 kg
  Represents average of 2 plants

## Inputs from nature
- Sand [resource, ground]: 1.13 kg
  Represents average of 2 plants
- Coal, bituminous [resource, ground]: 0.36208 MJ
  Represents average of 2 plants
- Limestone [resource, ground]: 0.0767 kg
  Represents average of 2 plants

## Emissions to nature
- Naphthalene [emission, air]: 0.00013 kg
  Represents 1 plant
- Copper compounds [emission, air]: 0.00057 kg
  Represents average of 2 plants
- Phenol [emission, water]: 5.6e-7 kg
  Represents 1 plant
- Methanol [emission, air]: 0.00035 kg
  Represents 1 plant
- Isobutanol [emission, water]: 0.00013 kg
  Represents 1 plant
- Xylene [emission, air]: 7.8e-5 kg
  Represents 1 plant
- Isopropanol [emission, air]: 0.00016 kg
  Represents 1 plant
- Nitrobenzene [emission, water]: 0.00013 kg
  Represents 1 plant
- Toluene [emission, water]: 0.00013 kg
  Represents 1 plant
- Di(2-ethylhexyl) adipate [emission, air]: 0.00022 kg
  Represents 1 plant
- Carbon disulfide [emission, water]: 0.00013 kg
  Represents 1 plant
- Sulfuric acid [emission, air]: 0.00042 kg
  Represents 1 plant
- Benzene [emission, air]: 0.00011 kg
  Represents 1 plant
- Lead [emission, water]: 5.6e-9 kg
  Represents 1 plant
- Triethylamine [emission, air]: 0.00029 kg
  Represents average of 2 plants
- Phosphoric acid [emission, air]: 2e-5 kg
  Represents average of 2 plants
- Toluene [emission, air]: 0.0001 kg
  Represents 1 plant
- Phenol [emission, air]: 0.00024 kg
  Represents average of 2 plants
- N-Methyl-2-pyrrolidone [emission, air]: 0.00011 kg
  Represents 1 plant
- Chromium(III) [emission, water]: 0.00013 kg
  Represents 1 plant
- Isocyanic acid [emission, air]: 0.0004 kg
  Represents 1 plant
- Spent chlorofluorocarbon solvents, unspecified [emission, water]: 0.00013 kg
  Represents 1 plant
- Cyanide [emission, water]: 5e-5 kg
  Represents 1 plant
- Chlorobenzene [emission, water]: 0.00013 kg
  Represents 1 plant
- Nickel compounds [emission, air]: 2.2e-5 kg
  Represents 1 plant
- Lead compounds [emission, air]: 0.00022 kg
  Represents average of 2 plants
- Zinc compounds [emission, air]: 0.00099 kg
  Represents average of 2 plants
- Manganese compounds [emission, air]: 0.0065 kg
  Represents average of 2 plants
- Diisocyanates [emission, air]: 8.6e-5 kg
  Represents 1 plant
- Methylene chloride [emission, water]: 0.00013 kg
  Represents 1 plant
- Nickel [emission, water]: 5e-5 kg
  Represents 1 plant
- Cresol [emission, water]: 0.00013 kg
  Represents 1 plant
- Iron [emission, water]: 0.00025 kg
  Represents 1 plant
- Carbon tetrachloride [emission, water]: 5e-6 kg
  Represents 1 plant
- 1,2,4-Trimethylbenzene [emission, air]: 0.00013 kg
  Represents 1 plant
- Chromium(VI) [emission, water]: 5e-5 kg
  Represents 1 plant
- Zinc [emission, water]: 2.3e-7 kg
  Represents 1 plant
- Phenol, 2-methoxy-4-methyl- [emission, water]: 0.00013 kg
  Represents 1 plant
- 1,1,1-Trichloroethane [emission, water]: 0.00013 kg
  Represents 1 plant
- Mercury compounds [emission, air]: 6.3e-9 kg
  Represents 1 plant
- 2,3,7,8-Tetrachlorodibenzo-p-dioxin [emission, air]: 1.4e-9 kg
  Represents 1 plant
- Aluminum [emission, water]: 5e-6 kg
  Represents 1 plant
- Ethylene glycol [emission, air]: 8.9e-5 kg
  Represents average of 2 plants
- Chromium compounds [emission, air]: 0.00112 kg
  Represents average of 2 plants
- Cadmium(II) [emission, water]: 1e-5 kg
  Represents 1 plant. Represents a permitted effluent limit, not a measurement.
- Phenyl isocyanate [emission, air]: 0.00046 kg
  Represents 1 plant
- Methyl ethyl ketone [emission, water]: 0.00126 kg
  Represents 1 plant
- Hydrogen cyanide [emission, water]: 1e-5 kg
  Represents 1 plant
- Formaldehyde [emission, air]: 0.00013 kg
  Represents average of 2 plants
- Copper(I) [emission, water]: 9e-9 kg
  Represents 1 plant
- Oils, unspecified [emission, water]: 1.2e-5 kg
  Represents 1 plant

## Sources
- Vehicle Recycling Partnership (VRP)
- Franklin Associates
