# Transport, refuse truck, diesel powered, West North Central

Dataset: openLCA process, unit process
Category: 56: Administrative and Support and Waste Management and Remediation Services/5621: Waste Collection
Geography: Northern America
Time period: 2009-12-31 to 2009-12-31
Allocation method: no allocation
Generated by: Nathan Hardesty
Published in: U.S. Environmental Protection Agency (EP
restrictionsDescription: All information can be accessed by everybody.
copyright: false

## General comment
This dataset represents the West North Central U.S. (MT, NE, ND, SD, WY (Reference 10)) average airborne emissions for operating a diesel powered refuse truck. The inventory includes all vehicle operation processes, including off-network and refueling activities.
The refinery-to-pump transportation and distribution data are calculated from Argonne National Laboratory's GREET 1.8d.1 model.
The vehicle operation data are calculated from EPA's MOVES2010a model, using the assumptions described in the corresponding detailed spreadsheet. Emissions factors in MOVES2010a are largely based on EPA's Mobile Source Observation Database, which in turn includes data from a variety of vehicle studies (References 6-8).
MOVES2010a acknowledges sources of uncertainty in the model structure, the population and acitivty data, and other model parameters. As of July 2011, the uncertainty calculation function of the model has not been activated.

## Technology
Combustion of diesel in a refuse truck.

## Geography
US

## Reference product
- Transport, refuse truck, diesel powered [RNA]: 1 t*km

## Inputs from technosphere
- Transport, train, diesel powered [RNA]: 0.0219484 t*km
- Transport, barge, average fuel mix [RNA]: 0.0113761 t*km
- Transport, combination truck, average fuel mix [RNA]: 0.0117615 t*km
- Transport, ocean freighter, average fuel mix [RNA]: 0.0804064 t*km
- Diesel, at refinery: 0.0364859 l; provider Petroleum refining, at refinery
- Transport, pipeline, unspecified petroleum products [RNA]: 0.118552 t*km

## Emissions to nature
- Sulfur dioxide [emission, air]: 1.60261e-6 kg
- Ammonia [emission, air]: 1.40301e-6 kg
- Nitrogen dioxide [emission, air]: 6.05848e-5 kg
- Particulate matter, ≤ 2.5μm [emission, air]: 2.60062e-7 kg
  PM2.5 from tirewear.
- Particulate matter, ≤ 2.5μm [emission, air]: 3.57777e-5 kg
  PM2.5 from organic carbon, elemental carbon, and sulfate particulates.
- Carbon dioxide [emission, air]: 0.0957781 kg
- Nitrogen oxides [emission, air]: 0.00068865, 0.000749235 kg (2 entries)
- Particulate matter, ≤ 10μm [emission, air]: 3.68828e-5 kg
  PM10 from organic carbon, elemental carbon, and sulfate particulates.
- Carbon monoxide [emission, air]: 0.000201388 kg
- Hydrocarbons [emission, air]: 3.78319e-5 kg
- Particulate matter, ≤ 10μm [emission, air]: 3.39523e-6 kg
  PM10 from brakewear.
- Volatile organic compounds [emission, air]: 3.89897e-5 kg
- Particulate matter, ≤ 2.5μm [emission, air]: 8.88806e-7 kg
  PM2.5 from brakewear.
- Methane [emission, air]: 9.88352e-7 kg
- Particulate matter, ≤ 10μm [emission, air]: 1.08446e-6 kg
  PM10 from tirewear.
- Nitrous oxide [emission, air]: 1.32918e-7 kg

## Sources
- Assessment and Standards Division, Offic
- National Institute of Standards and Tech
- Wang, M.
- National Climatic Data Center, National
- U.S. Alternative Fuels and Advanced Vehi
- U.S. Environmental Protection Agency (EP
- Eastern Research Group
- Assessment and Standards Division, Offic
- Alam, M.
- EPA
