# Metal composite material (MCM) sheet, at plant

Dataset: openLCA process, unit process
Category: 31-33: Manufacturing/3323: Architectural and Structural Metals Manufacturing
Geography: Northern America
Time period: 2014-01-31 to 2015-02-27
Allocation method: no allocation
Generated by: PE INTERNATIONAL
Published in: PE INTERNATIONAL
restrictionsDescription: All information can be accessed by everybody.
copyright: false

## General comment
MCM sheets are formed by bonding two metal skins to a highly engineered plastic core placed between them. This occurs under very precise conditions of temperature, pressure and tension. The result is a strong composite sheet of metal and plastic. Properly designed and installed, these metal composite panels provide a very reliable building envelope that resists the elements and protects against air and water infiltration. Producing the panels requires a five-stage process. The metal coils are introduced from two pay-off reels (1). Next the laminating rollers bond the aluminum to the continuously extruded thermoplastic core (2). The laminated material then enters the cooling chamber and is constantly moved at a steady rate by the pulling rollers (3). A protective masking film is then applied to the MCM to protect the surface finish (4). Finally, the MCM is trimmed to the required width, sheared to the required length, and stacked for inspection and final packaging (5). The MCM sheet process includes all material and inbound transportation necessary for construction-ready products: coated aluminum coils, thermoplastic core, and packaging materials. Energy and utility inputs include electricity, natural gas, process water, and propane. All known solid waste, air, and water emissions are captured in the output.

## Technology
Composite building material of aluminum skin bonded to plastic core. Technology based on companies identified by Metal Construction Association to be representative of industry.

## Geography
North America

## Reference product
- Metal composite material (MCM) sheet, at plant [RNA]: 1 m2

## Inputs from technosphere
- Disposal, solid waste, unspecified, to inert material landfill: 0.0194322 kg
- Recycling, Aluminum scrap: 0.707902 kg
- Polyethylene, linear low density, LLDPE, resin, at plant [RNA]: 0.974871, 1.44504 kg (2 entries)
- Water, process: 0.128951 kg
- Polypropylene, PP, resin, at plant [RNA]: 0.000621236 kg
- Aluminum, sheet, coated, at plant [RNA]: 5.82563 kg
- Disposal, wood waste, to unspecified treatment: 0.236728 kg
- Medium density fiberboard (MDF), at MDF mill [RNA]: 1.96221e-5 m3; = 0.01454/741
  Each 1.0 m3 of mdf weighing 741 kg which includes wood, resin, wax, etc; ovendry weight; wt. average for 4 mills in US; original weight factor for this input is 0.01454 kg MDF; converted using this approximate density
- Transport, single unit truck, long-haul, diesel powered [RNA]: 1720.03 t*km; provider Transport, single unit truck, long-haul, diesel powered, Northwest
- Polymers, at plant: 0.892059 kg
- Hot rolled sheet, steel, at plant [RNA]: 0.000969901 kg
- Natural gas, combusted in industrial equipment, 1.357 m3/kg, 52.13 MJ/kg [RNA]: 0.0633308 m3; provider Natural gas, combusted in industrial equipment
- Thermal energy from propane (MJ): 0.373991 MJ
- Electricity, at grid [RNA]: 10.5353 kWh; provider Electricity, at Grid, US, 2010
- Polyethylene, high density, HDPE, resin, at plant [RNA]: 0.12948 kg
- Lubricants, unspecified, at plant: 0.000215447 kg
- Corrugated cardboard: 0.0246648 kg
- Recycling, Steel scrap: 0.000969901 kg
- Surfaced dried lumber; at planer mill [US]: 0.354695 kg
- Polyvinyl chloride, PVC, resin, at plant [RNA]: 0.0398592 kg

## Sources
- PE INTERNATIONAL
