# Methylene diphenyl diisocyanate, MDI, at plant, US PNW

Dataset: openLCA process, unit process
Category: 31-33: Manufacturing/3252: Resin, Synthetic Rubber, and Artificial and Synthetic Fibers and Filaments Manufacturing
Geography: Northern America
Time period: 1999-12-31 to 1999-12-31
Allocation method: no allocation
Generated by: Jamie Meil
Published in: Dr. Jim Wilson
restrictionsDescription: All information can be accessed by everybody.
copyright: true

## General comment
Base process data presented with allocations to within process co-products noted. Refer to allocation worksheet for specifics. All allocations performed using mass or volume. To take profile back to cradle the user must add US LCI profile information for PNW LVL and SE OSB modules. Resin adhesive cradle-to-gate LCI is provided for easy reference., Data reproduced here from US SE OSB module
Important note: although most of the data in the US LCI database has
undergone some sort of review, the database as a whole has not yet
undergone a formal validation process.
Please email comments to lci@nrel.gov.

## Technology
typical

## Geography
US Pacific North West

## Reference product
- Methylene diphenyl diisocyanate, MDI, resin, at plant [RNA]: 1 kg

## Inputs from technosphere
- Diesel, at refinery: 5.01 l; provider Petroleum refining, at refinery
  Used as feedstock
- Disposal, inert solid waste, to unspecified treatment: 0.027 kg
- Transport, combination truck, average fuel mix [RNA]: 2.65 t*km
- Electricity, at grid [RNA]: 1.23 kWh; provider Electricity, Western US, 2014
- Natural gas, processed, at plant, 1.357 m3/kg [RNA]: 0.51 m3; provider Natural gas, processed, at plant
  Used as feedstock
- Natural gas, combusted in industrial boiler [RNA]: 0.91 m3

## Inputs from nature
- Water [resource, water]: 362000 kg

## Emissions to nature
- Organic compounds [emission, water]: 0.00016 kg
- Carbon dioxide [emission, air]: 0.41 kg
- Ammonium [emission, water]: 0.0002 kg
- Hydrocarbons [emission, water]: 2.3e-5 kg
- Zinc [emission, water]: 5.1e-5 kg
- Potassium [emission, water]: 0.00037 kg
- Calcium(II) [emission, water]: 0.00011 kg
- Methane [emission, air]: 0.000889 kg
- Aluminum [emission, water]: 8e-6 kg
- Acid compounds [emission, water]: 3.4e-5 kg
- Suspended solids, inorganic [emission, water]: 0.0022 kg
- Particulate matter [emission, air]: 0.00018 kg
- Carbon monoxide [emission, air]: 0.000957 kg
- Sulfur oxides [emission, air]: 0.00035 kg
- Hydrochloric acid [emission, air]: 9.98e-6 kg
- Volatile organic compounds [emission, air]: 6.3e-5 kg
- Metals [emission, water]: 0.00023 kg
- Biological Oxygen Demand [emission, water]: 0.00081 kg
- Phenol [emission, water]: 9.99e-7 kg
- Chemical Oxygen Demand [emission, water]: 0.0053 kg
- Sulfate [emission, water]: 0.0061 kg
- Hydrogen [emission, air]: 0.257143 MJ
- Total dissolved solids [emission, water]: 0.0081 kg
- Dissolved Organic Matter [emission, water]: 0.00033 kg
- Magnesium [emission, water]: 0.0959 kg
- Nitrogen oxides [emission, air]: 0.0013 kg

## Sources
- Dr. Jim Wilson
