# Electricity, at eGrid, MROW, 2010

Dataset: openLCA process, unit process
Category: 22: Utilities/2211: Electric Power Generation, Transmission and Distribution
Geography: Northern America
Time period: 2009-12-31 to 2009-12-31
Allocation method: no allocation
Generated by: Samantha Wascavage
Published in: Chris Goemans, Athena Institute
restrictionsDescription: All information can be accessed by everybody.
copyright: false

## General comment
The methodology used to put together the grid information is outlined in reference 1.

## Technology
Typical

## Geography
Includes generation and transmission of electricity for the MRO West electricity grid to include Minnesota, Iowa, most of the Dakotas (less RMPA) and Nebraska (less RMPA) and parts of Montana (less NWPP) and Wisconsin (less MRO E)

## Reference product
- Electricity, at grid [RNA]: 1 kWh

## Inputs from technosphere
- Electricity, bituminous coal, at power plant [RNA]: 0.008987 kWh
  Bituminous Coal BIT, SC, SGC, WC - Anthracite Coal, and Bituminous Coal.
- Electricity, at wind power plant, unspecified: 0.069715 kWh
  Wind
- Electricity, residual fuel oil, at power plant [RNA]: 9e-6 kWh
  Petroleum (RFO) – Residual Fuel Oil (includes No. 5 and No. 6 Fuel Oils and Bunker C Fuel Oil)
- Electricity, biomass, solid, agriculture by-products, at power plant: 0.007163 kWh
  Solid Renewable Fuels (Biomass) AB, MSB, MSW, OB, TDF, WDS - Agriculture Crop By-products/Straw/Energy Crops
- Electricity, nuclear, at power plant [RNA]: 0.213923 kWh
  Nuclear Fission
- Electricity, natural gas, at power plant [RNA]: 0.029429 kWh
  Natural Gas
- Electricity, diesel, at power plant [RNA]: 0.000977 kWh
  Petroleum (DFO, JF, KER) – Distillate Fuel Oil (includes all Diesel and No. 1, No. 2, and No. 4 Fuel Oils)
- Electricity, bituminous coal, at power plant [RNA]: 0.430156 kWh
  Subbituminous Coal
- Electricity, hydropower, at power plant, unspecified: 0.101862 kWh
  Hydroelectric
- Electricity, lignite coal, at power plant [RNA]: 0.13026 kWh
  Lignite Coal
- Electricity, biomass, gas, landfill, at power plant: 0.001624 kWh
  Gaseous Renewable Fuels (Biomass) LFG, OBG - landfill gas
- Electricity, petroleum coke, at power plant: 0.001502 kWh
  Petroleum (Other Fossil) PC, SG, WO - petroleum coke
- Electricity, other gases, unspecified, at power plant: 0.000174 kWh
  Other Gases OG, PG, BFG - Other Gas (Butane, Coal Processes, Coke-Oven, Refinery, and other processes)
- Electricity, biomass,liquid, unspecified, at power plant: 0.002346 kWh
  Liquid Renewable Fuels (Biomass) BLQ, OBL, SLW, WDL - Black liquor
- Electricity, MSW, non-biogenic, at power plant: 0.001873 kWh
  Other Fuels MSN, OTH, PUR, WH - Municipal Solid Waste – Non-biogenic components

## Sampling procedure
based on EIA electricity reports for all power plants in the US.

## Sources
- EIA
- EIA
- Statistics Canada
- Statistics Canada
- Chris Goemans, Athena Institute
- EIA
- USEPA
- EIA
- Statistics Canada
- EIA
- Statistics Canada
- EIA
- unspecified
- EIA
- USEPA
- EIA
- EIA
- Statistics Canada
- US DOE
- International Energy Agency
- EIA
