# Fuels, burned at uncoated freesheet, average production, at mill

Dataset: openLCA process, unit process
Category: 31-33: Manufacturing/3221: Pulp, Paper, and Paperboard Mills
Geography: Northern America
Time period: 2005-12-31 to 2005-12-31
Allocation method: no allocation
Generated by: Caroline Gaudreault
Reviewer: Martha Stevenson
Published in: AF&PA
restrictionsDescription: All information can be accessed by everybody.
copyright: false

## General comment
Uncoated Freesheet, average North American production, at mill. All flows are production-weighted means. Data were developed for a full LCA that was critically reviewed. Reviewers were: • Martha Stevenson, Chairperson – Private Consultant to the public interest with ten years of experience in sustainability, environmental management, packaging and materials recovery; led the development of the Design Guidelines for Sustainable Packaging and the COMPASS software used to compare the environmental impacts of package designs; • Pascal Lesage – Life cycle assessment consultant, Researcher at École Polytechnique de Montréal [at the Inter-University Research Centre for the Life Cycle of Products, Processes and Services (CIRAIG) in Montreal]; and • Dale Phenicie, Environmental Affairs Consulting – Consultant with 35 years of experience in environmental protection and process consulting for the forest products industry. Has served on several U.S. EPA Task Forces dealing with water quality issues and authored several AF&PA Environmental, Health and Safety/Sustainability reports.

## Technology
current technology mix for uncoated freesheet

## Time period
Primary data collected from participating companies and associations for their operational activities are representative for 2006 and 2007.

## Reference product
- Fuels, burned at uncoated freesheet, average production, at mill [RNA]: 13563 MJ

## Inputs from technosphere
- TDF, combusted in industrial boiler, at pulp and paper mill (EXCL.) [RNA]: 5.7658 kg
  All combusted. Not present in any database.
- Gasoline, combusted in equipment, at pulp and paper mill (EXCL.) [RNA]: 0.046087 l
  Gasoline and kerosene, assumed to be gasoline.
- LPG, combusted in industrial boiler, at pulp and paper mill (EXCL.) [RNA]: 0.28401 l
- Diesel, combusted in industrial boiler, at pulp and paper mill (EXCL.) [RNA]: 1.776 l
  Proxy for light fuel oil.
- Bituminous coal, combusted in industrial boiler, at pulp and paper mill (EXCL.) [RNA]: 114.07 kg
- Diesel, combusted in industrial boiler, at pulp and paper mill (EXCL.) [RNA]: 2.5259 l
  Other fossil fuels assumed to be diesel.
- Hog fuel, pur., combusted in industrial boiler, at pulp and paper mill (EXCL.) [RNA]: 82.686 kg
  Purchased hogged fuel. Typically from wood products manufacturing.
- Natural gas, combusted in industrial boiler, at pulp and paper mill (EXCL.) [RNA]: 103.12 m3
- RFO, combusted in industrial boiler, at pulp and paper mill (EXCL.) [RNA]: 30.187 l
  All combusted on site. Actually received at supplier, not refinery.
- Hog fuel, self-gen., combusted in ind. boiler, at pulp and paper mill (EXCL.) [RNA]: 143.64 kg
  Combustion of self-generated hogged fuel from pulpwood. Wood inputs are accounted for in the process named Uncoated freesheet, average production, at mill

## Emissions to nature
- Naphthalene [emission, air]: 8.0344e-5 kg
  From black liquor recovery, non-recyclable paper combustion and wastewater residuals combustion
- Nitrogen dioxide [emission, air]: 2.4828 kg
  From all combustion processes at pulp and paper mill.
- Selenium [emission, air]: 0.00092977 kg
  (same comment as for Naphthalene)
- Manganese [emission, air]: 0.00011404 kg
  (same comment as for Naphthalene)
- Chloroform [emission, air]: 1.5289e-5 kg
  (same comment as for Naphthalene)
- Barium [emission, air]: 0.00022602 kg
  (same comment as for Naphthalene)
- Toluene [emission, air]: 0.00034524 kg
  (same comment as for Naphthalene)
- Benzo[ghi]perylene [emission, air]: 1.8308e-6 kg
  (same comment as for Naphthalene)
- Benzene [emission, air]: 0.00042375 kg
  (same comment as for Naphthalene)
- Aldehydes, C3 [emission, air]: 0.003063 kg
  (same comment as for Naphthalene)
- Methanol [emission, air]: 0.072335 kg
  (same comment as for Naphthalene)
- Zinc [emission, air]: 5.6137e-5 kg
  (same comment as for Naphthalene)
- Hydrogen sulfide [emission, air]: 0.091626 kg
  Total reduced sulfur assumed to be hydrogen sulfide. From all combustion processes at pulp and paper mill.
- Hydrofluoric acid [emission, air]: 0.00061044 kg
  (same comment as for Naphthalene)
- Cadmium [emission, air]: 4.3222e-5 kg
  (same comment as for Naphthalene)
- Carbon monoxide [emission, air]: 0.11567 kg
  (same comment as for Naphthalene)
- Acetaldehyde [emission, air]: 0.0079412 kg
  (same comment as for Naphthalene)
- Polycyclic organic matter [emission, air]: 0.00015142 kg
  (same comment as for Naphthalene)
- Carbon dioxide [emission, air]: 1157.6 kg
  (same comment as for Naphthalene)
- Mercury [emission, air]: 1.6176e-6 kg
  (same comment as for Naphthalene)
- 1,1,2-Trichloroethane [emission, air]: 1.6393e-5 kg
  (same comment as for Naphthalene)
- Chromium [emission, air]: 1.807e-5 kg
  (same comment as for Naphthalene)
- Hexane [emission, air]: 0.00025474 kg
  (same comment as for Naphthalene)
- 1,2,4-Trichlorobenzene [emission, air]: 7.5366e-5 kg
  (same comment as for Naphthalene)
- Antimony [emission, air]: 4.7056e-5 kg
  (same comment as for Naphthalene)
- Methane [emission, air]: 0.033851 kg
  (same comment as for Naphthalene)
- Tetrachloroethylene [emission, air]: 1.9941e-6 kg
  (same comment as for Naphthalene)
- Xylene [emission, air]: 0.00050859 kg
  (same comment as for Naphthalene)
- 1,1,1-Trichloroethane [emission, air]: 2.6038e-5 kg
  (same comment as for Naphthalene)
- Acrolein [emission, air]: 0.00017422 kg
  (same comment as for Naphthalene)
- Carbon tetrachloride [emission, air]: 2.4137e-5 kg
  (same comment as for Naphthalene)
- Methylene chloride [emission, air]: 0.00011899 kg
  (same comment as for Naphthalene)
- Formaldehyde [emission, air]: 0.0036929 kg
  (same comment as for Naphthalene)
- Copper [emission, air]: 2.21e-5 kg
  (same comment as for Naphthalene)
- Cumene [emission, air]: 0.00044219 kg
  (same comment as for Naphthalene)
- Sulfuric acid [emission, air]: 0.013758 kg
  (same comment as for Naphthalene)
- Beryllium [emission, air]: 0.00082244 kg
  (same comment as for Naphthalene)
- Trisodium phosphate [emission, air]: 0.037401 kg
  (same comment as for Naphthalene)
- 2,3,7,8-Tetrachlorodibenzo-p-dioxin [emission, air]: 1.638e-13 kg
  (same comment as for Naphthalene)
- Phenol [emission, air]: 0.0067627 kg
  (same comment as for Naphthalene)
- Nitrous oxide [emission, air]: 0.026502 kg
  (same comment as for Naphthalene)
- Chloromethane [emission, air]: 0.012069 kg
  (same comment as for Naphthalene)
- Sulfur dioxide [emission, air]: 3.6982 kg
  From all combustion processes at pulp and paper mill.
- Hexachlorobenzene [emission, air]: 3.4277e-10 kg
  (same comment as for Naphthalene)
- Lead [emission, air]: 6.0607e-6 kg
  (same comment as for Naphthalene)
- Carbon disulfide [emission, air]: 0.00030997 kg
  (same comment as for Naphthalene)
- Biphenyl [emission, air]: 8.4992e-5 kg
  (same comment as for Naphthalene)
- Methyl isobutyl ketone [emission, air]: 0.00024064 kg
  (same comment as for Naphthalene)
- Hydrochloric acid [emission, air]: 0.040074 kg
  (same comment as for Naphthalene)
- Vanadium [emission, air]: 8.2471e-7 kg
  (same comment as for Naphthalene)
- Cresol [emission, air]: 0.0020051 kg
  (same comment as for Naphthalene)
- Styrene [emission, air]: 0.00012491 kg
  (same comment as for Naphthalene)
- Arsenic [emission, air]: 1.6012e-6 kg
  (same comment as for Naphthalene)
- Silver [emission, air]: 5.8719e-5 kg
  (same comment as for Naphthalene)
- Trichloroethylene [emission, air]: 1.3877e-5 kg
  (same comment as for Naphthalene)
- Nickel [emission, air]: 1.2539e-5 kg
  (same comment as for Naphthalene)

## Sampling procedure
The survey included results from 31 paper mills representing 10.6 million short tons per year (TPY), nearly 75% of 2006/2007 North American production volume.

## Sources
- AF&PA
