# Petroleum refining, at refinery

Dataset: openLCA process, unit process
Category: 31-33: Manufacturing/3241: Petroleum and Coal Products Manufacturing
Geography: Northern America
Time period: 2002-12-31 to 2002-12-31
Allocation method: physical allocation
Generated by: Franklin Associates
Published in: THE PLASTICS DIVISION OF THE AMERICAN C
restrictionsDescription: All information can be accessed by everybody.
copyright: false

## General comment
This module expresses data on the basis 1 kilogram of general refinery product as well as data allocated to specific refinery products. The data are allocated to specific refinery products based on the percent by mass of each product in the refinery output. Refinery products include gasoline, distillate/diesel oil, LPG, residual oil, kerosene/jet fuel, and other (still gas, petroleum, coke, asphalt, and petrochemical feedstocks). Complete inventory data and metadata are available in full in the final report and appendices, Cradle-to-Gate Life Cycle Inventory of Nine Plastic Resins and Four Polyurethane Precursors. This report has been extensively reviewed within Franklin Associates and has undergone partial critical review by ACC Plastics Division members and is available at: www.americanchemistry.com. Quantities may vary slightly between the reference to main source and and this module due to rounding. Important note: although most of the data in the US LCI database has undergone some sort of review, the database as a whole has not yet undergone a formal validation process. Please email comments to lci@nrel.gov.

## Technology
Desalting, atmospheric distillation, vacuum distillation, and hydrotreating

## Geography
US

## Reference product
- Diesel, at refinery: 0.252345 l
  Mass (0.2188 kg/kg output) used for allocation. Conversion to volume used 1.153 L/kg (from a 7.24lb/gal as density factor).

## By-products
- Liquefied petroleum gas, at refinery [RNA]: 0.0490832 l
  100% propane. Mass (0.0266 kg/kg output) used for allocation. Conversion to volume used 1.84 L/kg (from a 4.52 lb/gal as density factor).
- Kerosene, at refinery [RNA]: 0.112458 l
  Mass (0.0910 kg/kg output) used for allocation. Conversion to volume used 1.236 L/kg (from 6.75 lb/gal as density factor).
- Bitumen, at refinery: 0.0371748 kg
  Mass (0.0372 kg/kg output) used for allocation.
- Gasoline, at refinery: 0.570087 l
  Mass (0.4213 kg/kg output) used for allocation. Conversion to volume used 1.353 L/kg (from 6.47 lb/gal as density factor).
- Petroleum refining coproduct, at refinery [RNA]: 0.0514537 kg
  Mass (0.0515 kg/kg output) used for allocation. For internal offgas or material use.
- Residual fuel oil, at refinery [RNA]: 0.0518261 l
  Mass (0.0489 kg/kg output) used for allocation. Conversion to volume used 1.059 L/kg (from 7.88 lb/gal as density factor).
- Petroleum coke, at refinery [RNA]: 0.0595942 kg
  Mass (0.0596 kg/kg output) used for allocation.
- Refinery gas, at refinery [RNA]: 0.0611691 m3
  Mass (0.0451 kg/kg output) used for allocation. Conversion to volume used 1.356 m3/kg (from a density factor of 0.046 lb/ft3 for natural gas).

## Inputs from technosphere
- Crude oil, extracted [RNA]: 1.01848 kg
  This weight reflects material loss at processing. MATERIAL USE.
- Residual fuel oil, combusted in industrial boiler [RNA]: 0.0272298 l
- Transport, barge, residual fuel oil powered [RNA]: 0.000958092 t*km
  Represents transportation from site of crude oil extraction to petroleum refinery; Values for barge transport are calculated based on average fuel consumption rates as reported in Transportation Energy Data Book: Edition 22 from Oak Ridge National Laboratory, September 2002: 22% of barges use diesel fuel in their engines, 78% use residual oil to generate steam for steam turbines, and a barge that consumes residual oil consumes 3.4 gallons per 1,000 ton-miles
- Natural gas, combusted in industrial boiler [RNA]: 0.0111079 m3
- Transport, pipeline, unspecified petroleum products [RNA]: 0.652171 t*km
  Represents transportation from site of crude oil extraction to petroleum refinery
- Liquefied petroleum gas, combusted in industrial boiler [RNA]: 0.00114923 l
- Disposal, solid waste, unspecified, to sanitary landfill: 0.00560421 kg
- Transport, ocean freighter, residual fuel oil powered [US]: 4.4089 t*km
  Represents transportation from site of crude oil extraction to petroleum refinery; Values for ocean freighter transport are calculated based on average fuel consumption rates as determined from a personal communication with Rich Sonnenschein, U.S. Department of Transportation, Maritime Administration in February 2004: 10% of ocean freighters use diesel fuel, 90% use residual fuel, and a freighter that consumes residual fuel consumes 1.9 gallons per 1,000 ton-miles
- Electricity, at grid [RNA]: 0.143108 kWh; provider Electricity, at Grid, US, 2010
- Transport, barge, diesel powered [RNA]: 0.000288148 t*km
  (same comment as for Transport, barge, residual fuel oil powered)
- Transport, ocean freighter, diesel powered [US]: 0.489877 t*km
  (same comment as for Transport, ocean freighter, residual fuel oil powered)

## Emissions to nature
- Nickel [emission, air]: 5.75031e-9 kg
- Carbon monoxide [emission, air]: 0.000424251 kg
- Chromium [emission, air]: 6.75595e-10 kg
- Particulate matter, ≤ 10μm [emission, air]: 3.14805e-5 kg
- Chemical Oxygen Demand [emission, water]: 0.000232883 kg
- Sulfur dioxide [emission, air]: 0.000246934 kg
- Carbon dioxide [emission, air]: 0.000251404 kg
- Lead [emission, water]: 9.84604e-10 kg
- Chromium [emission, water]: 3.04612e-9 kg
- Particulate matter, ≤ 2.5μm [emission, air]: 2.30632e-5 kg
- CFC-13 [emission, air]: 2.17973e-8 kg
- Phenol [emission, water]: 2.26229e-7 kg
- Nitrogen oxides [emission, air]: 0.000423482 kg
- Oils, unspecified [emission, water]: 1.06461e-5 kg
- Methane [emission, air]: 3.69707e-5 kg
- Mercury [emission, water]: 6.03312e-11 kg
- Suspended solids, inorganic [emission, water]: 2.79459e-5 kg
- Ammonia [emission, air]: 3.57748e-6 kg
- Arsenic [emission, air]: 2.57107e-10 kg
- Ammonia [emission, water]: 1.53513e-5 kg
- Selenium [emission, water]: 1.60179e-9 kg
- Sulfide [emission, water]: 1.86306e-7 kg
- Carbon tetrachloride [emission, air]: 1.36233e-9 kg
- Volatile organic compounds [emission, air]: 0.000678355 kg
- Antimony [emission, air]: 2.03766e-9 kg
- Polycyclic organic matter [emission, air]: 5.57743e-8 kg
- Biological Oxygen Demand [emission, water]: 3.39344e-5 kg
- Benzene [emission, air]: 1.0756e-6 kg
- Vanadium [emission, water]: 5.35608e-8 kg
- Ethylene dibromide [emission, air]: 4.26875e-9 kg

## Allocation factors
- causal, Petroleum refining coproduct, at refinery, for Suspended solids, inorganic: 0.0515
- causal, Diesel, at refinery, for Sulfur dioxide: 0.2188
- causal, Diesel, at refinery, for Transport, barge, residual fuel oil powered: 0.2188
- causal, Petroleum refining coproduct, at refinery, for Vanadium: 0.0515
- causal, Diesel, at refinery, for Sulfide: 0.2188
- causal, Gasoline, at refinery, for Residual fuel oil, combusted in industrial boiler: 0.4213
- causal, Petroleum refining coproduct, at refinery, for Lead: 0.0515
- causal, Diesel, at refinery, for Electricity, at grid: 0.2188
- causal, Gasoline, at refinery, for Particulate matter, ≤ 2.5μm: 0.4213
- causal, Diesel, at refinery, for Ethylene dibromide: 0.2188
- causal, Bitumen, at refinery, for Gasoline, at refinery: 0
- causal, Diesel, at refinery, for Chromium: 0.2188
- causal, Diesel, at refinery, for Transport, ocean freighter, residual fuel oil powered: 0.2188
- causal, Petroleum refining coproduct, at refinery, for Carbon dioxide: 0.0515
- causal, Residual fuel oil, at refinery, for Electricity, at grid: 0.0489
- causal, Refinery gas, at refinery, for Nitrogen oxides: 0.0451
- causal, Bitumen, at refinery, for Nitrogen oxides: 0.0372
- causal, Petroleum refining coproduct, at refinery, for Chromium: 0.0515
- causal, Bitumen, at refinery, for Natural gas, combusted in industrial boiler: 0.0372
- causal, Residual fuel oil, at refinery, for Carbon tetrachloride: 0.0489
- economic, Residual fuel oil, at refinery: 0
- causal, Liquefied petroleum gas, at refinery, for Sulfide: 0.0266
- causal, Refinery gas, at refinery, for Mercury: 0.0451
- causal, Refinery gas, at refinery, for Liquefied petroleum gas, at refinery: 0
- causal, Liquefied petroleum gas, at refinery, for Oils, unspecified: 0.0266
- causal, Diesel, at refinery, for Carbon monoxide: 0.2188
- causal, Petroleum refining coproduct, at refinery, for CFC-13: 0.0515
- causal, Petroleum coke, at refinery, for Mercury: 0.0596
- causal, Kerosene, at refinery, for Liquefied petroleum gas, at refinery: 0
- economic, Refinery gas, at refinery: 0
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
## Sampling procedure
Data collected from secondary sources.

## Sources
- THE PLASTICS DIVISION OF THE AMERICAN C
