# Phenol formaldehyde, at plant

Dataset: openLCA process, unit process
Category: 31-33: Manufacturing/3252: Resin, Synthetic Rubber, and Artificial and Synthetic Fibers and Filaments Manufacturing
Geography: Northern America
Allocation method: no allocation
Generated by: Jamie Meil
Published in: Eric T. Sackimoto
restrictionsDescription: All information can be accessed by everybody.
copyright: true

## General comment
Base process data presented with allocations to within process co-products noted. Refer to allocation worksheet for specifics. All allocations performed using mass or volume., early 90's cradle-to-gate profile first published by the ATHENA Institute (1993) and adapted for CORRIM use
Important note: although most of the data in the US LCI database has
undergone some sort of review, the database as a whole has not yet
undergone a formal validation process.
Please email comments to lci@nrel.gov.

## Technology
Typical

## Geography
US Pacific North West

## Reference product
- Phenol formaldehyde, at plant [RNA]: 1 kg

## Inputs from technosphere
- Diesel, combusted in industrial boiler [RNA]: 0.0742 l
- Natural gas, combusted in industrial boiler [RNA]: 0.7 m3
- Gasoline, combusted in equipment [RNA]: 3.03e-6 l
- Diesel, at refinery: 0.749 l; provider Petroleum refining, at refinery
- Natural gas, processed, at plant, 1.357 m3/kg [RNA]: 0.528 m3; provider Natural gas, processed, at plant
- Electricity, at grid [RNA]: 1.42 kWh; provider Electricity, at Grid, US, 2010
- Transport, combination truck, average fuel mix [RNA]: 0.178 t*km

## Emissions to nature
- Formaldehyde [emission, air]: 0.00132 kg
- Volatile organic compounds [emission, air]: 6.71e-6 kg
- Phenol [emission, air]: 0.00132 kg

## Sources
- Eric T. Sackimoto
- Leonard R. Johnson
- Maureen Puetmann
