# Lumber, softwood, ACQ treated, SE

Dataset: openLCA process, unit process
Category: 31-33: Manufacturing/3211: Sawmills and Wood Preservation
Geography: United States
Time period: 2004-12-31 to 2009-12-30
Allocation method: no allocation
Generated by: Chris Bolin
Reviewer: Paul Cooper
Published in: Chris Bolin
restrictionsDescription: All information can be accessed by everybody.
copyright: false

## General comment
Pressure-treated alkaline copper quaternary compound type D (ACQ-D) softwood lumber. Base process data presented with allocations to within process co-products noted. Refer to allocation worksheet for specifics. All allocations performed using mass or volume., This sheet sets out each unit process in the production of one cubic meter of ACQ surfaced pressure treated softwood lumber as produced in the US Southeast. Important note: although most of the data in the US LCI database has undergone some sort of review, the database as a whole has not yet undergone a formal validation process. Please email comments to lci@nrel.gov.; Geography: US Southeast

## Technology
typical

## Geography
US Southeast

## Reference product
- Lumber; softwood; ACQ treated [US]: 1 m3
  17.0 nominal BF = 1 acutal cubic feet (ft3)
  Retention =0.1550 lb/ft3 = 2.4012 kg/m3, dry basis.

## Inputs from technosphere
- Gasoline, combusted in equipment [RNA]: 0.02987 l
  Preservative Wood Treatment
- Transport, combination truck, diesel powered [RNA]: 132 t*km
  Lumber and wood preservative to treating plant
- Quaternary (DDAC), at plant: 0.8 kg
  Preservative Production - ACQ type D
- Transport, train, diesel powered [RNA]: 54.97 t*km
  Lumber to treating plant
- Copper, at plant: 1.6 kg
  Preservative Production - ACQ type D
- Gasoline, combusted in equipment [RNA]: 0.0003194 l
  Preservative Production
- Surfaced dried lumber; at planer mill [US]: 528.94 kg
  1942.4 lbs/MBF x 17.0 BF/ft3 = 33.0208 lb/ft3 = 528.9425 kg/m3;
  Ref. SELum worksheet Column C, Row 6
- Disposal, solid waste, unspecified, to unspecified landfill: 5.6 kg
  Preservative Wood Treatment;
  Solid waste disposal associated with the mining of metals for preservative manufacture. Solid waste disposal as reported in treater surveys as chemical or process wastes, hazardous wastes, and other (normal trash or municipal waste).
- Electricity, at grid [RNA]: 4.858 kWh; provider Electricity, Eastern US, 2014
  Preservative Production
- Liquefied petroleum gas, combusted in industrial boiler [RNA]: 0.334 l
  Preservative Wood Treatment
- Natural gas, combusted in industrial boiler [RNA]: 0.3178 m3
  Preservative Wood Treatment
- Transport, barge, residual fuel oil powered [RNA]: 0.2021 t*km
  Chemicals for preservative production
- Natural gas, processed, at plant, 1.357 m3/kg [RNA]: 5.166 m3; provider Natural gas, processed, at plant
  Preservative production; feedstock
- Monoethanolamine (MEA), at plant: 4.4 kg
  Preservative Production - ACQ type D
- Natural gas, combusted in industrial boiler [RNA]: 1.319 m3
  Preservative Production
- Disposal, solid waste, unspecified, to unspecified landfill: 0.31 kg
  Preservative Production;
  Solid waste disposal associated with the mining of metals for preservative manufacture. Solid waste disposal as reported in treater surveys as chemical or process wastes, hazardous wastes, and other (normal trash or municipal waste).
- Diesel, combusted in industrial boiler [RNA]: 1.209 l
  Preservative Wood Treatment
- Diesel, combusted in industrial boiler [RNA]: 0.0002898 l
  Preservative Production
- Electricity, at grid [RNA]: 7.229 kWh; provider Electricity, Eastern US, 2014
  Preservative Wood Treatment

## Inputs from nature
- Water [resource, water]: 280 kg
  Preservative Wood Treatment
- Water [resource, water]: 90000 kg
  Preservative Production

## Emissions to nature
- Methane [emission, air, troposphere, rural]: 0.009754 kg
  Preservative Production
- Nitrogen oxides [emission, air, troposphere, rural]: 0.01811 kg
  Preservative Production
- Sulfur oxides [emission, air, troposphere, rural]: 8.082e-5 kg
  Preservative Production
- Copper [emission, ground, human-dominated, industrial]: 0.0001214 kg
  Preservative Wood Treatment
- Volatile organic compounds [emission, air, troposphere, rural]: 0.00401 kg
  Preservative Production
- Copper [emission, water]: 7.005e-5 kg
  Preservative Wood Treatment: Stormwater runoff, unspecified location.
- Sulfur dioxide [emission, air, troposphere, rural]: 0.006094 kg
  Preservative Production
- Carbon monoxide [emission, air, troposphere, rural]: 0.008648 kg
  Preservative Production
- Ammonia [emission, air, troposphere, rural]: 0.12, 0.12 kg (2 entries)
  Preservative Wood Treatment
- Carbon dioxide [emission, air, troposphere, rural]: 6.024 kg
  Preservative Production
- Particulate matter, ≤ 10μm [emission, air, troposphere, rural]: 0.1135 kg
  Preservative Production

## Sampling procedure
Industry survey

## Sources
- Chris Bolin
- Chris Bolin
