# Soy-based polyol, at plant

Dataset: openLCA process, unit process, infrastructure
Category: 31-33: Manufacturing/3252: Resin, Synthetic Rubber, and Artificial and Synthetic Fibers and Filaments Manufacturing
Geography: Northern America
Time period: 2008-12-31 to 2008-12-31
Allocation method: no allocation
Generated by: Anne Landfield Greig
Published in: Omni Tech International
restrictionsDescription: All information can be accessed by everybody.
copyright: false

## General comment
1. CARBON SEQUESTRATION should be accounted for after the product is built in its LCA model, and should be included depending on the use of end of life fate of that product.
REFINED SOY OIL: 80.6% C--> 2.955 kg CO2/kg refined soy oil
2. The system boundary is cradle to facility gate of this material. The data set is fully aggregated except for the input of refined soy oil, electricity, and natural gas used for energy, in order to protect company-specific proprietary data. The LCA practitioner must link these three inputs to complete the cradle to gate system.
3. The study (Main Data Source) underwent external peer review prior to this submission to the US LCI database.

## Technology
Data from 1 company but represents current technology

## Geography
US

## Reference product
- Soy-based polyol, at plant [RNA]: 1 kg

## Inputs from technosphere
- Natural gas, combusted in industrial boiler [RNA]: 0.0582 m3
- Electricity, at grid [RNA]: 0.414 kWh; provider Electricity, at Grid, US, 2010
- Soy oil, refined, at plant [RNA]: 0.909 kg
- Disposal, solid waste, unspecified, to unspecified landfill: 0.00926 kg

## Inputs from nature
- Coal, bituminous [resource, ground]: 0.72416 MJ
- Clay [resource, ground]: 8.22e-5 kg
- Natural gas [resource, air, subterranean]: 2.83246 MJ
- Crude oil [resource, water, subterranean]: 0.800959 MJ
- Sodium chloride [resource, ground]: 0.000369 kg
- Coal, lignite [resource, ground]: 0.121709 MJ
- Calcium carbonate [resource, ground]: 3.12e-5 kg
- Water [resource, water]: 19000 kg
- Uranium [resource, ground]: 0.0015 kg

## Emissions to nature
- Carbon dioxide [emission, air]: 0.231 kg
- Acetic acid [emission, air]: 0.000265 kg
- Nitrate [emission, water]: 1.32e-5 kg
  NO3-
- Aluminum [emission, water]: 4.13e-6 kg
- Nitrogen [emission, water]: 6e-5 kg
- Orthophosphate [emission, water]: 3.52e-6 kg
- Methanol [emission, air]: 0.000134 kg
- Sulfate [emission, water]: 0.000182 kg
- Methanol [emission, water]: 0.000134 kg
- Aldehyde [emission, air]: 1.14e-6 kg
- Sodium(I) [emission, water]: 0.00246 kg
- Aromatics [emission, air]: 1.29e-5 kg
- Magnesium [emission, water]: 0.000151 kg
- Suspended solids, inorganic [emission, water]: 0.000542 kg
  SS from soybean crushing is sent to a WWTP; SS from agriculture is discharged to surface water.
- Calcium [emission, water]: 0.000775 kg
- Metals [emission, water]: 8.61e-6 kg
- Biological Oxygen Demand [emission, water]: 6.17e-5 kg
- Chemical Oxygen Demand [emission, water]: 0.000305 kg
- Hydrogen [emission, air]: 0.00622857 MJ
- Metals [emission, air]: 2.07e-6 kg
- Hydrofluoric acid [emission, air]: 2.21e-6 kg
  HF
- Hydrocarbons [emission, air]: 0.000231 kg
  82% excludes methane
- Methane [emission, air]: 0.00114 kg
  CH4
- Ammonia [emission, air]: 6.56e-7 kg
  NH3
- Mercaptans [emission, air]: 1.64e-7 kg
- Acetic acid [emission, water]: 0.007 kg
- Toluene [emission, air]: 2.87e-6 kg
  C6H5CH3
- Particulate matter [emission, air]: 9.45e-5 kg
- Nitrous oxide [emission, air]: 2.34e-6 kg
- Magnesium [emission, air]: 1.16e-7 kg
- Benzene [emission, air]: 3.35e-6 kg
  C6H6
- Hydrochloric acid [emission, air]: 1.84e-5 kg
  HCl
- Barium [emission, water]: 0.000164 kg
- Ethylbenzene [emission, air]: 2.87e-6 kg
  C6H5C2H5
- Total dissolved solids [emission, water]: 0.0107 kg
- Iron [emission, water]: 4.42e-5 kg
- Total Organic Carbon [emission, water]: 3.08e-5 kg
- Sulfur dioxide [emission, air]: 0.00155 kg
- Xylene [emission, air]: 2.87e-6 kg
  C6H4(CH3)2
- Chloride [emission, water]: 0.00926 kg
- Nitrogen dioxide [emission, air]: 0.000721 kg
- Particulate matter, > 10μm [emission, air]: 1.24e-5 kg
- Carbon monoxide [emission, air]: 0.000839 kg
  CO

## Sources
- Omni Tech International
- BioBased Technologies
