# Electricity, at eGrid, SRSO, 2008

Dataset: openLCA process, unit process
Category: 22: Utilities/2211: Electric Power Generation, Transmission and Distribution
Geography: Northern America
Time period: 2007-12-31 to 2007-12-31
Allocation method: no allocation
Generated by: Alberta Carpenter
Published in: Chris Goemans, Athena Institute
restrictionsDescription: All information can be accessed by everybody.
copyright: false

## General comment
The methodology used to put together the grid information is outlined in reference 1.

## Technology
Typical

## Geography
SRSO South electricity grid to include most of Georgia (less SRTV) and Alabama (less STRV) and southeast Mississippi and the panhandle of Florida.

## Reference product
- Electricity, at grid [RNA]: 1 kWh

## Inputs from technosphere
- Electricity, residual fuel oil, at power plant [RNA]: 0.000866197 kWh
  Petroleum (RFO) – Residual Fuel Oil (includes No. 5 and No. 6 Fuel Oils and Bunker C Fuel Oil)
- Electricity, biomass,liquid, unspecified, at power plant: 0.0167224 kWh
  Liquid Renewable Fuels (Biomass) BLQ - black liquor
- Electricity, petroleum, waste oil, at power plant: 5.09277e-5 kWh
  Petroleum (Other Fossil) WO – Waste/Other Oil (including Crude Oil, Liquid Butane, Liquid Propane, Oil Waste, Re-Refined Motor Oil, Sludge Oil, Tar Oil, or other petroleum-based liquid wastes)
- Electricity, bituminous coal, at power plant [RNA]: 0.18028 kWh
  Subbituminous Coal
- Electricity, other gases, unspecified, at power plant: 0.000333245 kWh
  Other Gases OG – Other Gas (Butane, Coal Processes, Coke-Oven, Refinery, and other processes)
- Electricity, biomass, solid, biogenic MSW, at power plant: 2.51331e-5 kWh
  Solid Renewable Fuels (Biomass) MSB – Municipal Solid Waste – Biogenic Component
- Electricity, other gases, unspecified, at power plant: 0.000533376 kWh
  Other Gases BFG - blast furnace gas
- Electricity, nuclear, at power plant [RNA]: 0.174116 kWh
  Nuclear Fission NUC – Nuclear (Uranium, Plutonium, Thorium)
- Electricity, biomass,solid, unspecified, at power plant: 0.000218428 kWh
  Solid Renewable Fuels (Biomass) OBS – Other Biomass Solid (Animal Manure and Waste, Solid By-products, and other solid biomass not specified)
- Electricity, biomass, liquid, sludge, at power plant: 0.000179926 kWh
  Liquid Renewable Fuels (Biomass) SLW - sludge waste
- Electricity, diesel, at power plant [RNA]: 0.000789768 kWh
  Petroleum (DFO) – Distillate Fuel Oil (includes all Diesel and No. 1, No. 2, and No. 4 Fuel Oils)
- Electricity, biomass, solid, agriculture by-products, at power plant: 1.47687e-5 kWh
  Solid Renewable Fuels (Biomass) AB – Agriculture Crop By-products / Straw / Energy Crops
- Electricity, hydropower, at power plant, unspecified: 0.0171275 kWh
  Hydroelectric WAT – Water (Conventional, Pumped Storage)
- Electricity, MSW, non-biogenic, at power plant: 1.97477e-5 kWh
  Other Fuels MSN – Municipal Solid Waste – Non-biogenic components
- Electricity, biomass,liquid, unspecified, at power plant: 1.0607e-5 kWh
  Liquid Renewable Fuels (Biomass) OBL – Other Biomass Liquid (Ethanol, Fish Oil, Liquid Acetonitrile Waste, Medical Waste, Tall Oil, Waste Alcohol, and other Biomass not specified)
- Electricity, biomass, gas, landfill, at power plant: 0.000241139 kWh
  Gaseous Renewable Fuels (Biomass) LFG - landfill gas
- Electricity, bituminous coal, at power plant [RNA]: 0.448307 kWh
  Bituminous Coal BIT - Anthracite Coal, and Bituminous Coal.
- Electricity, other gases, unspecified, at power plant: 2.3653e-5 kWh
  Other Gases PG - propane
- Electricity, natural gas, at power plant [RNA]: 0.150217 kWh
  Natural Gas
- Electricity, tire derived fuel, at power plant: 0.000195572 kWh
  Solid Renewable Fuels (Biomass) TDF - tires, tire derived fuel
- Electricity, petroleum coke, at power plant: 0.0017866 kWh
  Petroleum (Other Fossil) PC - petroleum coke
- Electricity, biomass, at power plant [RNA]: 0.0079413 kWh
  Solid Renewable Fuels (Biomass) WDS – Wood/Wood Waste Solids (Paper Pellets, Railroad Ties, Utility Poles, Wood Chips, and other wood solids)

## Sampling procedure
based on EIA electricity reports for all power plants in the US.

## Sources
- EIA
- EIA
- EIA
- Chris Goemans, Athena Institute
- US DOE
- International Energy Agency
- Statistics Canada
- EIA
- Statistics Canada
- EIA
- EIA
- US DOE
- EIA
- USEPA
- Statistics Canada
- unspecified
- Statistics Canada
- EIA
- EIA
- EIA
- Statistics Canada
- USEPA
- Statistics Canada
- EIA
