# Electricity, at Grid, MRO, 2008

Dataset: openLCA process, unit process
Category: 22: Utilities/2211: Electric Power Generation, Transmission and Distribution
Geography: Northern America
Time period: 2007-12-31 to 2007-12-31
Allocation method: no allocation
Generated by: Alberta Carpenter
Published in: Chris Goemans, Athena Institute
restrictionsDescription: All information can be accessed by everybody.
copyright: false

## General comment
The methodology used to put together the grid information is outlined in reference 1.

## Technology
Typical

## Geography
Manitoba, Minnesota, Nebraska, North Dakota, Saskatchewan and parts of Illinois, Michigan, South Dakota and Wisconsin.

## Reference product
- Electricity, at grid [RNA]: 1 kWh

## Inputs from technosphere
- Electricity, biomass, liquid, sludge, at power plant: 7.77017e-5 kWh
  SLW – Sludge Waste
- Electricity, biomass, solid, biogenic MSW, at power plant: 0.00157487 kWh
  MSB – Municipal Solid Waste – Biogenic Component
- Electricity, nuclear, at power plant [RNA]: 0.147775 kWh
  NUC – Nuclear (Uranium, Plutonium, Thorium)
- Electricity, other gases, unspecified, at power plant: 0.000121914 kWh
  OG – Other Gas (Butane, Coal Processes, Coke-Oven, Refinery, and other processes)
- Electricity, other fuels, unspecified, at power plant: 0.000246416 kWh
  OTH – Other (Batteries, Chemicals, Coke Breeze, Hydrogen, Pitch, Sulfur, Tar Coal, and miscellaneous technologies)
- Electricity, natural gas, at power plant [RNA]: 0.0353679 kWh
  NG – Natural Gas
- Electricity, biomass, at power plant [RNA]: 0.00456276 kWh
  WDS – Wood/Wood Waste Solids (Paper Pellets, Railroad Ties, Utility Poles, Wood Chips, and other wood solids)
- Electricity, biomass, gas, unspecified, at power plant: 0.000164677 kWh
  OBG – Other Biomass Gases (Digester Gas, Methane, and other biomass gases)
- Electricity, bituminous coal, at power plant [RNA]: 0.557485 kWh
  SUB – Subbituminous Coal
- Electricity, diesel, at power plant [RNA]: 0.00149156 kWh
  DFO – Distillate Fuel Oil (includes all Diesel and No. 1, No. 2, and No. 4 Fuel Oils)
- Electricity, at wind power plant, unspecified: 0.0495443 kWh
  WND – Wind
- Electricity, bituminous coal, at power plant [RNA]: 9.25421e-6 kWh
  SC - Coal Synfuel. Coal-based solid fuel that has been processed by a coal synfuel plant, and coal-based fuels such as briquettes, pellets, or extrusions, which are formed from fresh or recycled coal and binding materials.
- Electricity, tire derived fuel, at power plant: 0.000301384 kWh
  TDF – Tired (tire derived fuel)
- Electricity, residual fuel oil, at power plant [RNA]: 0.000211675 kWh
  RFO – Residual Fuel Oil (includes No. 5 and No. 6 Fuel Oils and Bunker C Fuel Oil)
- Electricity, bituminous coal, at power plant [RNA]: 0.0232378 kWh
  BIT - Anthracite Coal, and Bituminous Coal.
- Electricity, other fuels, unspecified, at power plant: 0.000368016 kWh
  PUR – Purchased Steam
- Electricity, biomass, solid, agriculture by-products, at power plant: 6.74522e-5 kWh
  AB – Agriculture Crop By-products / Straw / Energy Crops
- Electricity, MSW, non-biogenic, at power plant: 0.00123739 kWh
  MSN – Municipal Solid Waste – Non-biogenic components
- Electricity, petroleum, waste oil, at power plant: 1.46653e-5 kWh
  WO – Waste/Other Oil (including Crude Oil, Liquid Butane, Liquid Propane, Oil Waste, Re-Refined Motor Oil, Sludge Oil, Tar Oil, or other petroleum-based liquid wastes)
- Electricity, petroleum coke, at power plant: 0.00485257 kWh
  PC – Petroleum Coke
- Electricity, biomass, gas, landfill, at power plant: 0.00218475 kWh
  LFG – Landfill Gas
- Electricity, geothermal, unspecified: 0.000511983 kWh
  GEO – Geothermal
- Electricity, lignite coal, at power plant [RNA]: 0.129534 kWh
  LIG – Lignite Coal
- Electricity, hydropower, at power plant, unspecified: 0.0327458 kWh
  WAT – Water (Conventional, Pumped Storage)
- Electricity, biomass,solid, unspecified, at power plant: 0.00189631 kWh
  OBS – Other Biomass Solid (Animal Manure and Waste, Solid By-products, and other solid biomass not specified)
- Electricity, biomass,liquid, unspecified, at power plant: 0.00441425 kWh
  BLQ – Black Liquor

## Sampling procedure
based on EIA electricity reports for all power plants in the US.

## Sources
- EIA
- EIA
- EIA
- Chris Goemans, Athena Institute
- US DOE
- International Energy Agency
- Statistics Canada
- EIA
- Statistics Canada
- EIA
- EIA
- US DOE
- EIA
- USEPA
- Statistics Canada
- unspecified
- Statistics Canada
- EIA
- EIA
- EIA
- Statistics Canada
- USEPA
- Statistics Canada
- EIA
