# Pulpwood, softwood, average, state or private dry forest, at forest road, INW

Dataset: openLCA process, unit process
Category: 11: Agriculture, Forestry, Fishing and Hunting/1133: Logging
Geography: United States
Time period: 1988-12-31 to 1995-12-31
Allocation method: no allocation
Generated by: Maureen Puetmann
Published in: Leonard R. Johnson
restrictionsDescription: All information can be accessed by everybody.
copyright: false

## General comment
1. FIA inventory were from 1989 to 1996 depending on jurisdiction 2. Important note: although most of the data in the US LCI database has undergone some sort of review, the database as a whole has not yet undergone a formal validation process. Please email comments to lci@nrel.gov.

## Technology
Average technology. Some data extrapolated from similar processes.

## Geography
US Inland West including Montana, Idaho, and eastern Washington

## Reference product
- Pulpwood; softwood; average; state or private dry forest; at forest road [US]: 1 m3
  State and private dry forest average mix

## Inputs from technosphere
- Pulpwood; softwd; state or private dry forest; steep slope; at forest rd [US]: 0.1 m3
- Pulpwood; softwd; state or private dry forest; gentle slope; at forest rd [US]: 0.9 m3

## Sampling procedure
Analysis of the FIA data about average slopes by forest type and owner

## Sources
- Maureen Puettmann
- Leonard R. Johnson
