# Containerboard, 100% recycled, at mill

Dataset: openLCA process, unit process
Category: 31-33: Manufacturing/3221: Pulp, Paper, and Paperboard Mills
Geography: United States
Time period: 2013-12-31 to 2014-12-30
Allocation method: no allocation
Generated by: Caroline Gaudreault
Owner: Corrugated Packaging Alliance (CPA)
Reviewer: Dr. Lindita Bushi
Published in: NCASI (2017) LCA Average Corrugated Product
restrictionsDescription: This LCA was commissioned by the Corrugated Packaging Alliance (CPA), a joint venture of the American Forest & Paper Association (AF&PA), Fibre Box Association (FBA), the Association of Independent Corrugated Converters (AICC) and TAPPI. For this study, a core project team was established to direct, review, and coordinate the activities associated with the methodologies employed, data collection, modeling, presentation and dissemination of the LCI data and corresponding LCA results. The core group for this project consisted of a technical advisory group within the Fibre Box Association (FBA) Sustainability Committee along with various staff from the National Council for Air and Stream Improvement (NCASI).
copyright: true

## General comment
Containerboard (linerboard and corrugating medium), average U.S. production, at mill. By-products were allocated 0% of the impacts to enable the user to choose and apply their own allocation method more easily. All flows are production-weighted means. Data were developed for a full LCA that was critically reviewed by Lindita Bushi, Athena Institute.

The unit process includes pulp production from wood and recovered paper, papermaking, and preparation for shipping to customers. Net purchased energy is included, but upstream flows associated with its generation are excluded. Flows associated with transportation of inputs from the technosphere are included. Product transportation is excluded.

## Technology
Current technology mix for containerboard

## Geography
United States

## Time period
Primary data was collected from participating companies and associations for their operational activities representative of 2014.

## Reference product
- Containerboard, 100% recycled, at mill [US]: 1.10516 kg

## Inputs from technosphere
- Transport, combination truck, diesel powered [RNA]: 0.305451 t*km
  Wood logs to P&P (pulp and paper) mills: 96.8% of total mass travels 145 km. Wood chips to P&P mills: 95.2% of total mass travels 259 km. Recovered fiber to P&P mills: 87.8% of total mass travels 201 km. Pulp to P&P mills: 78.6% of total mass travels 267 km. Chemicals: 59.5% of total mass travels 208km. Residuals to management: 87.8% of total mass travels 201km. Purchased hogged fuel, other biomass: 100% of total mass travels 145km.
- Liquefied petroleum gas, at refinery [RNA]: 6.95e-8 m3
- Disposal, coal ash, to uns. landfill: 0.00104302 kg
- Recovered paper, mixed: 0.0146636 kg
  Broad category that often includes items such as discarded mail, telephone books, paper board, magazines, and catalogs
- Transport, barge, diesel powered [RNA]: 0.0246928 t*km
  Recovered fiber to pulp and paper mills: 1.2% of total mass travels 824 km. Chemicals: 6.8% of total mass travels 336 km. Residuals to management : 1.2% of total mass travels 824 km
- Maize starch, at plant: 0.00607681 kg
  i.e. : Maize starch, at plant
- Disposal, wood ash, to uns. beneficial use: 0.000878157 kg
- Roundwood, hardwood, average, at forest road [RNA]: 1.19231e-7 m3
  0.023889571 dry kg, 624 dry kg/m3 (http://www.corrim.org/pubs/reports/2010/phase2/Module_C.pdf), includes bark and wood transformed into black liquor, all used for energy
- Disposal, other solid waste from plant, to uns. incinerator: 0.00152338 kg
- Disposal, coal ash, to uns. land application: 0.00016831 kg
- Residual fuel oil, at refinery [RNA]: 2.04e-7 m3
- Bituminous coal, at mine [RNA]: 0.0102403 kg
- Bark; softwood; green; at sawmill [US]: 0.0307845 kg
  Proxy for purchased hogged fuel. Self-generated hogged fuel (manufacturing) and black liquor solids are not included here but rather in total wood inputs.
- Disposal, other solid waste from plant, to uns. landfill: 0.0430543 kg
- Unspecified polymer: 0.00162616 kg
  Strength agents.
- Disposal, wastewater treatment plant residuals, to uns. land application: 0.0262486 kg
- Disposal, wood ash mixture, pure, 0% water, to uns. land application: 0.000315765 kg
  i.e.: Disposal, wood ash mixture, pure, 0% water, to landfarming
- Electricity, at grid [RNA]: 2.1288 MJ; provider Electricity, at Grid, US, 2010
  Net purchased, National average grid, Medium voltage: <50 kV
- Disposal, wood ash mixture, pure, 0% water, to sanitary landfill: 0.0019568 kg
  i.e.: Disposal, wood ash mixture, pure, 0% water, to sanitary landfill
- Transport, ocean freighter, diesel powered [US]: 0.000489118 t*km
  Chemicals: 2.5% of total mass travel 2020 km
- Disposal, wastewater treatment plant residuals, to uns. landfill: 0.0253512 kg
- Natural gas, processed, at plant, 1.357 m3/kg [RNA]: 0.105866 m3
- Diesel, at refinery: 2.74e-7 m3
- Disposal, coal ash, to uns. beneficial use: 0.000468077 kg
- Old corrugated containers: 1.2231 kg
  Consists of converting wastes (pre-consumer OCC) and post-cosumer old corrugated containers (OCC).
- Disposal, wastewater treatment plant residuals, to uns. Incinerator: 0.000664266 kg
- Transport, train, diesel powered [RNA]: 0.0962704 t*km
  Wood logs to P&P (pulp and paper) mills: 3.2% of total mass travels 2828 km. Wood chips to P&P mills: 4.8% of total mass travels 1989 km. Recovered fiber to P&P mills: 11.0% of total mass travels 589 km. Pulp to P&P mills: 21.4% of total mass travels 1347 km. Chemicals: 31.3% of total mass travels 1355 km. Residuals to management: 11.0% of total mass travels 589 km.
- Sodium hydroxide, production mix, at plant [US]: 0.000417108 kg
- Disposal, wastewater treatment plant residuals, to uns. beneficial use: 0.0124852 kg
- Softwood logs with bark; harvested at average intensity site; at mill [US]: 4.00987e-6 m3
  0.580623221 dry kg, 452 dry kg/m3. Includes bark and wood transformed in black liquor, all used for energy onsite.
- Disposal, other solid waste from plant, to uns. beneficial use: 0.01381 kg
- Gasoline, at refinery: 4.9e-9 m3
- Sulfuric acid, at plant [RNA]: 0.000703097 kg
- Aluminium sulphate, powder, at plant: 0.000927351 kg
  i.e.: Aluminium sulphate, powder, at plant

## Inputs from nature
- Water [resource, water]: 0.363911 kg
  Calculated as total intake (reported by mills) - Cooling. When needed, mill energy accounts for treating water.

## Emissions to nature
- Thallium [emission, air]: 2.61e-10 kg
- Benzene [emission, air]: 8.02e-7 kg
- Cyanide [emission, air]: 1.65e-8 kg
- Chrysene [emission, air]: 6.25e-13 kg
- 1,2-Dichloroethane [emission, air]: 2.05e-10 kg
- Carbon disulfide [emission, air]: 4.98e-6 kg
- Chromium(VI) [emission, air]: 4.76e-10 kg
- Acetophenone [emission, air]: 7.68e-11 kg
- Nitrous oxide [emission, air]: 6.66e-6 kg
- Hexachlorobenzene [emission, air]: 2.91e-10 kg
- Propionaldehyde [emission, air]: 8.63e-7 kg
- Energy, heat [emission, air]: 0.0228471 MJ
- Acetone [emission, air]: 3.36e-7 kg
- Propylene [emission, air]: 1.89e-10 kg
- Sulfur dioxide [emission, air]: 0.000254529 kg
- Methanol [emission, air]: 5.42e-5 kg
- Naphthalene [emission, air]: 1.13e-9 kg
- Biological Oxygen Demand [emission, water]: 0.000465505 kg
- Nickel [emission, air]: 9.76e-9 kg
- Acetaldehyde [emission, air]: 1.13e-5 kg
- Acenaphthene [emission, air]: 2.59e-10 kg
- Phenol [emission, air]: 6.33e-6 kg
- Barium [emission, water]: 8.64e-8 kg
- Hydrazine [emission, air]: 8.7e-10 kg
- Dimethyl sulfate [emission, air]: 2.46e-10 kg
- Particulate matter, > 10μm [emission, air]: 2.17e-6 kg
- Pyrene [emission, air]: 1.69e-12 kg
- Hexane [emission, air]: 8.16e-8 kg
- Chlorobenzene [emission, air]: 1.13e-10 kg
- Xylene [emission, air]: 1.68e-9 kg
- Fluorene [emission, air]: 4.66e-12 kg
- Chromium [emission, water]: 5.61e-9 kg
- Toluene [emission, air]: 8.69e-6 kg
- Methyl methacrylate [emission, air]: 1.02e-10 kg
- Carbon dioxide [emission, air]: 0.0656868, 0.236011 kg (2 entries)
- Benzofluoranthene [emission, air]: 5.63e-13 kg
- Vinyl acetate [emission, air]: 3.89e-11 kg
- 2,4-Dinitrotoluene [emission, air]: 1.43e-12 kg
- Methyl bromide [emission, air]: 5.11e-9 kg
- 2,3,7,8-Tetrachlorodibenzo-p-dioxin [emission, air]: 8.19e-16 kg
- Copper [emission, air]: 3.3e-9 kg
- Strontium [emission, air]: 1.43e-9 kg
- Nitrogen [emission, water]: 5.11e-5 kg
- Magnesium [emission, air]: 5.63e-8 kg
- Methyl ethyl ketone [emission, air]: 2e-9 kg
- Chloroform [emission, air]: 2.02e-6 kg
- Copper [emission, water]: 9.13e-9 kg
- Phenanthrene [emission, air]: 1.38e-11 kg
- Radionuclides [emission, air]: 0.412412 kBq
- Ammonia [emission, air]: 3.28e-9 kg
- Cobalt [emission, air]: 1.41e-9 kg
- Manganese [emission, water]: 8.41e-7 kg
- Hydrochloric acid [emission, air]: 4.02e-6 kg
- Isophorone [emission, air]: 2.97e-9 kg
- Vanadium [emission, air]: 8.38e-11 kg
- Acrolein [emission, air]: 7.41e-8 kg
- Methane [emission, air]: 2.18e-5, 5.03e-6 kg (2 entries)
- 1,3-Butadiene [emission, air]: 2.87e-12 kg
- Polycyclic aromatic hydrocarbons [emission, air]: 1.23e-11 kg
- Antimony [emission, air]: 4.34e-10 kg
- Lead [emission, air]: 2.73e-8 kg
- Mercury [emission, water]: 3.13e-12 kg
- Zinc [emission, air]: 1.11e-7 kg
- Fluoranthene [emission, air]: 3.64e-12 kg
- Tribromomethane [emission, air]: 2e-10 kg
- Tetrachloroethylene [emission, air]: 1.1e-8 kg
- Mercury [emission, air]: 7.44e-9 kg
- Ethylbenzene [emission, air]: 4.81e-10 kg
- Formaldehyde [emission, air]: 4.23e-6 kg
- Di(2-ethylhexyl) phthalate [emission, air]: 3.74e-10 kg
- Benzo[ghi]perylene [emission, air]: 1.38e-13 kg
- Chloride [emission, water]: 3.69e-12 kg
- Indeno[1,2,3-cd]pyrene [emission, air]: 3.12e-13 kg
- Nitrogen oxides [emission, air]: 0.000733507 kg
- Cadmium [emission, air]: 3.15e-9 kg
- 1,1,1-Trichloroethane [emission, air]: 1.64e-8 kg
- Arsenic [emission, air]: 3.83e-9 kg
- Zinc [emission, water]: 3.43e-7 kg
- Water [emission, air]: 1.35806 kg
- Chromium [emission, air]: 5.74e-9 kg
- Phosphorus [emission, air]: 1.66e-8 kg
- Particulate matter, > 2.5μm and ≤ 10μm [emission, air]: 3.41e-5 kg
- Mercaptans [emission, air]: 1.11e-6 kg
- Suspended solids, inorganic [emission, water]: 0.000146969 kg
- Fluoride [emission, air]: 2.28e-7 kg
- Biphenyl [emission, air]: 8.7e-12 kg
- Vanadium [emission, water]: 2.01e-8 kg
- Phosphorus [emission, water]: 5.15e-6 kg
- Nickel [emission, water]: 8.88e-9 kg
- Particulate matter, ≤ 2.5μm [emission, air]: 1.41e-5 kg
- Hydrofluoric acid [emission, air]: 5.36e-7 kg
- Tin [emission, air]: 5.53e-9 kg
- Carbon monoxide [emission, air]: 0.000173414 kg
- Benzo[a]pyrene [emission, air]: 7.71e-10 kg
- Barium [emission, air]: 3.48e-8 kg
- Beryllium [emission, air]: 7.51e-10 kg
- Organic compounds [emission, air]: 3.1e-8 kg
- Lead [emission, water]: 1.04e-9 kg
- Chloromethane [emission, air]: 2.71e-9 kg
- Iron [emission, water]: 1.85e-11 kg
- Volatile organic compounds [emission, air]: 1.08e-5 kg
- Arsenic [emission, water]: 3.84e-9 kg
- Oils, unspecified [emission, water]: 1.06e-8 kg
- Cumene [emission, air]: 1.36e-6 kg
- Selenium [emission, air]: 7.26e-9 kg
- Titanium [emission, air]: 2.84e-9 kg
- Styrene [emission, air]: 1.78e-7 kg
- Benz[a]anthracene [emission, air]: 4.1e-13 kg
- Methylene chloride [emission, air]: 1.75e-9 kg
- Manganese [emission, air]: 5.12e-8 kg
- Molybdenum [emission, air]: 5.84e-10 kg
- Water [emission, water]: 0.363911, 6.85745 kg (2 entries)

## Inventory method
Attributional

## Modelling constants
The industry-average containerboard utilizes about 52% recovered fiber, primarily old corrugated containers (OCC), with the balance supplied mostly by kraft and semichemical pulp. This 2014 U.S. industry-average corrugated product made from 100%-recycled fiber (100%-recycled product) was modeled using the same board mix (linerboard to medium ratio) as the industry average product. It was also assumed that the 100%-recycled product had the same basis weight as the industry-average--131.6 lb/thousand square feet (msf, 0.643 kg/m2) product. This means that the environmental attributes of the 100%-recycled product represented by this process are those of a 100%-recycled product that is functionally equivalent of that of the industry-average product and do not represent the actual “industry-average” 100%-recycled produced and used in the U.S. This process is generated per survey data detailing production, energy and raw material inputs from 42 containerboard mills representing 70% of overal production volume for 2014. Recovered fiber used in 2014 containerboard production comes from three main sources: converting wastes, post-consumer old corrugated containers and recovery from other product systems. Overall, 70% of the 2014 U.S. production of containerboard was included in the study. Board made from anything other than 100%-recycled fiber was well represented, while 100%-recycled products are relatively less well represented, especially 100%-recycled corrugated medium.

## Completeness
REATMENT OF MISSING ENVIRONMENTAL DATA: All known air-related substances associated with combustion, which are deemed significant through U.S. EPA’s TRI (SARA 313) regulation and other national and international combustion-related air contaminant programs, were included for containerboard production.
TREATMENT OF MISSING TECHNOSPHERE DATA: The data collection was performed in a way that ensured that any flow contributing to more than 1% of the mass inputs of those processes was included, except for chemicals, where only those chemicals contributing more than 10% of the total dry mass of chemicals used in each containerboard component were included. No chemicals with significant individual contribution to any environmental indicator (i.e. > 5%) were ignored. In addition, the mills were asked to report the total mass of "other fillers" required to calculate the average carbon content of containerboard. No significant energy input was omitted. Capital equipment and maintenance, maintenance and operation of support equipment, or transport of employees were excluded. In addition, the study did not include energy related to the use of the packaging product, nor that of the product packaged by it. Other overhead functions such as HVAC and lighting were included to the extent they are considered in total mill energy usage as reported by participating companies.
MASS BALANCE: Water, fiber and carbon balances were performed for the containerboard production and converting unit processes. Where adequate, the results of the mass balances were used to correct the collected data.

## Data treatment
Primary data were from survey data odetailing production, energy and raw material inputs from 42 containerboard mills representing 70% of overal production volume for 2014. Data on water inputs, environmental loads, solid waste management, and energy (quantity and types of fuels) for the relevant pulp and paper mills were drawn from responses to the 2014 AF&PA Enironmental, Health, and Safety (EHS) Survey. Information on quantity of energy used, fiber input, furnish production, and chemical consumption (quantity and type) at the department level were collected in a supplemental survey. Data regarding the emissions of toxic substances (as defined by the U.S. Toxics Release Inventory-TRI) were modeled using U.S. LCI and NCASI information. It was assumed that the mills for which data were collected were spread out geographically in a way that was representative of the average. Data on nutrient content of treated wastewater effluents from pulp and paper mills were derived from available information in the U.S. EPA Permit Compliance System database https://www.epa.gov/enviro/pcs-icis-overview; these data are insufficient to allow characterization of effluents from the specific mills in the database, but they do allow general characterization of effluents from U.S. pulp and paper mills. Data submitted by the industry in connection with the TSCA Inventory Update Rule (IUR, www.epa.gov/iur/) were used to estimate quantities of kraft pulping co-products produced (e.g., tall oil and turpentine); the IUR data were not sufficient to characterize every mill in the database, but were sufficient to characterize kraft pulping processes in general. Information provided via the surveys was quality-assured (QA) using a combination of cross-checking with data previously submitted to the AF&PA EHS survey (which had previously been subjected to a quality-assurance protocol) and by evaluating internal consistency of various data elements based on engineering principles. This process resulted in the inclusion of data for all the 42 containerboard mills. Purchased electricity was assigned upstream loads for the electrical grid serving the specific facilities on which the LCA is based (based on eGrid regions). Containerboard facility location was used to determine the applicable region-specific emission factor. Facility electricity use by product (pro-rated by production mass) was then used to develop the overall electricity mix by product grade, which was different for the industryaverage corrugated products and the product made from 100%-recycled fiber. The load for electricity and steam sold by those facilities was not included in the study. The average quantities of individual fuels consumed during production of steam by the utility CHP plants serving the containerboard mills were estimated using detailed facility information from the 2010 LCA, the US EPA eGRID database, and the Efficiency Method as recommended by the WRI/WBCSD GHG Protocol. Foreground transportation distances were modeled using the 2012 Commodity Flow Survey (CFS) (U.S. Department of Transportation and U.S. Department of Commerce, 2015) and the CORRIM database.

## Data collection
All primary data and secondary data were collected from 2015-2016 for the reference year 2014.

## Sampling procedure
The survey included results from 46 containerboard mills representing 27 million short tons per year (TPY), nearly 78% of 2010 production volume.

## Review details
The LCA study that produced this unit process was critically reviewed per ISO 14040 and 14044 standards by Dr. Lindita Bushi, Senior Research Associate of Athena Sustainable Materials Institute.

## Intended application
In order to respond to increasing interest among product manufacturers and consumer retail markets in selecting more sustainable packaging options, CPA engaged NCASI to update the results of a LCA they published in 2014 that relied primarily on 2010 data to the most recent available data (i.e., 2014 data). SITUATION A -- MICRO-LEVEL DECISION SUPPORT: The intended application for this process is for micro-level decision support as described in Goal Situation A from the ILCD Handbook's Detailed Guidance. These data were developed as specific, average or generic unit process LCI results for use in answering internal company product-related questions. A full inventory of environmental flows are included, thus this unit process can be used for a full range of LCIA impact categories, on the fate and transport considerations have been applied. The original study results were analyzed using the TRACI LCIA factors.

## Sources
- NCASI (2017) LCA Average Corrugated Product
