# Electricity, at eGrid, CAMX, 2008

Dataset: openLCA process, unit process
Category: 22: Utilities/2211: Electric Power Generation, Transmission and Distribution
Geography: Northern America
Time period: 2007-12-31 to 2007-12-31
Allocation method: no allocation
Generated by: Alberta Carpenter
Published in: Chris Goemans, Athena Institute
restrictionsDescription: All information can be accessed by everybody.
copyright: false

## General comment
The methodology used to put together the grid information is outlined in reference 1.

## Technology
Typical

## Geography
California (except for small portions in the north and south that are part of the NWPP and AZNM grids repsectively. )

## Reference product
- Electricity, at grid [RNA]: 1 kWh

## Inputs from technosphere
- Electricity, biomass, solid, biogenic MSW, at power plant: 0.00112011 kWh
  Solid Renewable Fuels (Biomass) MSB - Municipal Solid Waste – Biogenic Component
- Electricity, petroleum, waste oil, at power plant: 0.000352737 kWh
  Petroleum (Other Fossil) WO - Waste/Other Oil (including Crude Oil, Liquid Butane, Liquid Propane, Oil Waste, Re-Refined Motor Oil, Sludge Oil, Tar Oil, or other petroleum-based liquid wastes)
- Electricity, biomass, at power plant [RNA]: 0.0150979 kWh
  Solid Renewable Fuels (Biomass) WDS - Wood/Wood Waste Solids (Paper Pellets, Railroad Ties, Utility Poles, Wood Chips, and other wood solids)
- Electricity, hydropower, at power plant, unspecified: 0.117722 kWh
- Electricity, solar, unspecified, at power plant: 0.00331365 kWh
  Solar (Photovoltaic, Thermal)
- Electricity, natural gas, at power plant [RNA]: 0.590081 kWh
- Electricity, biomass, gas, landfill, at power plant: 0.00736588 kWh
  Gaseous Renewable Fuels (Biomass) LFG - Landfill Gas
- Electricity, diesel, at power plant [RNA]: 0.000379149 kWh
  Petroleum (DFO) - Distillate Fuel Oil (includes all Diesel and No. 1, No. 2, and No. 4 Fuel Oils)
- Electricity, MSW, non-biogenic, at power plant: 0.000880085 kWh
  Other Fuels MSN - Municipal Solid Waste – Non-biogenic components
- Electricity, biomass, gas, unspecified, at power plant: 0.00224507 kWh
  Gaseous Renewable Fuels (Biomass) OBG - Other Biomass Gases (Digester Gas, Methane, and other biomass gases)
- Electricity, nuclear, at power plant [RNA]: 0.160534 kWh
- Electricity, other fuels, unspecified, at power plant: 0.000695444 kWh
  Other Fuels OTH - Other (Batteries, Chemicals, Coke Breeze, Hydrogen, Pitch, Sulfur, Tar Coal, and miscellaneous technologies)
- Electricity, other gases, unspecified, at power plant: 0.00832346 kWh
  Other Gases OG - Other Gas (Butane, Coal Processes, Coke-Oven, Refinery, and other processes)
- Electricity, at wind power plant, unspecified: 0.0260463 kWh
- Electricity, tire derived fuel, at power plant: 9.72934e-5 kWh
  Solid Renewable Fuels (Biomass) TDF - tires, tire derived fuel
- Electricity, diesel, at power plant [RNA]: 4.66867e-5 kWh
  Petroleum (DFO) JF - Jet Fuel
- Electricity, other fuels, unspecified, at power plant: 0.00114577 kWh
  Other Fuels WH - waste heat
- Electricity, petroleum coke, at power plant: 0.00779552 kWh
  Petroleum (Other Fossil) PC - petroleum coke
- Electricity, biomass, solid, agriculture by-products, at power plant: 0.000942157 kWh
  Solid Renewable Fuels (Biomass) AB - Agriculture Crop By-products /Straw /Energy Crops
- Electricity, bituminous coal, at power plant [RNA]: 0.0112702 kWh
- Electricity, other gases, unspecified, at power plant: 3.48102e-6 kWh
  Other Gases PG - propane
- Electricity, residual fuel oil, at power plant [RNA]: 2.15647e-5 kWh
  Petroleum (RFO) - Residual Fuel Oil (includes No. 5 and No. 6 Fuel Oils and Bunker C Fuel Oil)
- Electricity, geothermal, unspecified: 0.0445195 kWh

## Sampling procedure
based on EIA electricity reports for all power plants in the US.

## Sources
- EIA
- EIA
- EIA
- Chris Goemans, Athena Institute
- US DOE
- International Energy Agency
- Statistics Canada
- EIA
- Statistics Canada
- EIA
- EIA
- US DOE
- EIA
- USEPA
- Statistics Canada
- unspecified
- Statistics Canada
- EIA
- EIA
- EIA
- Statistics Canada
- USEPA
- Statistics Canada
- EIA
