# Ethanol, denatured, mixed feedstocks, at conversion facility, 2022

Dataset: openLCA process, unit process
Category: 31-33: Manufacturing/3251: Basic Chemical Manufacturing
Geography: Northern America
Time period: 2008-12-31 to 2008-12-31
Allocation method: no allocation
Generated by: Daniel Inman
Published in: Hsu, D.
restrictionsDescription: All information can be accessed by everybody.
copyright: false

## Technology
modern

## Geography
North America

## Time period
2009

## Reference product
- Ethanol, denatured, mixed feedstocks, at conversion facility [RNA]: 1 kg

## Inputs from technosphere
- Ethanol, denatured, corn stover, biochemical [RNA]: 0.129 kg
- Ethanol, denatured, wheat straw, biochemical [RNA]: 0.129 kg
- Ethanol, denatured, forest residues, thermochem [RNA]: 0.129 kg
- Ethanol, denatured, corn dry mill [RNA]: 0.484 kg
- Ethanol, denatured, switchgrass, biochemical [RNA]: 0.129 kg

## Sources
- Hess, J.
- Hsu, D.
