# Sawn lumber, softwood, planed, kiln dried, at planer, NE-NC

Dataset: openLCA process, unit process
Category: 31-33: Manufacturing/3211: Sawmills and Wood Preservation
Geography: United States
Time period: 2005-12-31 to 2006-12-31
Allocation method: physical allocation
Generated by: Maureen Puetmann
Published in: Richard D. Bergman
restrictionsDescription: All information can be accessed by everybody.
copyright: false

## General comment
1. Allocation on a mass basis.
2. Important note: although most of the data in the US LCI database has
undergone some sort of review, the database as a whole has not yet
undergone a formal validation process.
3. Please email comments to lci@nrel.gov. 4. WRT soil carbon, what is not known, is the degree of carbon release from the decomposed fine roots in the soil and whether the net release of fine root carbon will be different over different time periods and under different treatment regimes. The results do not address soil carbon or the effect of forest management activities on total soil carbon because no reliable predictors were found that relate to the management treatments being considered.

## Technology
Average technology. Some data extrapolated from similar processes.

## Geography
NE/NC = Northeast (NE) and Northcentral (NC) United States. Some states are however omitted: Connecticut, Delaware, Illinois, Iowa, New Jersey, and Ohio.

## Reference product
- Sawn lumber; softwood; planed; kiln dried; at planer [US]: 1 m3
  Based on an ovendry basis density of 420 kg/m3 and a moisture content (ovendry basis) of 16%. Conversion to board feet: 625 nominal board feet/m3 sawn and planed lumber.

## By-products
- Shavings; softwood; kiln dried; at planer [US]: 80.6 kg
  Weight reported on an ovendry basis. Moisture content (ovendry basis) = 16%
- Wood fuel; softwood; kiln dried [US]: 22.9 kg
  Weight reported on an ovendry basis. Moisture content (ovendry basis) = 16%

## Inputs from technosphere
- Electricity, at grid [RNA]: 16.75 kWh; provider Electricity, Eastern US, 2014
  Represents 19.8% of total mill consumption of grid electricity.
- Electricity; onsite boiler; softwood mill; average [US]: 2.81 kWh; provider Heat, onsite boiler, softwood mill, average, NE-NC
  Represents 19.8% of total mill consumption of electricity generated onsite.
- Diesel, combusted in industrial equipment [RNA]: 0.408 l
  Diesel used for on-site transportation. Represents 20% of mill use of diesel for transport.
- Gasoline, combusted in equipment [RNA]: 0.0076 l
  Gasoline used for on-site transportation. Represents 20% of mill use of gasoline for transport.
- Sawn lumber; softwood; rough; kiln dried; at kiln [US]: 1.27 m3
  Moisture content (ovendry basis) = 16%

## Allocation factors
- causal, Wood fuel; softwood; kiln dried, for Gasoline, combusted in equipment: 0.043744
- economic, Sawn lumber; softwood; planed; kiln dried; at planer: 0.802292
- physical, Sawn lumber; softwood; planed; kiln dried; at planer: 0.802292
- causal, Sawn lumber; softwood; planed; kiln dried; at planer, for Electricity, at grid: 0.802292
- causal, Shavings; softwood; kiln dried; at planer, for Sawn lumber; softwood; rough; kiln dried; at kiln: 0.153964
- causal, Sawn lumber; softwood; planed; kiln dried; at planer, for Gasoline, combusted in equipment: 0.802292
- causal, Sawn lumber; softwood; planed; kiln dried; at planer, for Electricity; onsite boiler; softwood mill; average: 0.802292
- causal, Shavings; softwood; kiln dried; at planer, for Electricity, at grid: 0.153964
- causal, Wood fuel; softwood; kiln dried, for Electricity, at grid: 0.043744
- economic, Wood fuel; softwood; kiln dried: 0.043744
- causal, Shavings; softwood; kiln dried; at planer, for Electricity; onsite boiler; softwood mill; average: 0.153964
- causal, Wood fuel; softwood; kiln dried, for Diesel, combusted in industrial equipment: 0.043744
- physical, Wood fuel; softwood; kiln dried: 0.043744
- causal, Wood fuel; softwood; kiln dried, for Sawn lumber; softwood; rough; kiln dried; at kiln: 0.043744
- physical, Shavings; softwood; kiln dried; at planer: 0.153964
- causal, Sawn lumber; softwood; planed; kiln dried; at planer, for Sawn lumber; softwood; rough; kiln dried; at kiln: 0.802292
- causal, Sawn lumber; softwood; planed; kiln dried; at planer, for Diesel, combusted in industrial equipment: 0.802292
- causal, Wood fuel; softwood; kiln dried, for Electricity; onsite boiler; softwood mill; average: 0.043744
- economic, Shavings; softwood; kiln dried; at planer: 0.153964
- causal, Shavings; softwood; kiln dried; at planer, for Diesel, combusted in industrial equipment: 0.153964
- causal, Shavings; softwood; kiln dried; at planer, for Gasoline, combusted in equipment: 0.153964

## Sampling procedure
Questionnaires from 6 mills member of the Northeastern Lumber Manufacturer’s Association (NeLMA). Mills of the NeLMA are assumed to be representative of the softwood industry in the NE/NC region.

## Intended application
Only mass allocation factors are available for the multi-functional processes (disregard economic allocation factor values-they are mass allocation factors).

## Sources
- Forest Products Laboratory
- W.T. Simpson
- M. A. Fosenca
- CORRIM Reports on Enviornmental Performa
- Maureen Puettmann
- Andrew J. Baker
- USDC
- Forest Products Laboratory
- Richard D. Bergman
