# Electricity, at eGrid, SRMV, 2008

Dataset: openLCA process, unit process
Category: 22: Utilities/2211: Electric Power Generation, Transmission and Distribution
Geography: Northern America
Time period: 2007-12-31 to 2007-12-31
Allocation method: no allocation
Generated by: Alberta Carpenter
Published in: Chris Goemans, Athena Institute
restrictionsDescription: All information can be accessed by everybody.
copyright: false

## General comment
The methodology used to put together the grid information is outlined in reference 1.

## Technology
Typical

## Geography
SRMV Mississippi Valley electricity grid to include eastern Arkansas (less SPSO), western Mississippi (less SRTV and SRSO), most of Louisiana (less SPSO) and a small portion of Texas.

## Reference product
- Electricity, at grid [RNA]: 1 kWh

## Inputs from technosphere
- Electricity, diesel, at power plant [RNA]: 0.000295623 kWh
  Petroleum (DFO) – Distillate Fuel Oil (includes all Diesel and No. 1, No. 2, and No. 4 Fuel Oils)
- Electricity, biomass, liquid, sludge, at power plant: 1.2961e-5 kWh
  Liquid Renewable Fuels (Biomass) SLW - sludge waste
- Electricity, biomass, at power plant [RNA]: 0.00861853 kWh
  Solid Renewable Fuels (Biomass) WDS – Wood/Wood Waste Solids (Paper Pellets, Railroad Ties, Utility Poles, Wood Chips, and other wood solids)
- Electricity, biomass,liquid, unspecified, at power plant: 0.0179155 kWh
  Liquid Renewable Fuels (Biomass) BLQ - black liquor
- Electricity, petroleum, waste oil, at power plant: 5.21451e-5 kWh
  Petroleum (Other Fossil) WO – Waste/Other Oil (including Crude Oil, Liquid Butane, Liquid Propane, Oil Waste, Re-Refined Motor Oil, Sludge Oil, Tar Oil, or other petroleum-based liquid wastes)
- Electricity, other fuels, unspecified, at power plant: 0.000829304 kWh
  Other Fuels OTH – Other (Batteries, Chemicals, Coke Breeze, Hydrogen, Pitch, Sulfur, Tar Coal, and miscellaneous technologies)
- Electricity, biomass,liquid, unspecified, at power plant: 1.95024e-5 kWh
  Liquid Renewable Fuels (Biomass) OBL – Other Biomass Liquid (Ethanol, Fish Oil, Liquid Acetonitrile Waste, Medical Waste, Tall Oil, Waste Alcohol, and other Biomass not specified)
- Electricity, natural gas, at power plant [RNA]: 0.477288 kWh
  Natural Gas
- Electricity, tire derived fuel, at power plant: 0.000401406 kWh
  Solid Renewable Fuels (Biomass) TDF - tires, tire derived fuels
- Electricity, other gases, unspecified, at power plant: 0.00745481 kWh
  Other Gases OG – Other Gas (Butane, Coal Processes, Coke-Oven, Refinery, and other processes)
- Electricity, other fuels, unspecified, at power plant: 0.000102819 kWh
  Other Fuels WH – Waste heat not directly attributed to a fuel source. Note that WH should only be reported where the fuel source for the waste heat is undetermined, and for combined cycle steam turbines that are not supplementary fired
- Electricity, bituminous coal, at power plant [RNA]: 0.181683 kWh
  Subbituminous Coal
- Electricity, biomass, gas, unspecified, at power plant: 1.8206e-5 kWh
  Gaseous Renewable Fuels (Biomass) OBG – Other Biomass Gases (Digester Gas, Methane, and other biomass gases)
- Electricity, hydropower, at power plant, unspecified: 0.0256918 kWh
  Hydroelectric WAT – Water (Conventional, Pumped Storage)
- Electricity, residual fuel oil, at power plant [RNA]: 0.00198625 kWh
  Petroleum (RFO) – Residual Fuel Oil (includes No. 5 and No. 6 Fuel Oils and Bunker C Fuel Oil)
- Electricity, bituminous coal, at power plant [RNA]: 0.000937587 kWh
  Bituminous Coal BIT - Anthracite Coal, and Bituminous Coal.
- Electricity, lignite coal, at power plant [RNA]: 0.0152155 kWh
  Lignite Coal
- Electricity, nuclear, at power plant [RNA]: 0.2463 kWh
  Nuclear Fission NUC – Nuclear (Uranium, Plutonium, Thorium)
- Electricity, petroleum coke, at power plant: 0.0128895 kWh
  Petroleum (Other Fossil) PC - petroleum coke
- Electricity, biomass, solid, agriculture by-products, at power plant: 0.000512517 kWh
  Solid Renewable Fuels (Biomass) AB – Agriculture Crop By-products / Straw / Energy Crops
- Electricity, biomass, gas, landfill, at power plant: 0.000510984 kWh
  Gaseous Renewable Fuels (Biomass) LFG - landfill gas
- Electricity, other fuels, unspecified, at power plant: 0.00126454 kWh
  Other Fuels PUR - purchased steam

## Sampling procedure
based on EIA electricity reports for all power plants in the US.

## Sources
- EIA
- EIA
- EIA
- Chris Goemans, Athena Institute
- US DOE
- International Energy Agency
- Statistics Canada
- EIA
- Statistics Canada
- EIA
- EIA
- US DOE
- EIA
- USEPA
- Statistics Canada
- unspecified
- Statistics Canada
- EIA
- EIA
- EIA
- Statistics Canada
- USEPA
- Statistics Canada
- EIA
