# Steam, purchased by containerboard mills

Dataset: openLCA process, unit process
Category: 22: Utilities/2213: Water, Sewage and Other Systems
Geography: Northern America
Time period: 2008-12-31 to 2009-12-30
Allocation method: no allocation
Generated by: Caroline Gaudreault
Published in: NCASI (2017) LCA Average Corrugated Product
restrictionsDescription: All information can be accessed by everybody.
copyright: false

## General comment
This unit process represent the emissions and resources used in producing steam purchased by containerboard mills.

## Technology
Average technology.

## Reference product
- Steam, purchased by containerboard mills: 1 MJ

## Inputs from technosphere
- Wood waste, unspecified, combusted in industrial boiler [RNA]: 0.00108 kg
  1.24 MJ HHV per MJ of sold energy. Of this, 1.5% is from biomass. An heat value of 17.2 MJHHV/kg was assumed.
- Lignite coal, combusted in industrial boiler [RNA]: 0.0125 kg
  1.24 MJ HHV per MJ of sold energy. Of this, 30.3% is from subbituminous coal. An heat value of 30 MJHHV/kg was assumed. Lignite was used as a proxy for sub-bituminous coal.
- Natural gas, combusted in industrial boiler [RNA]: 5.6634e-6 m3; = 2.0E-4*0.028317
  1.24 MJ HHV per MJ of sold energy. Of this, 0.02% is from natural gas. An heat value of 1.09E3 MJ HHV/1000 ft3 was assumed.
- Bituminous coal, combusted in industrial boiler [RNA]: 0.0274 kg
  1.24 MJ HHV per MJ of sold energy. Of this, 65.8% is from bituminous coal 0.7% from other fossil lumped into coal. An heat value of 30 MJHHV/kg was assumed.
- Residual fuel oil, combusted in industrial boiler [RNA]: 0.000476962 l; = 1.26E-4*3.78541
  1.24 MJ HHV per MJ of sold energy. Of this, 1.6% is from oil coal. An heat value of 158 MJHHV/gal was assumed.

## Inventory method
Attributional

## Modelling constants
Five containerboard mills reported purchasing steam from local utility plants that operate combined heat and power (CHP) systems compared to seven in 2010. For the 2010 LCA, detailed information pertaining to the fuels consumed and operating characteristics of five of the utility CHP systems providing steam to the containerboard mills were obtained from the US EPA’s eGRID database, pertaining to 2009 (2010 data were not yet available from eGRID; it was not possible to definitively identify the utilities supplying steam to two of the containerboard mills). It was assumed that the five utilities for which data were available were representative of the seven. From this information, the fraction of each fuel making up the total fuel input to the five utility CHP systems and the fraction of the total (considering all five utilities) utility fuel input energy that is allocated to the CHP-produced steam (remainder of fuel energy allocated to produced electricity) were calculated using the Efficiency Method as recommended by the WRI/WBCSD GHG Protocol (WRI and WBCSD). 2006). In this manner, the average quantities of individual fuels consumed during production of steam by the utility CHP plants serving the containerboard mills were estimated (1.24 MJ HHV/MJ sold steam). It was assumed that that steam mix also applies to the 100%-recycled product. For the 2014 LCA, fuel mixes from the most recent eGrid database were checked and compared to that used for the 2010 data. Because the fuel mix was almost identical, the data used in 2010 were also used for the 2014 LCA.

## Completeness
This data is 100% based on other US LCI datasets for fuel combustion w/ exception of the quantities of fuels used in producing 1 MJ of steam for which the assumptions are described in "modeling constants".

## Data collection
2009

## Sampling procedure
Evaluation of e-grid data for containerboard mills that purchase steam.

## Review details
The LCA study that produced this unit process was critically reviewed per ISO 14040 and 14044 standards by Dr. Lindita Bushi, Senior Research Associate of Athena Sustainable Materials Institute.

## Intended application
In order to respond to increasing interest among product manufacturers and consumer retail markets in selecting more sustainable packaging options, CPA engaged NCASI to update the results of a LCA they published in 2014 that relied primarily on 2010 data to the most recent available data (i.e., 2014 data). SITUATION A -- MICRO-LEVEL DECISION SUPPORT: The intended application for this process is for micro-level decision support as described in Goal Situation A from the ILCD Handbook's Detailed Guidance. These data were developed as specific, average or generic unit process LCI results for use in answering internal company product-related questions. A full inventory of environmental flows are included, thus this unit process can be used for a full range of LCIA impact categories, on the fate and transport considerations have been applied. The original study results were analyzed using the TRACI LCIA factors.

## Project
This LCA was commissioned by the Corrugated Packaging Alliance (CPA), a joint venture of the American Forest & Paper Association (AF&PA), Fibre Box Association (FBA), the Association of Independent Corrugated Converters (AICC) and TAPPI. For this study, a core project team was established to direct, review, and coordinate the activities associated with the methodologies employed, data collection, modeling, presentation and dissemination of the LCI data and corresponding LCA results. The core group for this project consisted of a technical advisory group within the Fibre Box Association (FBA) Sustainability Committee along with various staff from the National Council for Air and Stream Improvement (NCASI).

## Sources
- NCASI (2017) LCA Average Corrugated Product
