# Soy biodiesel, production, at plant

Dataset: openLCA process, unit process
Category: 31-33: Manufacturing/3251: Basic Chemical Manufacturing
Geography: Northern America
Time period: 2007-12-31 to 2007-12-31
Allocation method: no allocation
Generated by: Anne Landfield Greig
Published in: Omni Tech International
restrictionsDescription: All information can be accessed by everybody.
copyright: false

## General comment
1. CARBON SEQUESTRATION should be accounted for after the product is built in its LCA model, and should be included depending on the use of end of life fate of that product.
BIODIESEL: 77% C --> 2.823 kg CO2/kg biodiesel.
2. The study (Main Data Source) underwent external peer review prior to this submission to the US LCI database.

## Technology
Current technologies (mix of older and newer)

## Geography
US

## Reference product
- Soy biodiesel, production, at plant [RNA]: 3.36 kg
  Methyl soyate, 7.4 pounds per gallon

## By-products
- Glycerin, at plant [RNA]: 0.403 kg

## Inputs from technosphere
- Methanol, at plant, kg: 0.305 kg
- Electricity, at grid [RNA]: 0.12 kWh; provider Electricity, at Grid, US, 2010
- Sodium Methylate, at plant: 0.0777 kg
  from 1998 Biodiesel project
- Citric Acid, at plant: 0.00245 kg
  from 2001 Bioprocess Design, Demetri Petrides
- Hydrochloric Acid, at plant: 0.146 kg
  HCl; available at EcoInvent
- Natural gas, combusted in industrial boiler [RNA]: 0.0762 m3
- Sodium hydroxide, production mix, at plant [US]: 0.00327 kg; provider Chlorine, production mix, at plant
  NaOH
- Phosphoric Acid, at plant: 0.00213 kg
  available at EcoInvent
- Soybean oil, crude, degummed, at plant [RNA]: 3.32 kg
- Transport, combination truck, diesel powered [RNA]: 1.24 t*km

## Inputs from nature
- Water [resource, water]: 1140 kg

## Emissions to nature
- Fatty acids [emission, water]: 0.00694 kg

## Allocation factors
- causal, Glycerin, at plant, for Citric Acid, at plant: 0
- causal, Soy biodiesel, production, at plant, for Citric Acid, at plant: 1
- causal, Glycerin, at plant, for Water: 0
- causal, Glycerin, at plant, for Electricity, at grid: 0
- causal, Soy biodiesel, production, at plant, for Methanol, at plant, kg: 1
- causal, Soy biodiesel, production, at plant, for Hydrochloric Acid, at plant: 1
- causal, Glycerin, at plant, for Transport, combination truck, diesel powered: 0
- causal, Glycerin, at plant, for Phosphoric Acid, at plant: 0
- causal, Glycerin, at plant, for Hydrochloric Acid, at plant: 0
- causal, Soy biodiesel, production, at plant, for Phosphoric Acid, at plant: 1
- causal, Glycerin, at plant, for Sodium Methylate, at plant: 0
- causal, Glycerin, at plant, for Soybean oil, crude, degummed, at plant: 0
- causal, Soy biodiesel, production, at plant, for Electricity, at grid: 1
- causal, Glycerin, at plant, for Sodium hydroxide, production mix, at plant: 0
- causal, Soy biodiesel, production, at plant, for Soybean oil, crude, degummed, at plant: 1
- causal, Glycerin, at plant, for Methanol, at plant, kg: 0
- causal, Glycerin, at plant, for Fatty acids: 0
- causal, Soy biodiesel, production, at plant, for Transport, combination truck, diesel powered: 1
- economic, Glycerin, at plant: 0
- causal, Glycerin, at plant, for Natural gas, combusted in industrial boiler: 0
- causal, Soy biodiesel, production, at plant, for Sodium hydroxide, production mix, at plant: 1
- physical, Soy biodiesel, production, at plant: 1
- causal, Soy biodiesel, production, at plant, for Sodium Methylate, at plant: 1
- economic, Soy biodiesel, production, at plant: 1
- physical, Glycerin, at plant: 0
- causal, Soy biodiesel, production, at plant, for Natural gas, combusted in industrial boiler: 1
- causal, Soy biodiesel, production, at plant, for Fatty acids: 1
- causal, Soy biodiesel, production, at plant, for Water: 1

## Sources
- Omni Tech International
