# Aluminum, primary, ingot, at plant, 1998

Dataset: openLCA process, unit process
Category: 31-33: Manufacturing/3313: Alumina and Aluminum Production and Processing
Geography: Northern America
Time period: 1997-12-31 to 1997-12-31
Allocation method: no allocation
Generated by: James Littlefield, Franklin Associates
Published in: Franklin Associates, A Division of ERG
restrictionsDescription: All information can be accessed by everybody.
copyright: false

## General comment
Molten aluminum is discharged from a smelter into the holding and ingot casting facility. In this step, molten metal is typically combined with high quality, in-house scrap and then cast into aluminum ingots (References 6 and 7). A melt loss occurs when dross is skimmed off the molten aluminum. Electricity for ingot casting is assumed to be produced by the same fuel mix used for aluminum smelting because smelting and ingot casting usually occur in the same facility.
Important note: although most of the data in the US LCI database has
undergone some sort of review, the database as a whole has not yet
undergone a formal validation process.
Please email comments to lci@nrel.gov.

## Technology
Casting of molten metal discharged from smelter.

## Geography
North America

## Reference product
- Aluminum, primary, ingot, at plant [RNA]: 1 kg

## Inputs from technosphere
- Residual fuel oil, combusted in industrial boiler [RNA]: 0.01861 l
- Aluminum, primary, smelt, at plant [RNA]: 1 kg
- Gasoline, combusted in equipment [RNA]: 7.344e-5 l
- Disposal, solid waste, unspecified, to unspecified treatment: 0.02123 kg
- Liquefied petroleum gas, combusted in industrial boiler [RNA]: 0.0015022 l
- Electricity, aluminum smelting and ingot casting regions [RNA]: 0.2112 kWh
- Natural gas, combusted in industrial boiler [RNA]: 0.051815 m3
- Diesel, combusted in industrial boiler [RNA]: 0.0001836 l

## Emissions to nature
- Hydrochloric acid [emission, air]: 5.3e-5 kg
- Fluoride [emission, water]: 2.7e-6 kg
- Particulate matter [emission, air]: 5.8e-5 kg
- Lead [emission, air]: 9.4e-9 kg
- Suspended solids, inorganic [emission, water]: 6.7e-5 kg
- Mercury [emission, water]: 1.4e-11 kg
- Phenol [emission, water]: 1.2e-9 kg
- Oils, unspecified [emission, water]: 2.3e-5 kg
- Chemical Oxygen Demand [emission, water]: 0.00021 kg
- Sulfur [emission, water]: 5.7e-7 kg
- Total dissolved solids [emission, water]: 0.00018 kg
- Organic compounds [emission, air]: 1.1e-5 kg
- Metals [emission, water]: 2.6e-6 kg
- Hydrofluoric acid [emission, air]: 2.3e-6 kg
- Lead [emission, water]: 3.2e-9 kg
- Iron [emission, water]: 8.6e-7 kg
- Carbon dioxide [emission, air]: 0.00093 kg
- Fluorine [emission, air]: 1.9e-5 kg
- Sulfur oxides [emission, air]: 1.1e-5 kg
- Metals [emission, air]: 1.6e-6 kg
- Dissolved Organic Matter [emission, water]: 1.3e-5 kg
- Nitrogen oxides [emission, air]: 2.6e-5 kg
- Detergents, unspecified [emission, water]: 1.5e-8 kg
- Cyanide [emission, water]: 1.7e-9 kg
- Volatile organic compounds [emission, air]: 3.8e-6 kg
- Chloride [emission, water]: 7.888e-6 kg
- Carbon monoxide [emission, air]: 6e-6 kg
- Chlorine [emission, air]: 1.8e-5 kg
- Ammonium [emission, water]: 3.6e-7 kg
- Biological Oxygen Demand [emission, water]: 4.1e-5 kg

## Sources
- US Geological Survey
- Franklin Associates, A Division of ERG
- The Aluminum Association
- Energy Information Administration (EIA)
- IAI Statistical Report: Electrical Power
- US EPA
