# Heat, onsite boiler, softwood mill, average, NE-NC

Dataset: openLCA process, unit process
Category: 22: Utilities/2213: Water, Sewage and Other Systems
Geography: United States
Time period: 2004-12-31 to 2005-12-31
Allocation method: no allocation
Generated by: Pascal Lesage
Published in: Richard D. Bergman
restrictionsDescription: All information can be accessed by everybody.
copyright: false

## General comment
Allocation on an energy basis (HHV).
Important note: although most of the data in the US LCI database has
undergone some sort of review, the database as a whole has not yet
undergone a formal validation process.
Please email comments to lci@nrel.gov.

## Technology
Average technology.

## Geography
NE/NC = Northeast (NE) and Northcentral (NC) United States. Some states are however omitted: Connecticut, Delaware, Illinois, Iowa, New Jersey, and Ohio.

## Reference product
- Heat; onsite boiler; softwood mill; average [US]: 1 MJ

## By-products
- Electricity; onsite boiler; softwood mill; average [US]: 0.00632 kWh
  Net electricity output.

## Inputs from technosphere
- Wood fuel; softwood; gen at lumber mill; combusted in industrial boiler [US]: 0.0304 kg; provider Wood fuel, softwood, gen at lumber mill, combusted in industrial boiler, NE-NC
  Oven-dry mass
- Wood fuel; softwood; purchased; combusted in industrial boiler [US]: 0.02045 kg; provider Wood fuel, softwood, purchased, combusted in industrial boiler, NE-NC
  Oven-dry mass
- Diesel, combusted in industrial boiler [RNA]: 0.004 l
  Proxy for both Fuel oil #1 and #2 combusted in the onsite boiler
- Electricity, diesel, at power plant [RNA]: 0.00149 kWh
  Proxy for distilate fuel oil combusted in back-up generator

## Allocation factors
- causal, Heat; onsite boiler; softwood mill; average, for Diesel, combusted in industrial boiler: 1
- economic, Heat; onsite boiler; softwood mill; average: 1
- causal, Heat; onsite boiler; softwood mill; average, for Wood fuel; softwood; gen at lumber mill; combusted in industrial boiler: 1
- physical, Electricity; onsite boiler; softwood mill; average: 0
- causal, Electricity; onsite boiler; softwood mill; average, for Wood fuel; softwood; purchased; combusted in industrial boiler: 0
- causal, Electricity; onsite boiler; softwood mill; average, for Electricity, diesel, at power plant: 0
- causal, Electricity; onsite boiler; softwood mill; average, for Diesel, combusted in industrial boiler: 0
- causal, Electricity; onsite boiler; softwood mill; average, for Wood fuel; softwood; gen at lumber mill; combusted in industrial boiler: 0
- economic, Electricity; onsite boiler; softwood mill; average: 0
- physical, Heat; onsite boiler; softwood mill; average: 1
- causal, Heat; onsite boiler; softwood mill; average, for Electricity, diesel, at power plant: 1
- causal, Heat; onsite boiler; softwood mill; average, for Wood fuel; softwood; purchased; combusted in industrial boiler: 1

## Sampling procedure
Questionnaires from 6 mills member of the Northeastern Lumber Manufacturer’s Association (NeLMA). Mills of the NeLMA are assumed to be representative of the softwood industry in the NE/NC region.

## Sources
- Richard D. Bergman
- Maureen Puettmann
