# Sawn lumber, hardwood, rough, green, at sawmill, NE-NC

Dataset: openLCA process, unit process
Category: 31-33: Manufacturing/3211: Sawmills and Wood Preservation
Geography: United States
Time period: 2004-12-31 to 2005-12-31
Allocation method: physical allocation
Generated by: Maureen Puetmann
Published in: Richard D. Bergman
restrictionsDescription: All information can be accessed by everybody.
copyright: false

## General comment
Allocation based on mass.
Important note: although most of the data in the US LCI database has
undergone some sort of review, the database as a whole has not yet
undergone a formal validation process.
Please email comments to lci@nrel.gov.

## Technology
Average technology. Some data extrapolated from similar processes.

## Geography
NE/NC = Northeast (NE) and Northcentral (NC) United States. The 20 states are Connecticut, Delaware, Illinois, Indiana, Iowa, Maine, Maryland, Massachusetts, Michigan, Minnesota, Missouri, New Hampshire, New Jersey, New York, Ohio, Pennsylvania, Rhode Island, Vermont, West Virginia, Wisconsin.

## Reference product
- Sawn lumber; hardwood; rough; green; at sawmill [US]: 1 kg
  Weight reported on an ovendry basis. Moisture content (ovendry basis) = 87%

## By-products
- Hogged fuel; hardwood; green; at sawmill [US]: 0.036 kg
  Weight reported on an ovendry basis. Moisture content (ovendry basis) = 83.8%
- Wood chips; hardwood; green; at sawmill [US]: 0.263 kg
  Weight reported on an ovendry basis. Moisture content (ovendry basis) = 86.3%
- Sawdust; hardwood; green; at sawmill [US]: 0.0801 kg
  Weight reported on an ovendry basis. Moisture content (ovendry basis) = 91.1%
- Wood fuel; hardwood; green; at sawmill [US]: 0.238 kg
  Weight reported on an ovendry basis. Moisture content (ovendry basis) = 86.3%
- Bark; hardwood; green; at sawmill [US]: 0.186 kg
  Weight reported on an ovendry basis. Moisture content (ovendry basis) = 87%

## Inputs from technosphere
- Natural gas, combusted in industrial equipment, 1.357 m3/kg, 52.13 MJ/kg [RNA]: 7.13e-5 l; provider Natural gas, combusted in industrial equipment
  20% of mill use based on Softwood SE CORRIM Report: transporation on-site
- Diesel, combusted in industrial equipment [RNA]: 0.00175 l
  20% of mill use based on Softwood SE CORRIM Report: transporation on-site
- Heat; onsite boiler; hardwood mill; average [US]: 0.525 MJ; provider Heat, onsite boiler, hardwood mill average, NE-NC
  Heat for facility heating
- Bark; hardwood; green; at logyard [US]: 0.186 kg; provider Roundwood, hardwood, green, at logyard, NE-NC
  Weight reported on an ovendry basis. Moisture content (ovendry basis) = 87%
- Electricity, at grid [RNA]: 0.0999 kWh; provider Electricity, Eastern US, 2014
  45.0% of total electricity is used for sawing and based on 1.0 m^3 planed dried lumber
- Electricity; onsite boiler; hardwood mill; average [US]: 0.00171 kWh; provider Heat, onsite boiler, hardwood mill average, NE-NC
  45.0% of total electricity is used for sawing and based on 1.0 m^3 planed dried lumber
- Roundwood; hardwood; green; at logyard [US]: 0.00313 m3; provider Roundwood, hardwood, green, at logyard, NE-NC
  Weight reported on an ovendry basis. Moisture content (ovendry basis) = 87%
- Recycling, wood waste, unspecified: 0.000481 kg
- Gasoline, combusted in equipment [RNA]: 0.000152 l
  20% of mill use based on Softwood SE CORRIM Report: transporation on-site
- Disposal, solid waste, unspecified, to inert material landfill: 0.0162 kg

## Emissions to nature
- Particulate matter [emission, air, troposphere, rural]: 0.002483 kg

## Allocation factors
- causal, Wood chips; hardwood; green; at sawmill, for Natural gas, combusted in industrial equipment, 1.357 m3/kg, 52.13 MJ/kg: 0.14586
- causal, Wood chips; hardwood; green; at sawmill, for Recycling, wood waste, unspecified: 0.14586
- causal, Hogged fuel; hardwood; green; at sawmill, for Roundwood; hardwood; green; at logyard: 0
- causal, Hogged fuel; hardwood; green; at sawmill, for Particulate matter: 0
- causal, Wood fuel; hardwood; green; at sawmill, for Roundwood; hardwood; green; at logyard: 0.131995
- causal, Sawn lumber; hardwood; rough; green; at sawmill, for Gasoline, combusted in equipment: 0
- physical, Wood chips; hardwood; green; at sawmill: 0.14586
- economic, Wood fuel; hardwood; green; at sawmill: 0.131995
- physical, Sawn lumber; hardwood; rough; green; at sawmill: 0
- causal, Wood chips; hardwood; green; at sawmill, for Bark; hardwood; green; at logyard: 0.14586
- causal, Bark; hardwood; green; at sawmill, for Recycling, wood waste, unspecified: 0
- causal, Hogged fuel; hardwood; green; at sawmill, for Disposal, solid waste, unspecified, to inert material landfill: 0
- causal, Sawdust; hardwood; green; at sawmill, for Particulate matter: 0.0444235
- causal, Wood fuel; hardwood; green; at sawmill, for Diesel, combusted in industrial equipment: 0.131995
- causal, Sawn lumber; hardwood; rough; green; at sawmill, for Natural gas, combusted in industrial equipment, 1.357 m3/kg, 52.13 MJ/kg: 0
- causal, Wood chips; hardwood; green; at sawmill, for Particulate matter: 0.14586
- causal, Wood fuel; hardwood; green; at sawmill, for Electricity; onsite boiler; hardwood mill; average: 0.131995
- causal, Sawdust; hardwood; green; at sawmill, for Heat; onsite boiler; hardwood mill; average: 0.0444235
- causal, Sawdust; hardwood; green; at sawmill, for Electricity; onsite boiler; hardwood mill; average: 0.0444235
- causal, Hogged fuel; hardwood; green; at sawmill, for Recycling, wood waste, unspecified: 0
- causal, Wood chips; hardwood; green; at sawmill, for Electricity, at grid: 0.14586
- causal, Wood fuel; hardwood; green; at sawmill, for Recycling, wood waste, unspecified: 0.131995
- causal, Wood chips; hardwood; green; at sawmill, for Diesel, combusted in industrial equipment: 0.14586
- causal, Hogged fuel; hardwood; green; at sawmill, for Electricity; onsite boiler; hardwood mill; average: 0
- causal, Sawn lumber; hardwood; rough; green; at sawmill, for Recycling, wood waste, unspecified: 0
- causal, Hogged fuel; hardwood; green; at sawmill, for Gasoline, combusted in equipment: 0
- causal, Sawn lumber; hardwood; rough; green; at sawmill, for Electricity, at grid: 0
- causal, Bark; hardwood; green; at sawmill, for Disposal, solid waste, unspecified, to inert material landfill: 0
- physical, Wood fuel; hardwood; green; at sawmill: 0.131995
- physical, Bark; hardwood; green; at sawmill: 0
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
## Sampling procedure
Questionnaires from 20 mills (17 companies) from the 20 states of Forest Service (FS) Northeastern (NE) Region. Hardwood sawmills were members of the Hardwood Manufacturer Association (HMA).

## Intended application
Only mass allocation factors are available for the multi-functional processes (disregard economic allocation factor values-they are mass allocation factors).

## Sources
- Forest Products Laboratory
- Richard D. Bergman
- Forest Products Laboratory
- Maureen Puettmann
- Andrew J. Baker
- NHLA
