# Marine piling, softwood, CCA treated, SE

Dataset: openLCA process, unit process
Category: 31-33: Manufacturing/3211: Sawmills and Wood Preservation
Geography: United States
Time period: 2004-12-31 to 2009-12-30
Allocation method: no allocation
Generated by: Chris Bolin;
Reviewer: Paul Cooper
Published in: Chris Bolin
restrictionsDescription: All information can be accessed by everybody.
copyright: false

## General comment
Pressure-treated chromated copper arsenate (CCA) softwood debarked logs seasoned (poles) for use in marine applications. Base process data presented with allocations to within process co-products noted. Refer to allocation worksheet for specifics. All allocations performed using mass or volume., This sheet sets out each unit process in the production of one cubic meter of CCA treated softwood marine piling as produced in the US Southeast. Important note: although most of the data in the US LCI database has undergone some sort of review, the database as a whole has not yet undergone a formal validation process. Please email comments to lci@nrel.gov.; Geography: US Southeast

## Technology
typical

## Geography
US Southeast

## Time period
2005-2009

## Reference product
- Marine piling; softwood; CCA treated [US]: 1 m3
  Retention = 1.32 lb/ft3 = 21.15 kg/m3

## Inputs from technosphere
- Natural gas, combusted in industrial equipment, 1.357 m3/kg, 52.13 MJ/kg [RNA]: 0.00066 m3; provider Natural gas, combusted in industrial equipment
  Preservative Wood Treatment; surrogate for LPG
- Transport, train, diesel powered [RNA]: 50 t*km
  Preservative Production; 11% of Cr transport; 5% of As Transport; survey data
- Gasoline, combusted in equipment [RNA]: 0.036 l
  Preservative Production
- Disposal, solid waste, unspecified, to unspecified landfill: 2.9 kg
  Preservative Wood Treatment; Solid waste disposal associated with metals mining. Solid waste disposal as reported in treater surveys as other (normal trash or municipal waste). Other waste disposal—Amount of normal trash or municipal waste that is typically collected in trash cans or dumpsters.
- Roundwood; softwood; debarked; at plywood mill [US]: 49.31 kg
  519 kg/m3; 9.5% air dried
- Diesel, combusted in industrial boiler [RNA]: 0.34 l
  Preservative Wood Treatment
- Diesel, combusted in industrial boiler [RNA]: 0.59 l
  Preservative Production
- Residual fuel oil, combusted in industrial boiler [RNA]: 1.16 l
  Preservative Production
- Gasoline, combusted in equipment [RNA]: 0.16 l
  Preservative Wood Treatment
- Diesel, combusted in industrial equipment [RNA]: 5.03 l
  Preservative Wood Treatment
- Electricity, at grid [RNA]: 37 kWh; provider Electricity, Eastern US, 2014
  Preservative Wood Treatment
- Roundwood; softwood; debarked; at plywood mill [US]: 370.1 kg
  519 kg/m3; 71.3% purchased green
- Transport, ocean freighter, residual fuel oil powered [US]: 540 t*km
  Preservative Production; 95% of As transport; 9% or Cr transport; survey data
- Electricity, at grid [RNA]: 230 kWh; provider Electricity, Eastern US, 2014
  Preservative Production
- Wood waste, unspecified, combusted in industrial boiler [RNA]: 83.2 kg
  Preservative Wood Treatmentbased on green moisture content 50%
- Roundwood; softwood; debarked; at plywood mill [US]: 99.13 kg
  519 kg/m3; 19% purchased dried; energy inputs to dry wood on site is included.
- Natural gas, combusted in industrial boiler [RNA]: 2.3 m3
  Preservative Wood Treatment
- Disposal, solid waste, unspecified, to unspecified landfill: 30 kg
  Preservative Production; Solid waste disposal associated with metals mining. Solid waste disposal as reported in treater surveys as other (normal trash or municipal waste). Other waste disposal—Amount of normal trash or municipal waste that is typically collected in trash cans or dumpsters.
- Bituminous coal, combusted in industrial boiler [RNA]: 0.0873 kg
  Preservative Production
- Transport, combination truck, diesel powered [RNA]: 26.31 t*km
  Preservative Production; 80% of Cr transport; 100% of Cu transport; survey data
- Disposal, solid waste, unspecified, to unspecified treatment: 0.357 kg
  Preservative Production; Hazardous and Process waste disposed—Amount of hazardous waste for the survey year and units (pounds, tons, drums, etc.). Chemical and process waste disposed—Amount of waste and units from the treatment process, such as from tanks, treatment equipment, and drip pad area, but not including hazardous waste. This may be regulated in your state as chemical, industrial, or special waste.
- Transport, combination truck, diesel powered [RNA]: 180 t*km
  Preservative Wood Treatment; 100% piles; 100% CCA concentrate; survey data
- Copper Chromium Arsenate (CCA), at plant: 21 kg
  Preservative Wood Treatment
- Natural gas, combusted in industrial boiler [RNA]: 2.3 m3
  Preservative Production

## Inputs from nature
- Water [resource, water]: 680000 kg
  Preservative Production
- Water [resource, water]: 290000 kg
  Preservative Wood Treatment

## Emissions to nature
- Nitrogen oxides [emission, air, troposphere, rural]: 0.0604 kg
  Preservative Production
- Sulfur dioxide [emission, air, troposphere, rural]: 0.0186 kg
  Preservative Production
- Particulate matter, ≤ 10μm [emission, air, troposphere, rural]: 0.654 kg
  Preservative Production
- Carbon monoxide [emission, air, troposphere, rural]: 0.0263 kg
  Preservative Production
- Arsenic [emission, water]: 6.37e-5 kg
  Preservative Wood Treatment; storm water runoff; unspecified location
- Nitrous oxide [emission, air, troposphere, rural]: 4.59e-5 kg
  Preservative Production
- Carbon dioxide [emission, air, troposphere, rural]: 11.8 kg
  Preservative Production
- Copper [emission, water]: 0.000108 kg
  Preservative Wood Treatment; storm water runoff; unspecified location
- Volatile organic compounds [emission, air, troposphere, rural]: 0.0127 kg
  Preservative Wood Treatmentat kiln; emission from the wood product being dried
- Chromium [emission, water]: 0.000248 kg
  Preservative Wood Treatment; storm water runoff; unspecified location
- Mercury [emission, air, troposphere, rural]: 2.11e-7 kg
  Preservative Production
- Methane [emission, air, troposphere, rural]: 0.00102 kg
  Preservative Production
- Sulfur oxides [emission, air, troposphere, rural]: 0.000141 kg
  Preservative Production

## Sampling procedure
Industry survey

## Sources
- Chris Bolin
- Chris Bolin
