# Veneer, hardwood, dry, at veneer mill, E

Dataset: openLCA process, unit process
Category: 31-33: Manufacturing/3212: Veneer, Plywood, and Engineered Wood Product Manufacturing
Geography: United States
Time period: 2006-12-31 to 2006-12-31
Allocation method: physical allocation
Generated by: Maureen Puettmann
Published in: Richard D. Bergman
restrictionsDescription: All information can be accessed by everybody.
copyright: false

## General comment
All weights given on an ovendry basis. All moisture contents are on an ovendry basis. MC% =(weight of water in wood / weight of oven dry wood) *100. Reference to specific gravities use oven dry mass and volumes at specified moisture contents. Reference to densities use mass and volume at specified moistrue contents.

Important note: although most of the data in the US LCI database has
undergone some sort of review, the database as a whole has not yet
undergone a formal validation process.
Please email comments to lci@nrel.gov.

## Technology
Typical

## Geography
E= Eastern US United States. The states included MN, IA, MO, WI, IL, NJ, OH, IN, MI, WV, PA, MD, DW, NJ, NY, ME, VT, NH, RI, MA, CT, VA, KY, AR, LA, MS, AL, FL,GA, NC, SC, and TN

## Reference product
- Veneer; hardwood; dry; at veneer mill [US]: 1 kg
  Based on a weighted average green density and specific gravity of 613 kg/m3 and 0.578. Moisture content (ovendry basis) = 6.0%.

## By-products
- Wood fuel; hardwood; dry; at veneer mill [US]: 0.0085981 kg
  (same comment as for Veneer; hardwood; dry; at veneer mill)
- Clippings; hardwood; dry; at veneer mill [US]: 0.0057944 kg
  (same comment as for Veneer; hardwood; dry; at veneer mill)

## Inputs from technosphere
- Natural gas, combusted in industrial equipment, 1.357 m3/kg, 52.13 MJ/kg [RNA]: 8.2804e-7 l; provider Natural gas, combusted in industrial equipment
  Amount of natural gas consumed during conditioning. Represents 14.3% of mill use of natural gas; proxy for propane
- Diesel, combusted in industrial equipment [RNA]: 0.00066355 l
  Amount of diesel consumed during veneer drying. Represents 5% of mill use of diesel
- Gasoline, combusted in equipment [RNA]: 0.00016019 l
  Amount of gasoline consumed during veneer drying. Represents 14.3% of mill use of gasoline
- Electricity, at grid [RNA]: 0.024974 kWh; provider Electricity, Eastern US, 2014
  Amount of electricity consumed during veneer drying. Represents 1.2% of mill use of electricity. 1 kilowatt hour = 3.6 megajoule.
- Veneer; hardwood; green; at veneer mill [US]: 1.015 kg; provider Veneer, hardwood, green, at veneer mill, E
  Weight reported on an ovendry basis. Moisture content (ovendry basis) = 85%
- Heat; drying veneer; hardwood; at veneer mill [US]: 7.0477 MJ; provider Heat, drying veneer, hardwood, at veneer mill, E
  Represents 71.2% veneer mill heat energy consumption
- Electricity, at grid [RNA]: 0.091381 kWh; provider Electricity, Eastern US, 2014
  Electricity used for emission control devices at the veneer mill; Represents 4.4% of mill use of electricity.

## Emissions to nature
- Methanol [emission, air, troposphere, rural]: 5.7944e-5 kg
  EPA data
- Volatile organic compounds [emission, air, troposphere, rural]: 0.00056075 kg
  Two mills reporting VOCs during veneer drying.
- Phenol [emission, air, troposphere, rural]: 2.8037e-6 kg
  EPA data
- Hydrocarbons [emission, air, troposphere, rural]: 0.00079439 kg
  EPA data (total hydrocarbons as C per EPA Method 25A)
- Acetaldehyde [emission, air, troposphere, rural]: 0.00018692 kg
  One mill reported acetaldehyde emissions during veneer drying.
- Formaldehyde [emission, air, troposphere, rural]: 7.1028e-6 kg
  EPA data
- Carbon monoxide [emission, air, troposphere, rural]: 0.00010075 kg
  EPA data
- Acetone [emission, air, troposphere, rural]: 4.7664e-5 kg
  EPA Plywood Manufacturing—Emission Factor Documentation, AP-42, Chapter 10, Table 10.5-3, 2002
- Particulate matter [emission, air, troposphere, rural]: 0.0003271 kg
  EPA data

## Allocation factors
- causal, Veneer; hardwood; dry; at veneer mill, for Volatile organic compounds: 0.985812
- causal, Wood fuel; hardwood; dry; at veneer mill, for Particulate matter: 0.00847611
- causal, Clippings; hardwood; dry; at veneer mill, for Hydrocarbons: 0.00571219
- causal, Wood fuel; hardwood; dry; at veneer mill, for Formaldehyde: 0.00847611
- causal, Wood fuel; hardwood; dry; at veneer mill, for Hydrocarbons: 0.00847611
- causal, Clippings; hardwood; dry; at veneer mill, for Diesel, combusted in industrial equipment: 0.00571219
- causal, Veneer; hardwood; dry; at veneer mill, for Particulate matter: 0.985812
- causal, Veneer; hardwood; dry; at veneer mill, for Carbon monoxide: 0.985812
- causal, Wood fuel; hardwood; dry; at veneer mill, for Electricity, at grid: 0.00847611
- causal, Wood fuel; hardwood; dry; at veneer mill, for Methanol: 0.00847611
- causal, Veneer; hardwood; dry; at veneer mill, for Electricity, at grid: 0.985812
- causal, Veneer; hardwood; dry; at veneer mill, for Heat; drying veneer; hardwood; at veneer mill: 0.985812
- causal, Wood fuel; hardwood; dry; at veneer mill, for Natural gas, combusted in industrial equipment, 1.357 m3/kg, 52.13 MJ/kg: 0.00847611
- causal, Wood fuel; hardwood; dry; at veneer mill, for Veneer; hardwood; green; at veneer mill: 0.00847611
- causal, Clippings; hardwood; dry; at veneer mill, for Electricity, at grid: 0.00571219
- causal, Wood fuel; hardwood; dry; at veneer mill, for Carbon monoxide: 0.00847611
- causal, Clippings; hardwood; dry; at veneer mill, for Gasoline, combusted in equipment: 0.00571219
- causal, Veneer; hardwood; dry; at veneer mill, for Diesel, combusted in industrial equipment: 0.985812
- causal, Clippings; hardwood; dry; at veneer mill, for Natural gas, combusted in industrial equipment, 1.357 m3/kg, 52.13 MJ/kg: 0.00571219
- causal, Clippings; hardwood; dry; at veneer mill, for Electricity, at grid: 0.00571219
- causal, Wood fuel; hardwood; dry; at veneer mill, for Diesel, combusted in industrial equipment: 0.00847611
- causal, Veneer; hardwood; dry; at veneer mill, for Formaldehyde: 0.985812
- causal, Clippings; hardwood; dry; at veneer mill, for Volatile organic compounds: 0.00571219
- physical, Veneer; hardwood; dry; at veneer mill: 0.985812
- causal, Veneer; hardwood; dry; at veneer mill, for Hydrocarbons: 0.985812
- causal, Veneer; hardwood; dry; at veneer mill, for Gasoline, combusted in equipment: 0.985812
- causal, Wood fuel; hardwood; dry; at veneer mill, for Heat; drying veneer; hardwood; at veneer mill: 0.00847611
- causal, Wood fuel; hardwood; dry; at veneer mill, for Acetone: 0.00847611
- economic, Veneer; hardwood; dry; at veneer mill: 0.985812
- causal, Clippings; hardwood; dry; at veneer mill, for Phenol: 0.00571219
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
## Sampling procedure
Questionnaires from 4 veneer and 5 flooring mills in the E. United States representing 32 states.

## Intended application
Only mass allocation factors are available for the multi-functional processes (disregard economic allocation factor values-they are mass allocation factors).

## Sources
- Richard D. Bergman
- Maureen Puettmann
