# Transport, light commercial truck, gasoline powered, East North Central

Dataset: openLCA process, unit process
Category: 48-49: Transportation and Warehousing/4841: General Freight Trucking
Geography: Northern America
Time period: 2009-12-31 to 2009-12-31
Allocation method: no allocation
Generated by: Nathan Hardesty
Published in: U.S. Environmental Protection Agency (EP
restrictionsDescription: All information can be accessed by everybody.
copyright: false

## General comment
This dataset represents the East North Central U.S. (IA, MI, MN, WI (Reference 10)) average airborne emissions for operating a gasoline powered light commercial truck. The inventory includes all vehicle operation processes, including off-network and refueling activities.
The refinery-to-pump transportation and distribution data are calculated from Argonne National Laboratory's GREET 1.8d.1 model.
The vehicle operation data are calculated from EPA's MOVES2010a model, using the assumptions described in the corresponding detailed spreadsheet. Emissions factors in MOVES2010a are largely based on EPA's Mobile Source Observation Database, which in turn includes data from a variety of vehicle studies (References 6-8).
MOVES2010a acknowledges sources of uncertainty in the model structure, the population and acitivty data, and other model parameters. As of July 2011, the uncertainty calculation function of the model has not been activated.

## Technology
Combustion of gasoline in a light commercial truck.

## Geography
US

## Reference product
- Transport, light commercial truck, gasoline powered [RNA]: 1 t*km

## Inputs from technosphere
- Transport, combination truck, average fuel mix [RNA]: 0.066962 t*km
- Transport, ocean freighter, average fuel mix [RNA]: 0.572503 t*km
- Transport, pipeline, unspecified petroleum products [RNA]: 0.657275 t*km
- Transport, train, diesel powered [RNA]: 0.12502 t*km
- Gasoline, at refinery: 0.229954 l; provider Petroleum refining, at refinery
- Transport, barge, average fuel mix [RNA]: 0.0433829 t*km

## Emissions to nature
- Carbon dioxide [emission, air]: 0.534718 kg
- Particulate matter, ≤ 10μm [emission, air]: 3.8047e-5 kg
  PM10 from organic carbon, elemental carbon, and sulfate particulates.
- Particulate matter, ≤ 10μm [emission, air]: 1.95674e-5 kg
  PM10 from brakewear.
- Nitrogen dioxide [emission, air]: 0.00017477 kg
- Hydrocarbons [emission, air]: 0.00129281 kg
- Methane [emission, air]: 7.46541e-5 kg
- Nitrogen oxides [emission, air]: 0.00159936, 0.00177413 kg (2 entries)
- Volatile organic compounds [emission, air]: 0.00133779 kg
- Particulate matter, ≤ 10μm [emission, air]: 6.03004e-6 kg
  PM10 from tirewear.
- Sulfur dioxide [emission, air]: 1.04387e-5 kg
- Nitrous oxide [emission, air]: 4.05808e-5 kg
- Particulate matter, ≤ 2.5μm [emission, air]: 5.12236e-6 kg
  PM2.5 from brakewear.
- Ammonia [emission, air]: 3.94034e-5 kg
- Carbon monoxide [emission, air]: 0.0167498 kg
- Particulate matter, ≤ 2.5μm [emission, air]: 3.50341e-5 kg
  PM2.5 from organic carbon, elemental carbon, and sulfate particulates.
- Particulate matter, ≤ 2.5μm [emission, air]: 1.44605e-6 kg
  PM2.5 from tirewear.

## Sources
- Assessment and Standards Division, Offic
- National Institute of Standards and Tech
- Wang, M.
- National Climatic Data Center, National
- U.S. Alternative Fuels and Advanced Vehi
- U.S. Environmental Protection Agency (EP
- Eastern Research Group
- Assessment and Standards Division, Offic
- Transportation Characteristics Branch, U
- EPA
