# Polyethylene terephthalate, PET, virgin resin, at plant, kg

Dataset: openLCA process, unit process
Category: 31-33: Manufacturing/3252: Resin, Synthetic Rubber, and Artificial and Synthetic Fibers and Filaments Manufacturing
Geography: Northern America
Time period: 2014-12-31 to 2015-11-30
Allocation method: no allocation
Data quality: US EPA - Process Pedigree Matrix (4;1)
Generated by: Franklin Associates, A Division of ERG
Owner: NAPCOR
Reviewer: Franklin Associates, A Division of ERG
Published in: Franklin Associates (2019) Cradle-to-Resin LCA PET for NAPCOR
restrictionsDescription: These U.S. LCI Database Project data ("Data") are provided by the National Renewable Energy Laboratory ("NREL"), operated by the Alliance for Sustainable Energy, LLC ("Alliance") for the US Department of Energy ("DOE") under Contract No. DE-AC36-08GO28308. The United States Government (the "Government") retains and the user acknowledges that the Government retains a non-exclusive, paid-up, irrevocable, worldwide license to publish or reproduce the published form of these data, or allow others to do so, for Government purposes.
Access to and use of these Data shall impose the following obligations on the user, as set forth in this Agreement. The user is granted the right, without any fee or cost, to use, copy, modify, alter, enhance and distribute these Data for any purpose whatsoever, provided that this entire notice appears in all copies of the Data. Any modification, alteration or enhancement of these data shall be identified and documented by the user. Further, the user agrees to credit the DOE/NREL/Alliance in any publication that results from the use of these Data. The names DOE/NREL/Alliance, however, may not be used in any advertising or publicity to endorse or promote any products or commercial entities unless specific written permission is obtained from DOE/NREL/Alliance. The user also understands that DOE/NREL/Alliance is not obligated to provide the user with any support, consulting, training or assistance of any kind with regard to the use of these Data or to provide the user with any updates, revisions or new versions of these Data.
YOU AGREE TO INDEMNIFY THE GOVERNMENT AND DOE/NREL/ALLIANCE, AND ITS SUBSIDIARIES, AFFILIATES, OFFICERS, AGENTS, AND EMPLOYEES AGAINST ANY CLAIM OR DEMAND, INCLUDING REASONABLE ATTORNEYS' FEES, RELATED TO YOUR USE OF THESE DATA. THESE DATA ARE PROVIDED BY DOE/NREL/ALLIANCE "AS IS" AND ANY EXPRESS OR IMPLIED WARRANTIES, INCLUDING BUT NOT LIMITED TO, THE IMPLIED WARRANTIES OF MERCHANTABILITY AND FITNESS FOR A PARTICULAR PURPOSE ARE DISCLAIMED. IN NO EVENT SHALL THE GOVERNMENT OR DOE/NREL/ALLIANCE BE LIABLE FOR ANY SPECIAL, INDIRECT OR CONSEQUENTIAL DAMAGES OR ANY DAMAGES WHATSOEVER, INCLUDING BUT NOT LIMITED TO CLAIMS ASSOCIATED WITH THE LOSS OF DATA OR PROFITS, WHICH MAY RESULT FROM AN ACTION IN CONTRACT, NEGLIGENCE OR OTHER TORTIOUS CLAIM THAT ARISES OUT OF OR IN CONNECTION WITH THE ACCESS, USE OR PERFORMANCE OF THESE DATA.
copyright: false

## General comment
Includes material and energy requirements and environmental emissions for one kilogram of polyethylene terepthalate resin production. In this analysis, PET resin is only considered to be manufactured by the esterification of PTA with ethylene glycol and loss of water. No PET from dimethyl terephthalate (DMT) is considered in this dataset. PET from DMT are still used in North America for creating specialized products from PET, but these amounts are small compared to the use of PTA as a source for PET. The average data in this analysis includes PET resin manufactured using three technologies; melt phase and solid-state polymerization (SSP), melt-to-resin (MTR®) and Integrex®. A simplified description of each technology used is provided below.

Most commonly, melt phase and solid-state polymerization is used to manufacture PET resin. This process requires two polymerization steps. The first polymerization step, the melt phase polymerization, is the esterification of ethylene glycol and PTA yielding a loss of water under high pressure and temperature. This step produces a low intrinsic viscosity PET pellets suitable for making clothing. A second polymerization step, solid-state polymerization, is used to achieve bottle-grade PET. This step raises the temperature of the solid pellets in the absence of oxygen and water. Polymer chains lengthen by using vacuum or inert gas. Temperature, pressure and the diffusion of by-products from inside the pellet are key to accomplishing SSP.

Melt-to-Resin (MTR®) technology is used by one of the data providers. In addition to ethylene glycol and purified terephthalic acid feedstocks, isophthalic acid and other additives are used in a melt phase polymerization. This technology uses a 2-reactor process that produces a resin with a high intrinsic viscosity, making it unnecessary to undergo additional steps required by solid state polymerization.

The patented Integrex® technology is used in one data provider producing PET resin. This technology differs from the other technologies used in the stage from the paraxylene feeding, through the production of PET. This technology integrates the paraxylene-to-PTA and PTA-to-PET steps, which were separated for this analysis to create horizontal averages of each unit process.

## Technology
Polyethylene terephthalate (PET) virgin resin production at plant. The technology represented by the PET data includes melt phase and solid-state polymerization (SSP), melt-to-resin (MTR®) and Integrex®.

## Geography
LCI data for the production of PET resin were collected from three producers (seven plants) in North America – all in the United States. All companies provided data for the year 2015. The captured production amount is approximately 50 percent[1] of the available capacity for all PET resin production in North America in 2015. Small amounts (less than 1 percent of total output) of off-spec/trim/scrap resin are produced as coproducts during this process. A mass basis was used to allocate the credit for the coproduct. The average TPA/PTA and PET datasets were reviewed and accepted respectively by each TPA/PTA and PET data provider.

[1] Plastics Insight, 2016. Global PET Resin Production Capacity. October 12, 2016 Available at: https://www.plasticsinsight.com/global-pet-resin-production-capacity/ Calculations performed by Franklin Associates.

## Time period
All primary data were collected from 2015.

## Reference product
- Polyethylene terephthalate, PET, virgin resin, at plant, kg: 1 kg

## By-products
- Recovered energy, for Polyethylene terephthalate (PET) virgin resin: 0.016 MJ
  Energy recovered from WTE.

## Inputs from technosphere
- Natural gas, combusted in industrial boiler [RNA]: 0.062 m3
- Diesel, combusted in industrial equipment [RNA]: 2.5e-8 m3
- Transport, ocean freighter, average fuel mix [RNA]: 1.53 t*km
- Transport, train, diesel powered [RNA]: 0.33 t*km
- Bituminous coal, combusted in industrial boiler [RNA]: 0.00087 kg
- Transport, pipeline, natural gas [RNA]: 0.00024 t*km
- Transport, combination truck, diesel powered [RNA]: 0.019 t*km
- Electricity, at grid [RNA]: 0.23 kWh; provider Electricity, at Grid, US, 2010
- Transport, barge, average fuel mix [RNA]: 0.13 t*km
- Ethylene glycol, at plant, kg: 0.3452 kg; provider Ethylene glycol, materials production, organic compound, at plant, kg
  This includes mono ethylene glycol, diethylene glycol, and bio ethylene glycol
- Purified terephthalic acid, PTA, at plant, kg: 0.8599 kg
  This includes isophalic acid as PTA is the closest surrogate to isophalic acid
- Residual fuel oil, combusted in industrial boiler [RNA]: 9.8e-9 m3

## Inputs from nature
- Titanium [resource, ground]: 0.0001 kg
  This data was reported by fewer than three companies. To protect the confidentiality of individual company responses, the data is reported only by order of magnitude.
- Cobalt [resource, ground]: 1e-5 kg
  (same comment as for Titanium)
- Antimony [resource, ground]: 0.0001 kg
  (same comment as for Titanium)
- Water [resource, water]: 0.73 kg

## Waste to treatment
- Recycling, solid waste, to recycling or reuse: 0.00077 kg
  Non hazardous waste recovery
- Disposal, solid waste, to incineration without energy recovery: 3.4e-6 kg
  Non hazardous waste to incineration
- Disposal, solid waste, process, to sanitary landfill: 0.00047 kg
  Non hazardouse waste to landfill
- Disposal, solid waste, to incineration with energy recovery: 0.00068 kg
  Non hazardous waste to WTE
- Disposal, hazardous waste, to incineration without energy recovery: 4.8e-6 kg
  Hazardous waste to incineration

## Emissions to nature
- 1,4-Dioxane [emission, water]: 1e-5 kg
  This data was reported by fewer than three companies. To indicate known emissions while protecting the confidentiality of individual company responses, the emission is reported only by order of magnitude.
- Acetaldehyde [emission, water]: 1e-5 kg
  (same comment as for 1,4-Dioxane)
- Particulate matter [emission, air]: 1e-5 kg
- Hydrocarbons [emission, air]: 1e-5 kg
  (same comment as for 1,4-Dioxane)
- Acetaldehyde [emission, air]: 1e-5 kg
  (same comment as for 1,4-Dioxane)
- Suspended solids, inorganic [emission, water]: 1e-5 kg
  (same comment as for 1,4-Dioxane)
- Particulate matter, ≤ 2.5μm [emission, air]: 2.2e-5 kg
- Lead [emission, water]: 1e-11 kg
  (same comment as for 1,4-Dioxane)
- Biphenyl [emission, air]: 1e-6 kg
  (same comment as for 1,4-Dioxane)
- Chemical Oxygen Demand [emission, water]: 0.00057 kg
- Phenol [emission, water]: 1e-9 kg
  (same comment as for 1,4-Dioxane)
- Nitrate [emission, water]: 1e-6 kg
  Nitrate as N
- Toluene [emission, air]: 1e-6 kg
  (same comment as for 1,4-Dioxane)
- Particulate matter, ≤ 10μm [emission, air]: 6.2e-6 kg
  Represents PM > 2.5 and <10.
- Magnesium [emission, water]: 1e-5 kg
  (same comment as for 1,4-Dioxane)
- Nickel [emission, water]: 1e-9 kg
  (same comment as for 1,4-Dioxane)
- Ammonia [emission, water]: 1e-6 kg
  (same comment as for 1,4-Dioxane)
- 1,4-Dioxane [emission, air]: 1e-6 kg
  (same comment as for 1,4-Dioxane)
- Ethylene glycol [emission, air]: 4.9e-5 kg
- Aldehydes, unspecified [emission, air]: 1e-6 kg
  (same comment as for 1,4-Dioxane)
- Xylene [emission, air]: 1e-8 kg
  (same comment as for 1,4-Dioxane)
- Antimony [emission, water]: 1e-7 kg
  (same comment as for 1,4-Dioxane)
- Furan [emission, air]: 1e-8 kg
  (same comment as for 1,4-Dioxane)
- Aluminum [emission, water]: 1e-6 kg
  (same comment as for 1,4-Dioxane)
- Oils, unspecified [emission, water]: 1e-6 kg
  (same comment as for 1,4-Dioxane)
- Cyanide [emission, water]: 1e-9 kg
  (same comment as for 1,4-Dioxane)
- Ammonia [emission, air]: 1e-6 kg
  (same comment as for 1,4-Dioxane)
- Zinc [emission, water]: 1e-8 kg
  (same comment as for 1,4-Dioxane)
- Ethylene glycol [emission, water]: 0.0001 kg
  (same comment as for 1,4-Dioxane)
- Iron [emission, water]: 1e-5 kg
  (same comment as for 1,4-Dioxane)
- Biological Oxygen Demand [emission, water]: 0.00011 kg
- Nitrogen [emission, water]: 1e-6 kg
  Best surrogate for Total Organic Nitrogen
- Bromide [emission, water]: 1e-6 kg
  (same comment as for 1,4-Dioxane)
- Sulfate [emission, water]: 0.0001 kg
  (same comment as for 1,4-Dioxane)
- Orthophosphate [emission, water]: 1e-6 kg
  (same comment as for 1,4-Dioxane)
- Fluoride [emission, water]: 1e-7 kg
  (same comment as for 1,4-Dioxane)

## Allocation factors
- causal, Polyethylene terephthalate, PET, virgin resin, at plant, kg, for 1,4-Dioxane: 1
- causal, Recovered energy, for Polyethylene terephthalate (PET) virgin resin, for Natural gas, combusted in industrial boiler: 0
- causal, Polyethylene terephthalate, PET, virgin resin, at plant, kg, for Acetaldehyde: 1
- causal, Polyethylene terephthalate, PET, virgin resin, at plant, kg, for Nickel: 1
- causal, Recovered energy, for Polyethylene terephthalate (PET) virgin resin, for Water: 0
- causal, Polyethylene terephthalate, PET, virgin resin, at plant, kg, for Antimony: 1
- causal, Recovered energy, for Polyethylene terephthalate (PET) virgin resin, for Cyanide: 0
- causal, Polyethylene terephthalate, PET, virgin resin, at plant, kg, for Bituminous coal, combusted in industrial boiler: 1
- causal, Recovered energy, for Polyethylene terephthalate (PET) virgin resin, for Disposal, solid waste, process, to sanitary landfill: 0
- causal, Recovered energy, for Polyethylene terephthalate (PET) virgin resin, for Antimony: 0
- causal, Polyethylene terephthalate, PET, virgin resin, at plant, kg, for Ethylene glycol: 1
- causal, Recovered energy, for Polyethylene terephthalate (PET) virgin resin, for Chemical Oxygen Demand: 0
- causal, Polyethylene terephthalate, PET, virgin resin, at plant, kg, for Transport, train, diesel powered: 1
- physical, Recovered energy, for Polyethylene terephthalate (PET) virgin resin: 0
- causal, Polyethylene terephthalate, PET, virgin resin, at plant, kg, for Ethylene glycol, at plant, kg: 1
- causal, Polyethylene terephthalate, PET, virgin resin, at plant, kg, for Fluoride: 1
- causal, Polyethylene terephthalate, PET, virgin resin, at plant, kg, for Oils, unspecified: 1
- causal, Recovered energy, for Polyethylene terephthalate (PET) virgin resin, for Purified terephthalic acid, PTA, at plant, kg: 0
- causal, Polyethylene terephthalate, PET, virgin resin, at plant, kg, for Natural gas, combusted in industrial boiler: 1
- causal, Polyethylene terephthalate, PET, virgin resin, at plant, kg, for Particulate matter, ≤ 10μm: 1
- causal, Polyethylene terephthalate, PET, virgin resin, at plant, kg, for Disposal, solid waste, process, to sanitary landfill: 1
- causal, Recovered energy, for Polyethylene terephthalate (PET) virgin resin, for Cobalt: 0
- causal, Polyethylene terephthalate, PET, virgin resin, at plant, kg, for Ammonia: 1
- causal, Polyethylene terephthalate, PET, virgin resin, at plant, kg, for Aluminum: 1
- causal, Recovered energy, for Polyethylene terephthalate (PET) virgin resin, for 1,4-Dioxane: 0
- causal, Recovered energy, for Polyethylene terephthalate (PET) virgin resin, for Acetaldehyde: 0
- causal, Recovered energy, for Polyethylene terephthalate (PET) virgin resin, for Ammonia: 0
- causal, Polyethylene terephthalate, PET, virgin resin, at plant, kg, for Sulfate: 1
- causal, Recovered energy, for Polyethylene terephthalate (PET) virgin resin, for Recycling, solid waste, to recycling or reuse: 0
- causal, Recovered energy, for Polyethylene terephthalate (PET) virgin resin, for Antimony: 0
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
## Inventory method
Compatible with TRACI

## Modelling constants
LCI data for the production of PET resin were collected from three producers (seven plants) in North America – all in the United States. All companies provided data for the year 2015. Mass allocation was used to allocate all inputs and outputs to each product and co-products.

## Completeness
Data evaluation procedures and criteria were applied consistently to all primary data provided by the participating producers for all data collected. All primary data obtained specifically for this study were considered the most representative available for the systems studied. Data sets were reviewed for completeness and material balances, and follow-up was conducted as needed to resolve any questions about the input and output flows, process technology, etc. The aggregated averaged datasets were also reviewed by the providing companies as compared to the provided dataset. Companies were requested to review whether their data were complete and to comment about their or the average dataset.

## Data selection
All PET production data was sourced from primary producers.

## Data treatment
A weighted average was calculated from the data collected and used to develop the LCA model. Small amounts (less than 1 percent of total output) of off-spec/trim/scrap resin are produced as coproducts during this process. A mass basis was used to allocate the credit for the coproduct. The average TPA/PTA and PET datasets were reviewed and accepted respectively by each PET data provider.

## Sampling procedure
BOUNDARY CONDITIONS: The system boundary includes (1) raw material extraction (e.g., extraction of petroleum and natural gas as feedstocks for PET production), (2) ) intermediate material processing, including incoming transportation for each process through PTA and Ethylene Glycol production, and (3) manufacturing of PET, including incoming transportation for each material.
DATA COLLECTION: The primary data for the life cycle inventory of the production of PET, were collected from three producers (seven plants) located in the United States in 2015. A weighted average was calculated from the data collected and used to develop the LCA model. For this process the data sets are based on actual plant data reported by plant personnel. Supporting background data were drawn from credible, widely used databases including the US LCI database, GREET, and Ecoinvent.
UNCERTAINTY ESTIMATION: Primary data collected from actual facilities are considered the best available data for representing industry operations. In this study, primary data were used to model the PET production. All data received were carefully evaluated before compiling the production-weighted average data sets used to generate results. No uncertainty analysis was carried out due to the lack of uncertainty data or probability distributions for key parameters, which are often only available as single point estimates from the producers.

## Review details
Internal review of data entry proofreading, mass balance verification and data documentation.

## Intended application
"Accounting, with system-external interactions" - The intended application is a purely descriptive accounting / documentation of the analysed system including existing interactions with other systems in the LCI model. These data are an update to a previously published dataset which is a generic unit process data.

## Sources
- Franklin Associates (2019) Cradle-to-Resin LCA PET for NAPCOR
