# Transport, combination truck, long-haul, diesel powered, Northeast

Dataset: openLCA process, unit process
Category: 48-49: Transportation and Warehousing/4841: General Freight Trucking
Geography: Northern America
Time period: 2009-12-31 to 2009-12-31
Allocation method: no allocation
Generated by: Nathan Hardesty
Published in: U.S. Environmental Protection Agency (EP
restrictionsDescription: All information can be accessed by everybody.
copyright: false

## General comment
This dataset represents the Northeast U.S. (ME, NH, VT, MA, CT, RI, NY, PA, NJ, MD, DE, DC (Reference 11)) average airborne emissions for operating a diesel powered, combination truck in a long-haul manner (trips greater than 200 miles [322 km]). The inventory includes all vehicle operation processes, including off-network and refueling activities.
The refinery-to-pump transportation and distribution data are calculated from Argonne National Laboratory's GREET 1.8d.1 model.
The vehicle operation data are calculated from EPA's MOVES2010a model, using the assumptions described in the corresponding detailed spreadsheet. Emissions factors in MOVES2010a are largely based on EPA's Mobile Source Observation Database, which in turn includes data from a variety of vehicle studies (References 7-9).
MOVES2010a acknowledges sources of uncertainty in the model structure, the population and acitivty data, and other model parameters. As of July 2011, the uncertainty calculation function of the model has not been activated.

## Technology
Combustion of diesel in a combination, long-haul truck.

## Geography
US

## Reference product
- Transport, combination truck, long-haul, diesel powered [RNA]: 1 t*km

## Inputs from technosphere
- Transport, ocean freighter, average fuel mix [RNA]: 0.065514 t*km
- Transport, barge, average fuel mix [RNA]: 0.00926909 t*km
- Transport, pipeline, unspecified petroleum products [RNA]: 0.0965943 t*km
- Diesel, at refinery: 0.0297281 l; provider Petroleum refining, at refinery
- Transport, train, diesel powered [RNA]: 0.0178832 t*km
- Transport, combination truck, average fuel mix [RNA]: 0.0095831 t*km

## Emissions to nature
- Carbon dioxide [emission, air]: 0.0780518 kg
- Nitrogen oxides [emission, air]: 0.000519842, 0.000571822 kg (2 entries)
- Particulate matter, ≤ 10μm [emission, air]: 6.61806e-7 kg
  PM10 from tirewear.
- Sulfur dioxide [emission, air]: 1.30338e-6 kg
- Particulate matter, ≤ 10μm [emission, air]: 2.41794e-6 kg
  PM10 from brakewear.
- Methane [emission, air]: 3.99582e-6 kg
- Ammonia [emission, air]: 9.53892e-7 kg
- Particulate matter, ≤ 2.5μm [emission, air]: 1.58707e-7 kg
  PM2.5 from tirewear.
- Volatile organic compounds [emission, air]: 3.87737e-5 kg
- Particulate matter, ≤ 10μm [emission, air]: 2.57491e-5 kg
  PM10 from organic carbon, elemental carbon, and sulfate particulates.
- Particulate matter, ≤ 2.5μm [emission, air]: 2.49776e-5 kg
  PM2.5 from organic carbon, elemental carbon, and sulfate particulates.
- Nitrogen dioxide [emission, air]: 5.19796e-5 kg
- Hydrocarbons [emission, air]: 3.76045e-5 kg
- Particulate matter, ≤ 2.5μm [emission, air]: 6.32969e-7 kg
  PM2.5 from brakewear.
- Nitrous oxide [emission, air]: 7.83319e-8 kg
- Carbon monoxide [emission, air]: 0.000152958 kg

## Sources
- Assessment and Standards Division, Offic
- National Institute of Standards and Tech
- Wang, M.
- National Climatic Data Center, National
- U.S. Alternative Fuels and Advanced Vehi
- U.S. Environmental Protection Agency (EP
- Eastern Research Group
- EPA
- Assessment and Standards Division, Offic
- Transportation Characteristics Branch, U
- EPA
