# Slack wax, at plant, US SE

Dataset: openLCA process, unit process
Category: 31-33: Manufacturing/3241: Petroleum and Coal Products Manufacturing
Geography: United States
Allocation method: no allocation
Generated by: Jamie Meil
Published in: Dr. Earl Kline
restrictionsDescription: All information can be accessed by everybody.
copyright: true

## General comment
Base process data presented with allocations to within process co-products noted. Refer to allocation worksheet for specifics. All allocations performed using mass or volume., UK profile adjusted for US production
Important note: although most of the data in the US LCI database has
undergone some sort of review, the database as a whole has not yet
undergone a formal validation process.
Please email comments to lci@nrel.gov.

## Technology
Typical

## Geography
US Southeast

## Reference product
- Slack wax; at plant [US]: 1 kg

## Inputs from technosphere
- Transport, combination truck, average fuel mix [RNA]: 2.3 t*km
- Natural gas, combusted in industrial boiler [RNA]: 7.05e-5 m3
- Electricity, at grid [RNA]: 0.00278 kWh; provider Electricity, Eastern US, 2014
- Diesel, combusted in industrial boiler [RNA]: 0.0322 l
- Crude oil, at production [RNA]: 1.02 kg
  Used as feedstock
- Disposal, chemical waste, unspecified, to residual material landfill: 0.00028 kg

## Emissions to nature
- Suspended solids, inorganic [emission, water]: 5e-5 kg
- Biological Oxygen Demand [emission, water]: 5e-6 kg
- Carbon monoxide [emission, air]: 0.0535 kg
- Acid compounds [emission, water]: 2.5e-5 kg
- Particulate matter [emission, air]: 0.149 kg
- Nitrogen oxides [emission, air]: 0.00595 kg
- Dissolved Organic Matter [emission, water]: 1.6e-5 kg
- Chemical Oxygen Demand [emission, water]: 1e-5 kg
- Methane [emission, air]: 0.000363 kg

## Sources
- Maureen Puetmann
- Leonard R. Johnson
- Dr. Earl Kline
