# E-glass, at plant

Dataset: openLCA process, unit process
Category: 31-33: Manufacturing/3279: Other Nonmetallic Mineral Product Manufacturing
Geography: United States
Time period: 2010-12-31 to 2011-12-31
Allocation method: no allocation
Generated by: Franklin Associates
Published in: American Composites Manufacturers Assn.
restrictionsDescription: All information can be accessed by everybody.
copyright: false

## General comment
The outgoing solid wastes were provided as universal waste and likely include packaging from incoming materials, office wastes, and floor wastes, which are not shown as inputs. This may affect the mass balance of this system. Complete inventory data and metadata are shown in full in the final report, Life Cycle Inventory of Polymer Composites. The report is not publicly available. This report has been extensively reviewed within Franklin Associates by Rebe Feraldi, Anne Marie Molen, and Melissa Huff and has undergone partial critical review by ACMA members. Important note: although most of the data in the US LCI database has undergone some sort of review, the database as a whole has not yet undergone a formal validation process. Please email comments to lci@nrel.gov.

## Technology
To produce glass fibers suitable for reinforcement, raw materials such as silica sand, limestone, clay, fluorspar, colemanite, dolomite, borates, and others are combined in a batch. This batch is sent to a refractory-lined glass furnace to gradually melt the raw materials required into liquid molten form. The molten glass is extruded through bushings, which contain bundles of very small holes, to produce E-Glass fibers with diameters in the 5-25 micron range. These fibers are then coated with a sizing solution. This sizing helps protect the glass fibers for processing. It also ensures proper bonding to the resin matrix. The individual fibers are then bundled together in large numbers to provide a roving.

## Geography
US

## Reference product
- E-glass, at plant [US]: 1 kg

## Inputs from technosphere
- Electricity, at grid [RNA]: 1.2721 kWh; provider Electricity, at Grid, US, 2010
- Clay, at mine: 0.35 kg
- Transport, combination truck, diesel powered [RNA]: 0.065969 t*km
  Individual amounts of each incoming material were multiplied by the incoming distance travelled. These are totaled weighted averages of the primary incoming transport data from each participating facility.
- Limestone, at mine [RNA]: 0.32 kg
- Silicone dioxide, at plant: 0.31 kg
- Natural gas, combusted in industrial boiler [RNA]: 0.24303 m3
- Soda powder, at plant [RNA]: 0.059 kg
  Adapted using soda powder from trona mining and processing as a proxy for "ulexite, at mine" because ulexite is associated with trona deposits and is found in CA and NV.
- Ethylene glycol, at plant, kg: 0.00032 kg; provider Ethylene glycol, materials production, organic compound, at plant, kg
- Liquefied petroleum gas, combusted in industrial boiler [RNA]: 0.00021878 l
- Transport, ocean freighter, average fuel mix [RNA]: 0.31215 t*km
  (same comment as for Transport, combination truck, diesel powered)
- Limestone, at mine [RNA]: 0.074 kg
  Limestone is used as a proxy for flint with quartz inputs from nature.
- Borax, anhydrous, powder, at plant: 0.018 kg
  Adapted from ecoinvent module "Borax, anhydrous, powder, at plant" to reflect use of energy and material inputs for the U.S. context.
- Limestone, at mine [RNA]: 0.0086 kg
  Limestone mining is used as a proxy for magnesite to approximate energy and emissions.
- Quicklime, at plant [RNA]: 0.032 kg
  Quicklime is used as a surrogate for Burnt lime within the US LCI Database.
- Disposal, solid waste, unspecified, to sanitary landfill: 0.16349 kg
  These outgoing solid wastes were provided as universal waste and likely include packaging from incoming materials, office wastes, and floor wastes, which are not shown as inputs. This may affect the mass balance of this system.
- Residual fuel oil, combusted in industrial boiler [RNA]: 0.00011148 l
- Limestone, at mine [RNA]: 0.0078 kg
  Limestone is used as a proxy for dolomite.
- Calcium borates, at plant: 0.0052 kg
  Adapted "Calcium borates, at plant" from ecoinvent as a proxy for Colmanite to reflect use of energy and material inputs for the U.S. context. Borates processing used as proxy as colemanite is a borate mineral: CaB3O4(OH)3·H2O.
- Epoxy, resin, at plant: 0.0028 kg
  Diglycidyl ether of bisphenol-A (DGEBA) is a typical epoxy resin and is used to reflect energy and material inputs for the U.S. context. A DGEBA Epoxy resin is produced from a reaction between epichlorohydrin and bisphenol-A, though the latter may be replaced by similar chemicals.
- Boric acid, at plant: 0.013 kg
  Data compiled for ACMA project; processing, HCl, and various reactants from Franklin Associates Private Library and borax adapted from ecoinvent.
- Transport, train, diesel powered [RNA]: 0.5535 t*km
  (same comment as for Transport, combination truck, diesel powered)

## Inputs from nature
- Water [resource, water]: 6.4803 kg
  Franklin Associates uses a default as opposed to Egalitarian approach in collecting data for water use. During data collection, water use data were only requested and compiled in terms of 'evaporative' or consumptive use (i.e., ultimate withdraws, evaporation, or incorporation into the product). Data were not collected to determine reliable averages for non-evaporative water use. In other words, averages for water inputs and outputs are not available for this unit process. Consumptive use includes: water incorporated into the product, water evaporated during the process, and/or water used and released to a body other than that from which it was drawn.

## Emissions to nature
- Styrene [emission, air]: 0.00022 kg
- Volatile organic compounds [emission, air]: 0.00058884 kg
- Xylene [emission, air]: 5.6e-5 kg
- Sulfur oxides [emission, air]: 0.000416 kg
- Methanol [emission, air]: 8.3e-5 kg
- Organic compounds [emission, air]: 6.7e-5 kg
- Nitrogen oxides [emission, air]: 0.00015 kg
- Hydrofluoric acid [emission, air]: 4.6e-5 kg
- Carbon monoxide [emission, air]: 2.3e-5 kg
- Particulate matter, ≤ 10μm [emission, air]: 0.00086834 kg

## Sampling procedure
Data are from primary sources. The general grade fiberglass producers who provided data for this module verified that the characteristics of their plants are representative of US E-glass production facilities. Data was collected from 3 of the companies producing E-glass in the US. The representativeness of the E-Glass production are unknown, but estimated to be greater than 50% of the US production volume.

## Sources
- American Composites Manufacturers Assn.
