# Toluene, at plant

Dataset: openLCA process, unit process
Category: 31-33: Manufacturing/3241: Petroleum and Coal Products Manufacturing
Geography: Northern America
Time period: 1991-12-31 to 1991-12-31
Allocation method: no allocation
Generated by: Franklin Associates
Published in: THE PLASTICS DIVISION OF THE AMERICAN C
restrictionsDescription: All information can be accessed by everybody.
copyright: false

## General comment
Products obtained from the platforming process include aromatic compounds (benzene, toluene, xylene), chemical hydrogen, light gas, and liquefied petroleum gas. Complete inventory data and metadata are available in full in the final report and appendices, Cradle-to-Gate Life Cycle Inventory of Nine Plastic Resins and Four Polyurethane Precursors. This report has been extensively reviewed within Franklin Associates and has undergone partial critical review by ACC Plastics Division members and is available at: www.americanchemistry.com. Quantities may vary slightly between the reference to main source and and this module due to rounding. Important note: although most of the data in the US LCI database has undergone some sort of review, the database as a whole has not yet undergone a formal validation process. Please email comments to lci@nrel.gov.

## Technology
Catalytic reforming of light petroleum distillate (naphtha)

## Geography
Europe

## Reference product
- Toluene, at plant [RNA]: 1 kg
  MATERIAL USE

## Inputs from technosphere
- Transport, train, diesel powered [RNA]: 0.028 t*km
- Disposal, solid waste, unspecified, to sanitary landfill: 2.15e-5 kg
- Transport, pipeline, unspecified petroleum products [RNA]: 0.345 t*km
- Transport, combination truck, diesel powered [RNA]: 0.0439 t*km
- Residual fuel oil, combusted in industrial boiler [RNA]: 0.0484 l
- Natural gas, combusted in industrial boiler [RNA]: 0.0246 m3
- Transport, barge, diesel powered [RNA]: 0.0549 t*km
  Values for barge transport are calculated based on average fuel consumption rates as reported in Transportation Energy Data Book: Edition 22 from Oak Ridge National Laboratory, September 2002: 22% of barges use diesel fuel in their engines, 78% use residual oil to generate steam for steam turbines, and a barge that consumes residual oil consumes 3.4 gallons per 1,000 ton-miles
- Electricity, at grid [RNA]: 0.0239 kWh; provider Electricity, at Grid, US, 2010
- Transport, barge, residual fuel oil powered [RNA]: 0.182 t*km
  (same comment as for Transport, barge, diesel powered)
- Petroleum refining, for olefins production, at plant [RNA]: 1 kg
- Diesel, combusted in industrial equipment [RNA]: 0.005 l
  Includes diesel fuel and distillate oil amounts.

## Emissions to nature
- Particulate matter [emission, air]: 1.98e-5 kg
- Carbon dioxide [emission, air]: 0.0452 kg
- Carbon monoxide [emission, air]: 5.05e-6 kg
- Oil and grease, unspecified [emission, water]: 1.78e-5 kg
- Biological Oxygen Demand [emission, water]: 0.000701 kg
- Total dissolved solids [emission, water]: 0.000105 kg
- Nitrogen oxides [emission, air]: 6.23e-5 kg
- Sulfide [emission, water]: 3.29e-6 kg
- Sulfur oxides [emission, air]: 0.000443 kg
- Chemical Oxygen Demand [emission, water]: 0.00108 kg

## Sampling procedure
Data are from primary sources.

## Sources
- THE PLASTICS DIVISION OF THE AMERICAN C
