# Electricity, at eGrid, NYLI, 2008

Dataset: openLCA process, unit process
Category: 22: Utilities/2211: Electric Power Generation, Transmission and Distribution
Geography: Northern America
Time period: 2007-12-31 to 2007-12-31
Allocation method: no allocation
Generated by: Alberta Carpenter
Published in: Chris Goemans, Athena Institute
restrictionsDescription: All information can be accessed by everybody.
copyright: false

## General comment
The methodology used to put together the grid information is outlined in reference 1.

## Technology
Typical

## Geography
New York City and Westchester County, NY

## Reference product
- Electricity, at grid [RNA]: 1 kWh

## Inputs from technosphere
- Electricity, diesel, at power plant [RNA]: 0.0278509 kWh
  Petroleum (DFO) – Distillate Fuel Oil (includes all Diesel and No. 1, No. 2, and No. 4 Fuel Oils)
- Electricity, natural gas, at power plant [RNA]: 0.71716 kWh
  Natural Gas
- Electricity, residual fuel oil, at power plant [RNA]: 0.164939 kWh
  Petroleum (RFO) – Residual Fuel Oil (includes No. 5 and No. 6 Fuel Oils and Bunker C Fuel Oil)
- Electricity, biomass, gas, landfill, at power plant: 0.000326962 kWh
  Gaseous Renewable Fuels (Biomass) LFG - landfill gas
- Electricity, MSW, non-biogenic, at power plant: 0.0362214 kWh
  Other Fuels MSN – Municipal Solid Waste – Non-biogenic components
- Electricity, diesel, at power plant [RNA]: 0.00740046 kWh
  Petroleum (DFO) KER - kerosene
- Electricity, biomass, solid, biogenic MSW, at power plant: 0.0461007 kWh
  Solid Renewable Fuels (Biomass) MSB – Municipal Solid Waste – Biogenic Component

## Sampling procedure
based on EIA electricity reports for all power plants in the US.

## Sources
- EIA
- EIA
- EIA
- Chris Goemans, Athena Institute
- US DOE
- International Energy Agency
- Statistics Canada
- EIA
- Statistics Canada
- EIA
- EIA
- US DOE
- EIA
- USEPA
- Statistics Canada
- unspecified
- Statistics Canada
- EIA
- EIA
- EIA
- Statistics Canada
- USEPA
- Statistics Canada
- EIA
