# Electricity, at eGrid, ERCT, 2010

Dataset: openLCA process, unit process
Category: 22: Utilities/2211: Electric Power Generation, Transmission and Distribution
Geography: Northern America
Time period: 2009-12-31 to 2009-12-31
Allocation method: no allocation
Generated by: Samantha Wascavage
Published in: Chris Goemans, Athena Institute
restrictionsDescription: All information can be accessed by everybody.
copyright: false

## General comment
The methodology used to put together the grid information is outlined in reference 1.

## Technology
Typical

## Geography
Texas except for small portions in the panhandle (SPSO), western Texas (AZNM) and eastern Texas (SRMV).

## Reference product
- Electricity, at grid [RNA]: 1 kWh

## Inputs from technosphere
- Electricity, biomass,liquid, unspecified, at power plant: 0.000205 kWh
  BLQ – Black Liquor also includes, OBL, SLW, WDL
- Electricity, petroleum coke, at power plant: 0.000483 kWh
  Petroleum (Other Fossil) PC - petroleum coke also includes SG, WO
- Electricity, bituminous coal, at power plant [RNA]: 0.218664 kWh
  subbituminous coal
- Electricity, lignite coal, at power plant [RNA]: 0.067324 kWh
- Electricity, hydropower, at power plant, unspecified: 0.004599 kWh
- Electricity, other fuels, unspecified, at power plant: 0.001219 kWh
  Other Fuels OTH - Other (Batteries, Chemicals, Coke Breeze, Hydrogen, Pitch, Sulfur, Tar Coal, and miscellaneous technologies also includes MSN, PUR, WH)
- Electricity, at wind power plant, unspecified: 0.065732 kWh
- Electricity, other gases, unspecified, at power plant: 0.009003 kWh
  Other Gases OG - Other Gas (Butane, Coal Processes, Coke-Oven, Refinery, and other processes also includes BFG, PG)
- Electricity, diesel, at power plant [RNA]: 0.000305 kWh
  Petroleum (DFO) - Distillate Fuel Oil (includes all Diesel and No. 1, No. 2, and No. 4 Fuel Oils also includes JF, KER)
- Electricity, natural gas, at power plant [RNA]: 0.481102 kWh
- Electricity, nuclear, at power plant [RNA]: 0.15065 kWh
- Electricity, biomass, gas, landfill, at power plant: 0.000747 kWh
  Gaseous Renewable Fuels (Biomass) LFG - landfill gas and OBG

## Sampling procedure
based on EIA electricity reports for all power plants in the US.

## Sources
- EIA
- EIA
- Statistics Canada
- Statistics Canada
- Chris Goemans, Athena Institute
- EIA
- USEPA
- EIA
- Statistics Canada
- EIA
- Statistics Canada
- EIA
- unspecified
- EIA
- USEPA
- EIA
- EIA
- Statistics Canada
- US DOE
- International Energy Agency
- EIA
