# Electricity, at Grid, RFC, 2010

Dataset: openLCA process, unit process
Category: 22: Utilities/2211: Electric Power Generation, Transmission and Distribution
Geography: Northern America
Time period: 2009-12-31 to 2009-12-31
Allocation method: no allocation
Generated by: Samantha Wascavage
Published in: Chris Goemans, Athena Institute
restrictionsDescription: All information can be accessed by everybody.
copyright: false

## General comment
The methodology used to put together the grid information is outlined in reference 1.

## Technology
Typical

## Geography
Delaware, District of Columbia, Indiana, Maryland, New Jersey, Ohio, Pennsylvania and West Virginia and parts of Kentucky, Michigan, Tennessee, Virginia and Wisconsin.

## Reference product
- Electricity, at grid [RNA]: 1 kWh

## Inputs from technosphere
- Electricity, bituminous coal, at power plant [RNA]: 0.412241 kWh
  BIT, SC, SGC, WC - Anthracite Coal, and Bituminous Coal.
- Electricity, biomass, at power plant [RNA]: 0.013815 kWh
  WDS, AB, MSB, MSW, OBS, TDF – Wood/Wood Waste Solids (Paper Pellets, Railroad Ties, Utility Poles, Wood Chips, and other wood solids)
- Electricity, solar, unspecified, at power plant: 1e-6 kWh
  SUN – Solar (Photovoltaic, Thermal)
- Electricity, diesel, at power plant [RNA]: 0.015288 kWh
  DFO, JF, KER – Distillate Fuel Oil (includes all Diesel and No. 1, No. 2, and No. 4 Fuel Oils)
- Electricity, biomass,liquid, unspecified, at power plant: 0.001182 kWh
  BLQ, OBL, SLW, WDL – Black Liquor
- Electricity, biomass, gas, landfill, at power plant: 0.002636 kWh
  LFG, OBG – Landfill Gas
- Electricity, residual fuel oil, at power plant [RNA]: 0.000394 kWh
  RFO – Residual Fuel Oil (includes No. 5 and No. 6 Fuel Oils and Bunker C Fuel Oil)
- Electricity, bituminous coal, at power plant [RNA]: 0.156007 kWh
  SUB – Subbituminous Coal
- Electricity, petroleum coke, at power plant: 0.001429 kWh
  PC, SG, WO – Petroleum Coke
- Electricity, nuclear, at power plant [RNA]: 0.267741 kWh
  NUC – Nuclear (Uranium, Plutonium, Thorium)
- Electricity, hydropower, at power plant, unspecified: 0.005882 kWh
  WAT – Water (Conventional, Pumped Storage)
- Electricity, other fuels, unspecified, at power plant: 0.003686 kWh
  OTH, MSN, PUR, WH – Other (Batteries, Chemicals, Coke Breeze, Hydrogen, Pitch, Sulfur, Tar Coal, and miscellaneous technologies)
- Electricity, at wind power plant, unspecified: 0.007197 kWh
  WND – Wind
- Electricity, natural gas, at power plant [RNA]: 0.108673 kWh
  NG – Natural Gas
- Electricity, other gases, unspecified, at power plant: 0.003828 kWh
  OG, BFG, PG – Other Gas (Butane, Coal Processes, Coke-Oven, Refinery, and other processes)

## Sampling procedure
based on EIA electricity reports for all power plants in the US.

## Sources
- EIA
- EIA
- Statistics Canada
- Statistics Canada
- Chris Goemans, Athena Institute
- EIA
- USEPA
- EIA
- Statistics Canada
- EIA
- Statistics Canada
- EIA
- unspecified
- EIA
- USEPA
- EIA
- EIA
- Statistics Canada
- US DOE
- International Energy Agency
- EIA
