# Transport, single unit truck, long-haul, gasoline powered, Northeast region

Dataset: openLCA process, unit process
Category: 48-49: Transportation and Warehousing/4841: General Freight Trucking
Geography: Northern America
Time period: 2009-12-31 to 2009-12-31
Allocation method: no allocation
Generated by: Nathan Hardesty
Published in: U.S. Environmental Protection Agency (EP
restrictionsDescription: All information can be accessed by everybody.
copyright: false

## General comment
This dataset represents the Northeast U.S. (CT, DC, DE, ME, MD, MA, NH, NJ, NY, PA, RI, VT (Reference 11)) average airborne emissions for operating a gasoline powered, single unit truck in a long-haul manner (trips greater than 200 miles [322 km]). The inventory includes all vehicle operation processes, including off-network and refueling activities.
The refinery-to-pump transportation and distribution data are calculated from Argonne National Laboratory's GREET 1.8d.1 model.
The vehicle operation data are calculated from EPA's MOVES2010a model, using the assumptions described in the corresponding detailed spreadsheet. Emissions factors in MOVES2010a are largely based on EPA's Mobile Source Observation Database, which in turn includes data from a variety of vehicle studies (References 7-9).
MOVES2010a acknowledges sources of uncertainty in the model structure, the population and acitivty data, and other model parameters. As of July 2011, the uncertainty calculation function of the model has not been activated.

## Technology
Combustion of gasoline in a single unit, long-haul truck.

## Geography
US

## Reference product
- Transport, single unit truck, long-haul, gasoline powered [RNA]: 1 t*km

## Inputs from technosphere
- Transport, combination truck, average fuel mix [RNA]: 0.0399363 t*km
- Transport, pipeline, unspecified petroleum products [RNA]: 0.392001 t*km
- Transport, train, diesel powered [RNA]: 0.0745624 t*km
- Transport, barge, average fuel mix [RNA]: 0.0258737 t*km
- Transport, ocean tanker, average fuel mix: 0.341442 t*km
- Gasoline, at refinery: 0.137145 l; provider Petroleum refining, at refinery

## Emissions to nature
- Carbon dioxide [emission, air]: 0.318919 kg
- Nitrogen oxides [emission, air]: 0.00110964, 0.00121235 kg (2 entries)
- Volatile organic compounds [emission, air]: 0.000482437 kg
- Nitrogen dioxide [emission, air]: 0.000102715 kg
- Nitrous oxide [emission, air]: 1.48171e-5 kg
- Particulate matter, ≤ 2.5μm [emission, air]: 4.8884e-6 kg
  PM2.5 from brakewear.
- Particulate matter, ≤ 10μm [emission, air]: 5.75719e-6 kg
  PM10 from organic carbon, elemental carbon, and sulfate particulates.
- Carbon monoxide [emission, air]: 0.0106109 kg
- Particulate matter, ≤ 10μm [emission, air]: 3.42213e-6 kg
  PM10 from tirewear.
- Ammonia [emission, air]: 1.32098e-5 kg
- Particulate matter, ≤ 10μm [emission, air]: 1.86737e-5 kg
  PM10 from brakewear.
- Hydrocarbons [emission, air]: 0.000466788 kg
- Particulate matter, ≤ 2.5μm [emission, air]: 5.3013e-6 kg
  PM2.5 from organic carbon, elemental carbon, and sulfate particulates.
- Methane [emission, air]: 1.70631e-5 kg
- Sulfur dioxide [emission, air]: 6.22596e-6 kg
- Particulate matter, ≤ 2.5μm [emission, air]: 8.20655e-7 kg
  PM2.5 from tirewear.

## Sources
- Assessment and Standards Division, Offic
- National Institute of Standards and Tech
- Wang, M.
- National Climatic Data Center, National
- U.S. Alternative Fuels and Advanced Vehi
- U.S. Environmental Protection Agency (EP
- Eastern Research Group
- Assessment and Standards Division, Offic
- Alam, M.
- Transportation Characteristics Branch, U
- EPA
