# Electricity, at eGrid, SPNO, 2010

Dataset: openLCA process, unit process
Category: 22: Utilities/2211: Electric Power Generation, Transmission and Distribution
Geography: Northern America
Time period: 2009-12-31 to 2009-12-31
Allocation method: no allocation
Generated by: Samantha Wascavage
Published in: Chris Goemans, Athena Institute
restrictionsDescription: All information can be accessed by everybody.
copyright: false

## General comment
The methodology used to put together the grid information is outlined in reference 1.

## Technology
Typical

## Geography
SPNO North electricity grid to include Kansas and western Missouri (less SRMW).

## Reference product
- Electricity, at grid [RNA]: 1 kWh

## Inputs from technosphere
- Electricity, at wind power plant, unspecified: 0.047112 kWh
  WND – Wind
- Electricity, hydropower, at power plant, unspecified: 0.000234 kWh
  WAT – Water (Conventional, Pumped Storage)
- Electricity, nuclear, at power plant [RNA]: 0.169387 kWh
  NUC – Nuclear (Uranium, Plutonium, Thorium)
- Electricity, bituminous coal, at power plant [RNA]: 0.683809 kWh
  SUB – Subbituminous Coal
- Electricity, petroleum coke, at power plant: 0.001036 kWh
  PC, SG, WO – Petroleum Coke
- Electricity, diesel, at power plant [RNA]: 0.000793 kWh
  DFO, JF, KER – Distillate Fuel Oil (includes all Diesel and No. 1, No. 2, and No. 4 Fuel Oils)
- Electricity, natural gas, at power plant [RNA]: 0.07879 kWh
  NG – Natural Gas
- Electricity, biomass, solid, agriculture by-products, at power plant: 0.000381 kWh
  AB, MSB, MSW, OBS, TDF, WDS Agriculture Crop By-products / Straw / Energy Crops
- Electricity, other gases, unspecified, at power plant: 0.000124 kWh
  PG, BFG, OG – Propane
- Electricity, bituminous coal, at power plant [RNA]: 0.018334 kWh
  BIT, SC, SGC, WC - Anthracite Coal, and Bituminous Coal.

## Sampling procedure
based on EIA electricity reports for all power plants in the US.

## Sources
- EIA
- EIA
- Statistics Canada
- Statistics Canada
- Chris Goemans, Athena Institute
- EIA
- USEPA
- EIA
- Statistics Canada
- EIA
- Statistics Canada
- EIA
- unspecified
- EIA
- USEPA
- EIA
- EIA
- Statistics Canada
- US DOE
- International Energy Agency
- EIA
