# Electricity, at eGrid, SRSO, 2010

Dataset: openLCA process, unit process
Category: 22: Utilities/2211: Electric Power Generation, Transmission and Distribution
Geography: Northern America
Time period: 2009-12-31 to 2009-12-31
Allocation method: no allocation
Generated by: Samantha Wascavage
Published in: Chris Goemans, Athena Institute
restrictionsDescription: All information can be accessed by everybody.
copyright: false

## General comment
The methodology used to put together the grid information is outlined in reference 1.

## Technology
Typical

## Geography
SRSO South electricity grid to include most of Georgia (less SRTV) and Alabama (less STRV) and southeast Mississippi and the panhandle of Florida.

## Reference product
- Electricity, at grid [RNA]: 1 kWh

## Inputs from technosphere
- Electricity, petroleum coke, at power plant: 0.001957 kWh
  Petroleum (Other Fossil) PC, SG, WO - petroleum coke
- Electricity, biomass,liquid, unspecified, at power plant: 0.017306 kWh
  BLQ, OBL, SLW, WDL – Black Liquor
- Electricity, other fuels, unspecified, at power plant: 0.001549 kWh
  OTH, MSN, PUR, WH – Other (Batteries, Chemicals, Coke Breeze, Hydrogen, Pitch, Sulfur, Tar Coal, and miscellaneous technologies)
- Electricity, hydropower, at power plant, unspecified: 0.02937 kWh
  Hydroelectric WAT – Water (Conventional, Pumped Storage)
- Electricity, bituminous coal, at power plant [RNA]: 0.082181 kWh
  Subbituminous Coal
- Electricity, residual fuel oil, at power plant [RNA]: 0.000389 kWh
  Petroleum (RFO) – Residual Fuel Oil (includes No. 5 and No. 6 Fuel Oils and Bunker C Fuel Oil)
- Electricity, at wind power plant, unspecified: 0.013197 kWh
  WND – Wind
- Electricity, natural gas, at power plant [RNA]: 0.249241 kWh
  Natural Gas
- Electricity, bituminous coal, at power plant [RNA]: 0.371978 kWh
  Bituminous Coal BIT, SC, SGC, WC - Anthracite Coal, and Bituminous Coal.
- Electricity, other gases, unspecified, at power plant: 7e-6 kWh
  OG, BFG, PG – Other Gas (Butane, Coal Processes, Coke-Oven, Refinery, and other processes)
- Electricity, diesel, at power plant [RNA]: 0.000389 kWh
  Petroleum (DFO, JF, KER) – Distillate Fuel Oil (includes all Diesel and No. 1, No. 2, and No. 4 Fuel Oils)
- Electricity, nuclear, at power plant [RNA]: 0.224039 kWh
  Nuclear Fission NUC – Nuclear (Uranium, Plutonium, Thorium)
- Electricity, biomass, solid, agriculture by-products, at power plant: 0.008235 kWh
  Solid Renewable Fuels (Biomass) AB, MSB, MSW, OBS, TDF, WDS – Agriculture Crop By-products / Straw / Energy Crops
- Electricity, biomass, gas, landfill, at power plant: 0.000162 kWh
  Gaseous Renewable Fuels (Biomass) LFG, OBG - landfill gas

## Sampling procedure
based on EIA electricity reports for all power plants in the US.

## Sources
- EIA
- EIA
- Statistics Canada
- Statistics Canada
- Chris Goemans, Athena Institute
- EIA
- USEPA
- EIA
- Statistics Canada
- EIA
- Statistics Canada
- EIA
- unspecified
- EIA
- USEPA
- EIA
- EIA
- Statistics Canada
- US DOE
- International Energy Agency
- EIA
