# Calcium carbonate, ground, fine treated, 3 micron, at plant

Dataset: openLCA process, unit process
Category: 31-33: Manufacturing/3274: Lime and Gypsum Product Manufacturing
Geography: United States
Time period: 2013-12-30 to 2015-12-29
Allocation method: no allocation
Generated by: Sustainble Solutions Corporation
Reviewer: Industrial Ecology Consultants
Published in: Sustainable Solutions Corporation. (2016). IMA-NA Calcium Carbonate Life Cycle Assessment
restrictionsDescription: All information can be accessed by everybody.
copyright: false

## General comment
This unit process represents the gate-to-gate production of 1 kg of calcium carbonate (fine treated, 3 micron) from calcium carbonate rock (i.e., marble, limestone, or chalk) using average technologies for the contiguous United States in 2014-2015. Additional details on the technologies used in this process are available in the Technology description field at the bottom of this section.

The system boundary includes: 1) quarry operations at the mine/quarry; 2) raw material transport from quarry operations to plant processing; 3) plant processing; 4) overhead energy consumption (e.g., lighting, heating, cooling, etc.) at quarry operations and plant processing; and 5) manufacturing waste and emissions. The following processes and life cycle phases fall outside of the system boundary: 1) construction of capital equipment; 2) maintenance of operation and support equipment; 3) Human labor and employee commute; 4) final product shipping; 5) packaging; 6) product use; and 7) product disposal. Additional details regarding system boundaries are available in the Modeling and validation section in the Sampling Procedure field.

## Technology
The technologies described in this process are representative of average technologies in use in the United States from 2014-2015.

Quarry operations include mechanical extraction, primary crushing, screening, and intermediate storage of calcium carbonate rock (marble, limestone, or chalk). The output of quarry operations is then transported via barge, train, or truck to plant processing which includes washing, wet milling, flotation, cycloning, a second wet milling or thickening, mixing, wet fine grinding, drying, and final treatment.

## Geography
This unit process is reflective of U.S. production.

## Time period
This unit process is representative of operations from 2014-2015.

## Reference product
- Calcium carbonate, ground, fine treated, 3 micron, at plant [US]: 1 kg

## Inputs from technosphere
- Polyethylene terephthalate, PET, virgin resin, at plant, kg: 0.0165347 kg
  Filter bags
- Electricity, at grid [RNA]: 339.512 kWh; provider Electricity, at Grid, US, 2010
- Benzimidazole-compounds, at regional storehouse: 0.203928 kg
  Flotation agent
- Water, process: 275 kg
  Used for slurry operations
- Gasoline, combusted in equipment [RNA]: 0.0199518 l
- Residual fuel oil, combusted in industrial boiler [RNA]: 0.402344 l
- Ethylene glycol, at plant, kg: 0.00583123 kg; provider Ethylene glycol, materials production, organic compound, at plant, kg
  Heat transfer oil
- Steel, stainless 304, quarto plate [RNA]: 0.0111333 kg
  Materials for quarrying equipment and materials for screens
- Disposal, mineral waste, underground deposit: 1653.47 kg
- Transport, barge, diesel powered [RNA]: 300.931 t*km
  Raw material transport to processing plant
- Diesel, combusted in industrial equipment [RNA]: 2.30383 l
- Acetic acid, at plant [RNA]: 0.448641 kg
  Flotation agent
- Disposal, municipal solid wastes, to sanitary landfill: 0.27778 kg
- Lubricating oil: 0.000440925 kg
- Textile, woven cotton, at plant: 0.00368172 kg
  Materials for quarrying equipment
- Glycerine, at plant [RNA]: 0.244713 kg
  Flotation agent
- Polybutadiene, butadiene rubber, BR, at plant [RNA]: 0.0153221 kg
  Materials for quarrying equipment
- Transport, combination truck, diesel powered [RNA]: 25.9043 t*km
  Raw material, accessory material and fuel transport to quarry and processing plant
- Transport, train, diesel powered [RNA]: 243.611 t*km
  Raw material transport to processing plant
- Alumina, at plant [RNA]: 0.36707 kg
  Proxy for grinding media
- Mixed recyclables, at collection, curbside, weight basis [RNA]: 0.00675 kg
- Fatty acids, from palm oil, at plant: 12.1748 kg
- Kerosene, at refinery [RNA]: 0.0310852 l; provider Petroleum refining, at refinery
  Materials for quarrying equipment
- Oil and grease, at plant: 0.0809096 kg
  Materials for quarrying equipment
- Blasting: 0.924839 kg
  Explosives for quarrying
- Petroleum refining coproduct, at refinery [RNA]: 0.0167419 l
  Assumed density of 0.665 kg/l, Materials for quarrying equipment. USLCI NOTE: Flow from USLCI used as proxy for 'Naphtha, at regional storage'; note transport to regional storage not included.
- Silica sand, at plant: 0.0274476 kg
  Proxy for grinding media
- Ethylene glycol, at plant, kg: 0.0192904 kg; provider Ethylene glycol, materials production, organic compound, at plant, kg
  Antifreeze for quarrying equipment
- Lead, at regional storage: 0.000628317 kg
  Battery proxy for quarrying equipment
- Polypropylene, PP, resin, at plant [RNA]: 0.000540133 kg
  Filter sock
- Polycarboxylates, 40% active substance, at plant: 3.45484 kg
  Proxy for dispersants
- Biocide, at plant: 0.0261248 kg
- Natural gas, combusted in industrial equipment, 1.357 m3/kg, 52.13 MJ/kg [RNA]: 0.0304238 m3; provider Natural gas, combusted in industrial equipment
- Sulfuric acid, at plant: 0.000947988 kg
  Battery proxy for quarrying equipment
- Conveyor belt, at plant: 0.00035274 m
- Sodium hydroxide, production mix, at plant [US]: 0.00679024 kg; provider Chlorine, production mix, at plant
  Suspension aid
- Acrylic acid, at plant: 0.0106153 kg
  Suspension aid

## Inputs from nature
- Calcium carbonate [resource, ground]: 3.09368 kg

## Emissions to nature
- Particulate matter, ≤ 2.5μm [emission, air]: 0.000694456 kg
  Direct emissions from quarry operations and plant processing
- Particulate matter [emission, air]: 0.0313056 kg
  Direct emissions from quarry operations and plant processing
- Water [emission, air]: 275 kg
- Particulate matter, ≤ 10μm [emission, air]: 0.00677921 kg
  Direct emissions from quarry operations and plant processing

## Sampling procedure
BOUNDARY CONDITIONS
The system boundary includes: 1) quarry operations at the mine/quarry; 2) raw material transport from quarry operations to plant processing; 3) plant processing; 4) overhead energy consumption (e.g., lighting, heating, cooling, etc.) at quarry operations and plant processing; and 5) manufacturing waste and emissions.

Quarry operations include mechanical extraction, primary crushing, screening, and intermediate storage of calcium carbonate rock (marble, limestone, or chalk). Plant processing includes washing, wet milling, flotation, cycloning, a second wet milling or thickening, mixing, wet fine grinding, drying, and final treatment. Both quarry operations and plant processing include inputs of energy/fuel, water, and support materials and outputs of waste and emissions.

The following processes and life cycle phases fall outside of the system boundary: 1) construction of capital equipment; 2) maintenance of operation and support equipment; 3) human labor and employee commute; 4) final product shipping; 5) Packaging; 6) product use; and 7) product disposal.

DATA COLLECTION
Primary data were collected for both quarry operations and plant processing. These data represent 2014-2015 weighted industry averages based on production from multiple U.S. locations. Quarry operations data were collected from four companies and five locations. Plant processing data were collected from three companies and three locations.

Secondary data were taken from the ecoinvent 3.2 database (Wernet et al., 2016) and the U.S. Life Cycle Inventory Database (National Renewable Energy Laboratory, 2016). The data were global except where otherwise specified.

UNCERTAINTY ESTIMATION
Uncertainty was not quantified.

## Review details
The life cycle assessment study which produced this unit process was critically reviewed per ISO 14040 and 14044 standards by Dr. Thomas Gloria of Industrial Ecology Consultants.

## Sources
- Sustainable Solutions Corporation. (2016). IMA-NA Calcium Carbonate Life Cycle Assessment
- Institute for Environment and Sustainablility. (2011). General guide for Life Cycle Assessment - Detailed guidance.
- National Renewable Energy Laboratory (2016). U.S. Life Cycle Inventory Database.
- Wernet et al. (2016) The ecoinvent database version 3 (part I): overview and methodology.
