# Phenol resorcinol formaldehyde resin, neat, 60% solids

Dataset: openLCA process, unit process
Category: 31-33: Manufacturing/3252: Resin, Synthetic Rubber, and Artificial and Synthetic Fibers and Filaments Manufacturing
Geography: Northern America
Time period: 2004-12-31 to 2004-12-31
Allocation method: no allocation
Generated by: Maureen Puettmann
Published in: James B. Wilson
restrictionsDescription: All information can be accessed by everybody.
copyright: true

## General comment
PRF resin as liquid at 60% solids.

Important note: although most of the data in the US LCI database has
undergone some sort of review, the database as a whole has not yet
undergone a formal validation process.
Please email comments to lci@nrel.gov. This PRF process has been reviewed by 6 industry representatives and 2 reviewers from a peer review journal

## Technology
The resin manufacturing processes begin with the conversion of methanol by catalytic oxidation in a reactor vessel to produce an aqueous form of formaldehyde The methanol is first vaporized by warming, mixed with air, and then introduced into a reactor containing a metal catalyst of either silver or molybdenum/iron oxide in very small quantities. Upon exiting the reactor the formaldehyde is cooled and then sent to the absorber where it is absorbed into water to produce an aqueous solution. Heat is recovered during this process, excess steam is captured and used elsewhere in the manufacturing process. Various formaldehyde resins are then produced in a batch reactor by reacting formaldehyde with either urea, melamine, phenol, resorcinol or some combination of these. The process involves heating the mix and controlling the reaction by controlling the temperature, pH, ratio of formaldehyde to urea, phenol, melamine, resorcinol or some combination of these chemicals, and the rate of charging until the desired degree of polymerization is achieved. The reaction is quenched and then cooled. If needed, water is stripped off to provide the desired percentage of resin solids. Most of the process water is recycled and used within the production process. Very little waste is generated by resin production. Some production facilities used regenerative thermal oxidizers (RTOs), regenerative catalytic oxidizers (RCOs) and/or wet scrubbers as emission controllers to reduce the type and percentage of some emissions. RTOs and RCOs require the additional use of electricity and natural gas for their operation. It is noteworthy that essentially all production facilities started with methanol, only a very small amount (<1%) of formaldehyde was purchased for these operations, as such it was not included in the analysis.

## Geography
Average US, United States data

## Reference product
- Phenol resorcinol formaldehyde resin, neat, 60% solids [RNA]: 1 kg
  neat (liguid) PRF resin at 60% solids giving 40% water; the molar ratio of F to P+R is 0.61

## Inputs from technosphere
- Methanol, at plant, kg: 0.103 kg
  1
- Electricity, at grid [RNA]: 0.015833 kWh; provider Electricity, at Grid, US, 2010
  for emissions control equipment (RTOs and RCOs)
- Natural gas, combusted in industrial boiler [RNA]: 0.0318 m3
- Resorcinol, at plant: 0.19 kg
  100% solids
- Disposal, solid waste, unspecified, to unspecified landfill: 0.000165 kg
- Sodium hydroxide: 0.00372 kg
  100% solids
- Electricity, at grid [RNA]: 0.0831 kWh; provider Electricity, at Grid, US, 2010
  for processing
- Transport, train, diesel powered [RNA]: 0.792 t*km
  Chemical transport, wet weights. phenol = 2,507 km; methanol = 2,026 km
- Transport, combination truck, diesel powered [RNA]: 0.837 t*km
  Chemical transport, wet weight. phenol = 84 km; methanol = 421 km ; NaOH and ethanol = 143 km;, resorcinol = 4,344 km; other chemicals = 265 km
- Liquefied petroleum gas, combusted in industrial boiler [RNA]: 2.5e-5 l
  for forklifts
- Phenol, at plant: 0.277 kg
  100% solids
- Ethanol, at plant: 0.00744 kg
  1

## Inputs from nature
- Water [resource, water, subterranean]: 0.195 kg
- Water [resource, water]: 0.461 kg

## Emissions to nature
- Suspended solids, inorganic [emission, water]: 0.000164 kg
  given as TSS in survey
- Phenol [emission, air, troposphere, rural]: 4.16e-6 kg
- Phenol [emission, water]: 0.000114 kg
  given as phenol in survey
- Particulate matter [emission, air, troposphere, rural]: 3.01e-6 kg
- Formaldehyde [emission, water]: 0.000332 kg
  given as formaldehyde in survey
- Methanol [emission, air, troposphere, rural]: 5.2e-6 kg
- Formaldehyde [emission, air, troposphere, rural]: 8.8e-6 kg
- Volatile organic compounds [emission, air, troposphere, rural]: 3.38e-5 kg
  RTOs and RCOs used by some plants in survey to reduce VOC and HAP emissions
- Biological Oxygen Demand [emission, water, saline water body, ocean]: 0.00281 kg
  given as BOD in survey

## Sampling procedure
The survey represent 63% of total U.S. production of PRF resin; the production facilities were representative of U.S. production practices.

## Sources
- James B. Wilson
- James B. Wilson
