# Sawn lumber, hardwood, planed, kiln dried, at planer mill, SE

Dataset: openLCA process, unit process
Category: 31-33: Manufacturing/3211: Sawmills and Wood Preservation
Geography: United States
Time period: 2004-12-31 to 2005-12-31
Allocation method: physical allocation
Generated by: Maureen Puettmann
Published in: Richard D. Bergman
restrictionsDescription: All information can be accessed by everybody.
copyright: false

## General comment
Allocation on a mass basis.
Important note: although most of the data in the US LCI database has
undergone some sort of review, the database as a whole has not yet
undergone a formal validation process.
Please email comments to lci@nrel.gov.

## Technology
Average technology. Some data extrapolated from similar processes.

## Geography
SE = Southeast United States. The 8 states are Arkansas, Louisiana, Mississippi, Alabama, Tennessee, North Carolina, South Carolina, Georgia.

## Reference product
- Sawn lumber; hardwood; planed; kiln dried; at planer mill [US]: 1 m3
  Weight reported on an ovendry basis. Moisture content (ovendry basis) = 8.0%

## By-products
- Shavings; hardwood; kiln-dried; at planer mill [US]: 41.6 kg
  Weight reported on an ovendry basis. Moisture content (ovendry basis) = 8.0%
- Wood fuel; hardwood; kiln-dried; at planer mill [US]: 109 kg
  Weight reported on an ovendry basis. Moisture content (ovendry basis) = 8.0%
- Sawdust; hardwood; kiln-dried; at planer mill [US]: 14 kg
  Weight reported on an ovendry basis. Moisture content (ovendry basis) = 8.0%

## Inputs from technosphere
- Gasoline, combusted in equipment [RNA]: 0.0876 l
  20% of mill use
- Sawn lumber; hardwood; rough; kiln dried; at kiln [US]: 1.275 m3; provider Sawn lumber, hardwood, rough, kiln dried, at kiln, SE
  Oven-dried basis
- Natural gas, combusted in industrial equipment, 1.357 m3/kg, 52.13 MJ/kg [RNA]: 0.00708 l; provider Natural gas, combusted in industrial equipment
  20% of mill use; proxy for propane
- Electricity, at grid [RNA]: 41.6 kWh; provider Electricity, Eastern US, 2014
  25% of total electricity
- Electricity; onsite boiler; hardwood mill; average [US]: 2.32 kWh; provider Heat, onsite boiler, hardwood mill, average, SE
  25% of total electricity
- Diesel, combusted in industrial equipment [RNA]: 0.846 l
  20% of mill use

## Allocation factors
- causal, Wood fuel; hardwood; kiln-dried; at planer mill, for Natural gas, combusted in industrial equipment, 1.357 m3/kg, 52.13 MJ/kg: 0.138571
- physical, Shavings; hardwood; kiln-dried; at planer mill: 0.0528858
- physical, Sawn lumber; hardwood; planed; kiln dried; at planer mill: 0.790745
- causal, Sawdust; hardwood; kiln-dried; at planer mill, for Natural gas, combusted in industrial equipment, 1.357 m3/kg, 52.13 MJ/kg: 0.0177981
- causal, Sawdust; hardwood; kiln-dried; at planer mill, for Electricity; onsite boiler; hardwood mill; average: 0.0177981
- causal, Wood fuel; hardwood; kiln-dried; at planer mill, for Diesel, combusted in industrial equipment: 0.138571
- causal, Shavings; hardwood; kiln-dried; at planer mill, for Electricity; onsite boiler; hardwood mill; average: 0.0528858
- physical, Wood fuel; hardwood; kiln-dried; at planer mill: 0.138571
- causal, Wood fuel; hardwood; kiln-dried; at planer mill, for Sawn lumber; hardwood; rough; kiln dried; at kiln: 0.138571
- causal, Sawn lumber; hardwood; planed; kiln dried; at planer mill, for Sawn lumber; hardwood; rough; kiln dried; at kiln: 0.790745
- causal, Shavings; hardwood; kiln-dried; at planer mill, for Diesel, combusted in industrial equipment: 0.0528858
- causal, Shavings; hardwood; kiln-dried; at planer mill, for Sawn lumber; hardwood; rough; kiln dried; at kiln: 0.0528858
- causal, Sawdust; hardwood; kiln-dried; at planer mill, for Diesel, combusted in industrial equipment: 0.0177981
- causal, Wood fuel; hardwood; kiln-dried; at planer mill, for Gasoline, combusted in equipment: 0.138571
- causal, Wood fuel; hardwood; kiln-dried; at planer mill, for Electricity, at grid: 0.138571
- causal, Sawn lumber; hardwood; planed; kiln dried; at planer mill, for Electricity; onsite boiler; hardwood mill; average: 0.790745
- causal, Sawn lumber; hardwood; planed; kiln dried; at planer mill, for Gasoline, combusted in equipment: 0.790745
- physical, Sawdust; hardwood; kiln-dried; at planer mill: 0.0177981
- causal, Sawn lumber; hardwood; planed; kiln dried; at planer mill, for Diesel, combusted in industrial equipment: 0.790745
- causal, Sawn lumber; hardwood; planed; kiln dried; at planer mill, for Natural gas, combusted in industrial equipment, 1.357 m3/kg, 52.13 MJ/kg: 0.790745
- causal, Sawn lumber; hardwood; planed; kiln dried; at planer mill, for Electricity, at grid: 0.790745
- causal, Wood fuel; hardwood; kiln-dried; at planer mill, for Electricity; onsite boiler; hardwood mill; average: 0.138571
- causal, Sawdust; hardwood; kiln-dried; at planer mill, for Sawn lumber; hardwood; rough; kiln dried; at kiln: 0.0177981
- causal, Sawdust; hardwood; kiln-dried; at planer mill, for Electricity, at grid: 0.0177981
- causal, Shavings; hardwood; kiln-dried; at planer mill, for Natural gas, combusted in industrial equipment, 1.357 m3/kg, 52.13 MJ/kg: 0.0528858
- economic, Shavings; hardwood; kiln-dried; at planer mill: 0.0528858
- causal, Shavings; hardwood; kiln-dried; at planer mill, for Gasoline, combusted in equipment: 0.0528858
- causal, Sawdust; hardwood; kiln-dried; at planer mill, for Gasoline, combusted in equipment: 0.0177981
- causal, Shavings; hardwood; kiln-dried; at planer mill, for Electricity, at grid: 0.0528858
- economic, Sawdust; hardwood; kiln-dried; at planer mill: 0.0177981
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
## Sampling procedure
Questionnaires from 12 mills from the 8 states of southeast region. Hardwood sawmills were members of the Hardwood Manufacturer Association (HMA).

## Intended application
Only mass allocation factors are available for the multi-functional processes (disregard economic allocation factor values-they are mass allocation factors).

## Sources
- Forest Products Laboratory
- Forest Products Laboratory
- Richard D. Bergman
- Maureen Puettmann
- NHLA
