# Aniline, at plant

Dataset: openLCA process, unit process
Category: 31-33: Manufacturing/3251: Basic Chemical Manufacturing
Geography: Northern America
Time period: 2002-12-31 to 2003-12-31
Allocation method: no allocation
Generated by: Franklin Associates
Published in: THE PLASTICS DIVISION OF THE AMERICAN C
restrictionsDescription: All information can be accessed by everybody.
copyright: false

## General comment
The aniline dataset represented in this module includes data for nitric acid and nitrobenzene to conceal the confidential data of a provider company. Steam/heat is produced as a coproduct during this process. The energy amount for this coproduct is reported separately as recovered energy. This process has net water outputs. The mass imbalance is due to unavailability of the weight of water inputs to production and outputs to nature. Quantities may vary slightly between the reference to main source and and this module due to rounding. Important note: although most of the data in the US LCI database has undergone some sort of review, the database as a whole has not yet undergone a formal validation process. Please email comments to lci@nrel.gov.

## Technology
Hydrogenation of nitrobenzene in the presence of a copper-chromium or copper-silica catalyst, or by vapor phase ammonolysis of phenol and ammonia

## Geography
US

## Reference product
- Aniline, at plant [RNA]: 1 kg

## By-products
- Recovered energy [RNA]: 0.003045 MJ
  Credit for steam or heat co-product sold externally.

## Inputs from technosphere
- Disposal, solid waste, unspecified, to municipal incineration: 0.0005 kg
- Transport, barge, diesel powered [RNA]: 0.03628 t*km
  Values for barge transport are calculated based on average fuel consumption rates as reported in Transportation Energy Data Book: Edition 22 from Oak Ridge National Laboratory, September 2002: 22% of barges use diesel fuel in their engines, 78% use residual oil to generate steam for steam turbines, and a barge that consumes residual oil consumes 3.4 gallons per 1,000 ton-miles
- Transport, pipeline, natural gas [RNA]: 0.00024328 t*km
- Transport, train, diesel powered [RNA]: 0.081657 t*km
- Disposal, solid waste, unspecified, to waste-to-energy: 0.00156 kg
- Natural gas, combusted in industrial boiler [RNA]: 0.028155 m3
- Transport, pipeline, unspecified petroleum products [RNA]: 0.002181 t*km
- Ammonia, steam reforming, liquid, at plant: 0.149 kg
- Hydrogen, liquid, synthesis gas, at plant [RNA]: 0.063 kg
- Electricity, at cogen, for natural gas turbine [US]: 0.079586 kWh
- Electricity, at grid [RNA]: 0.16623 kWh; provider Electricity, at Grid, US, 2010
- Transport, barge, residual fuel oil powered [RNA]: 0.12063 t*km
  (same comment as for Transport, barge, diesel powered)
- Benzene, at plant [RNA]: 0.848 kg

## Inputs from nature
- Oxygen [resource, air]: 0.559 kg

## Emissions to nature
- Nitrogen oxides [emission, air]: 0.00084 kg
- Volatile organic compounds [emission, air]: 7.2e-6 kg
- Copper [emission, air]: 1e-7 kg
  This emission was reported by fewer than three companies. To indicate known emissions while protecting the confidentiality of individual company responses, the emission is reported only by order of magnitude.
- Ammonia [emission, air]: 3.3e-6 kg
- Sulfuric acid [emission, air]: 1e-8 kg
  (same comment as for Copper)
- Mercury [emission, air]: 1e-9 kg
  (same comment as for Copper)
- Hydrochloric acid [emission, air]: 1e-7 kg
  (same comment as for Copper)
- Lead [emission, air]: 1e-8 kg
  (same comment as for Copper)
- Organic compounds [emission, air]: 1e-5 kg
- Total Organic Carbon [emission, water]: 1e-5 kg
  Waterborne emissions collected for nitrobenzene and aniline included those sent to deepwell disposal. Emissions sent to deepwell disposal are not included in the table as they are not released to a water source. The following emissions were reported as being sent to deepwell disposal: toluene, phenol, 2-DNP, aniline, and nitrobenzene. This emission was reported by fewer than three companies. To indicate known emissions while protecting the confidentiality of individual company responses, the emission is reported only by order of magnitude.
- Particulate matter, > 2.5μm and ≤ 10μm [emission, air]: 4.5e-5 kg
- Perfluorocarbons [emission, air]: 1e-5 kg
  (same comment as for Copper)
- Carbon monoxide [emission, air]: 1.1e-5 kg
- HCFC-22 [emission, air]: 1e-6 kg
  (same comment as for Copper)
- Particulate matter, ≤ 2.5μm [emission, air]: 1e-5 kg
  (same comment as for Copper)
- Nickel compounds [emission, air]: 1e-6 kg
  (same comment as for Copper)
- Chlorine [emission, air]: 9.7e-8 kg
- Sulfur oxides [emission, air]: 1e-8 kg
  (same comment as for Copper)

## Allocation factors
- causal, Aniline, at plant, for HCFC-22: 1
- causal, Recovered energy, for Total Organic Carbon: 0
- causal, Recovered energy, for Particulate matter, ≤ 2.5μm: 0
- causal, Aniline, at plant, for Carbon monoxide: 1
- causal, Aniline, at plant, for Copper: 1
- causal, Aniline, at plant, for Ammonia, steam reforming, liquid, at plant: 1
- causal, Aniline, at plant, for Organic compounds: 1
- causal, Recovered energy, for Disposal, solid waste, unspecified, to municipal incineration: 0
- causal, Recovered energy, for Copper: 0
- causal, Recovered energy, for Natural gas, combusted in industrial boiler: 0
- causal, Recovered energy, for Volatile organic compounds: 0
- causal, Recovered energy, for Transport, train, diesel powered: 0
- causal, Aniline, at plant, for Perfluorocarbons: 1
- causal, Aniline, at plant, for Hydrogen, liquid, synthesis gas, at plant: 1
- causal, Aniline, at plant, for Benzene, at plant: 1
- causal, Aniline, at plant, for Chlorine: 1
- causal, Recovered energy, for Sulfur oxides: 0
- causal, Aniline, at plant, for Disposal, solid waste, unspecified, to municipal incineration: 1
- physical, Aniline, at plant: 1
- causal, Aniline, at plant, for Transport, barge, residual fuel oil powered: 1
- causal, Recovered energy, for Chlorine: 0
- causal, Aniline, at plant, for Sulfuric acid: 1
- causal, Aniline, at plant, for Hydrochloric acid: 1
- causal, Aniline, at plant, for Nickel compounds: 1
- causal, Recovered energy, for Perfluorocarbons: 0
- causal, Recovered energy, for Mercury: 0
- causal, Aniline, at plant, for Electricity, at grid: 1
- causal, Aniline, at plant, for Transport, pipeline, natural gas: 1
- causal, Aniline, at plant, for Volatile organic compounds: 1
- causal, Recovered energy, for Transport, pipeline, unspecified petroleum products: 0
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
## Sources
- THE PLASTICS DIVISION OF THE AMERICAN C
