# Heat, drying veneer, hardwood, at veneer mill, E

Dataset: openLCA process, unit process
Category: 31-33: Manufacturing/3212: Veneer, Plywood, and Engineered Wood Product Manufacturing
Geography: United States
Time period: 2006-12-31 to 2006-12-31
Allocation method: physical allocation
Generated by: Maureen Puettmann
Published in: Richard D. Bergman
restrictionsDescription: All information can be accessed by everybody.
copyright: false

## General comment
All weights given on an ovendry basis.

Important note: although most of the data in the US LCI database has
undergone some sort of review, the database as a whole has not yet
undergone a formal validation process.
Please email comments to lci@nrel.gov.

## Technology
Average Transport distance

## Geography
E= Eastern US United States. The states included MN, IA, MO, WI, IL, NJ, OH, IN, MI, WV, PA, MD, DW, NJ, NY, ME, VT, NH, RI, MA, CT, VA, KY, AR, LA, MS, AL, FL,GA, NC, SC, and TN

## Reference product
- Heat; drying veneer; hardwood; at veneer mill [US]: 3770.5 MJ
  Amount of heat consumed on-site from burning wood and fossil fuels during veneer drying. Represents 71.3% veneer mill use of heat.

## By-products
- Heat; drying stain; at engineered wood flooring mill [US]: 401 MJ
  Amount of heat energy consumed during the prefinishing process. Represents 35.7% of total process energy for flooring plant
- Heat; pressing panels; hardwood; at engineered wood flooring plant [US]: 722 MJ
  Amount of heat energy consumed during pressing. Reporesent 64.3% of flooring plant use of energy.
- Heat; block conditioning; at veneer mill [US]: 1520 MJ
  Amount of heat consumed on-site from burning wood and fossil fuels during block conditioning. Represents 28.7% veneer mill use of heat.

## Inputs from technosphere
- Liquefied petroleum gas, combusted in industrial boiler [RNA]: 5.36 l
  Process energy needed to produce 1.0 m3 engineered wood flooring; all fuel quantities listed below were multipled by using the following HHV; 20.9 MJ per OD kg for wood, 38.4 MJ per cubic meter for natural gas, 38.7 MJ per liter for fuel oil #1 and #2, 41.8 MJ per liter for fuel oil #6, and 26.6 MJ per liter for propane to determine the process energy input
- Wood fuel; hardwood; generated at mill; combusted in industrial boiler [US]: 194 kg; provider Wood fuel, hardwood, generated at mill, combusted in industrial boiler, E
- Wood fuel; hardwood; purchased; combusted in industrial boiler [US]: 106 kg; provider Wood fuel, hardwood, purchased, combusted in industrial boiler, E
- Natural gas, combusted in industrial boiler [RNA]: 0.3 m3

## Allocation factors
- causal, Heat; pressing panels; hardwood; at engineered wood flooring plant, for Natural gas, combusted in industrial boiler: 0.112575
- causal, Heat; block conditioning; at veneer mill, for Natural gas, combusted in industrial boiler: 0.237
- causal, Heat; drying stain; at engineered wood flooring mill, for Wood fuel; hardwood; generated at mill; combusted in industrial boiler: 0.0625244
- causal, Heat; drying stain; at engineered wood flooring mill, for Natural gas, combusted in industrial boiler: 0.0625244
- causal, Heat; drying stain; at engineered wood flooring mill, for Liquefied petroleum gas, combusted in industrial boiler: 0.0625244
- economic, Heat; pressing panels; hardwood; at engineered wood flooring plant: 0.112575
- causal, Heat; drying veneer; hardwood; at veneer mill, for Liquefied petroleum gas, combusted in industrial boiler: 0.587901
- causal, Heat; drying veneer; hardwood; at veneer mill, for Wood fuel; hardwood; generated at mill; combusted in industrial boiler: 0.587901
- physical, Heat; block conditioning; at veneer mill: 0.237
- causal, Heat; pressing panels; hardwood; at engineered wood flooring plant, for Wood fuel; hardwood; generated at mill; combusted in industrial boiler: 0.112575
- physical, Heat; drying stain; at engineered wood flooring mill: 0.0625244
- economic, Heat; block conditioning; at veneer mill: 0.237
- physical, Heat; drying veneer; hardwood; at veneer mill: 0.587901
- causal, Heat; block conditioning; at veneer mill, for Wood fuel; hardwood; purchased; combusted in industrial boiler: 0.237
- economic, Heat; drying veneer; hardwood; at veneer mill: 0.587901
- economic, Heat; drying stain; at engineered wood flooring mill: 0.0625244
- causal, Heat; block conditioning; at veneer mill, for Wood fuel; hardwood; generated at mill; combusted in industrial boiler: 0.237
- causal, Heat; drying veneer; hardwood; at veneer mill, for Natural gas, combusted in industrial boiler: 0.587901
- physical, Heat; pressing panels; hardwood; at engineered wood flooring plant: 0.112575
- causal, Heat; pressing panels; hardwood; at engineered wood flooring plant, for Liquefied petroleum gas, combusted in industrial boiler: 0.112575
- causal, Heat; drying stain; at engineered wood flooring mill, for Wood fuel; hardwood; purchased; combusted in industrial boiler: 0.0625244
- causal, Heat; block conditioning; at veneer mill, for Liquefied petroleum gas, combusted in industrial boiler: 0.237
- causal, Heat; drying veneer; hardwood; at veneer mill, for Wood fuel; hardwood; purchased; combusted in industrial boiler: 0.587901
- causal, Heat; pressing panels; hardwood; at engineered wood flooring plant, for Wood fuel; hardwood; purchased; combusted in industrial boiler: 0.112575

## Sampling procedure
Questionnaires from 4 veneer mills and 5 flooring plants in the E. United States representing 32 states.

## Intended application
Only mass allocation factors are available for the multi-functional processes (disregard economic allocation factor values-they are mass allocation factors).

## Sources
- Richard D. Bergman
