# Electricity, at Grid, TRE, 2010

Dataset: openLCA process, unit process
Category: 22: Utilities/2211: Electric Power Generation, Transmission and Distribution
Geography: Northern America
Time period: 2009-12-31 to 2009-12-31
Allocation method: no allocation
Generated by: Samantha Wascavage
Published in: Chris Goemans, Athena Institute
restrictionsDescription: All information can be accessed by everybody.
copyright: false

## General comment
The methodology used to put together the grid information is outlined in reference 1.

## Technology
Typical

## Geography
Texas

## Reference product
- Electricity, at grid [RNA]: 1 kWh

## Inputs from technosphere
- Electricity, at wind power plant, unspecified: 0.05716 kWh
  WND – Wind
- Electricity, other fuels, unspecified, at power plant: 0.001015 kWh
  OTH, MSN, PUR, WH – Other (Batteries, Chemicals, Coke Breeze, Hydrogen, Pitch, Sulfur, Tar Coal, and miscellaneous technologies)
- Electricity, diesel, at power plant [RNA]: 0.000326 kWh
  DFO, JF, KER – Distillate Fuel Oil (includes all Diesel and No. 1, No. 2, and No. 4 Fuel Oils)
- Electricity, petroleum coke, at power plant: 0.000402 kWh
  PC, WO – Petroleum Coke
- Electricity, other gases, unspecified, at power plant: 0.007503 kWh
  OG, PG, BFG – Other Gas (Butane, Coal Processes, Coke-Oven, Refinery, and other processes)
- Electricity, nuclear, at power plant [RNA]: 0.125547 kWh
  NUC – Nuclear (Uranium, Plutonium, Thorium)
- Electricity, natural gas, at power plant [RNA]: 0.450391 kWh
  NG – Natural Gas
- Electricity, biomass, gas, landfill, at power plant: 0.000936 kWh
  LFG, OBG – Landfill Gas
- Electricity, lignite coal, at power plant [RNA]: 0.112157 kWh
  LIG – Lignite Coal
- Electricity, hydropower, at power plant, unspecified: 0.002412 kWh
  WAT – Water (Conventional, Pumped Storage)
- Electricity, bituminous coal, at power plant [RNA]: 0.241411 kWh
  SUB – Subbituminous Coal
- Electricity, biomass,liquid, unspecified, at power plant: 0.000737 kWh
  BLQ, OBL, SLW, WDL – Black Liquor

## Sampling procedure
based on EIA electricity reports for all power plants in the US.

## Sources
- EIA
- EIA
- Statistics Canada
- Statistics Canada
- Chris Goemans, Athena Institute
- EIA
- USEPA
- EIA
- Statistics Canada
- EIA
- Statistics Canada
- EIA
- unspecified
- EIA
- USEPA
- EIA
- EIA
- Statistics Canada
- US DOE
- International Energy Agency
- EIA
