# Engineered flooring, hardwood, unfinished, E

Dataset: openLCA process, unit process
Category: 31-33: Manufacturing/3219: Other Wood Product Manufacturing
Geography: United States
Time period: 2006-12-31 to 2006-12-31
Allocation method: physical allocation
Generated by: Maureen Puettmann
Published in: Richard D. Bergman
restrictionsDescription: All information can be accessed by everybody.
copyright: false

## General comment
All weights given on an ovendry basis. All moisture contents are on an ovendry basis. MC% =(weight of water in wood / weight of oven dry wood) *100. Reference to specific gravities use oven dry mass and volumes at specified moisture contents. Reference to densities use mass and volume at specified moistrue contents.

Important note: although most of the data in the US LCI database has
undergone some sort of review, the database as a whole has not yet
undergone a formal validation process.
Please email comments to lci@nrel.gov.

## Technology
Typical

## Geography
E= Eastern US United States. The states included MN, IA, MO, WI, IL, NJ, OH, IN, MI, WV, PA, MD, DW, NJ, NY, ME, VT, NH, RI, MA, CT, VA, KY, AR, LA, MS, AL, FL,GA, NC, SC, and TN

## Reference product
- Engineered flooring; hardwood; unfinished [US]: 1 m3
  Based on a weighted average green density and specific gravity of 613 kg/m3 and 0.578. Moisture content (ovendry basis) = 6.0%.

## By-products
- Sawdust; hardwood; dry; at engineered wood flooring plant [US]: 114.5 kg
  (same comment as for Engineered flooring; hardwood; unfinished)
- Shavings; hardwood; dry; at engineered wood flooring plant [US]: 11.44 kg
  (same comment as for Engineered flooring; hardwood; unfinished)
- Wood fuel; hardwood; dry; at engineered wood flooring plant [US]: 4.148 kg
  (same comment as for Engineered flooring; hardwood; unfinished)

## Inputs from technosphere
- Electricity, at grid [RNA]: 66.97 kWh; provider Electricity, Eastern US, 2014
  Amount of electricity consumed during trimming. Represents 6% of mill use of electricity
- Gasoline, combusted in equipment [RNA]: 0.0817 l
  Amount of gasoline consumed during trimming. Represents 14.3% of mill use of gasoline
- Pressed raw panels; hardwood; at engineered wood flooring plant [US]: 596 kg; provider Pressed raw panels, hardwood, at engineered wood flooring plant, E
  Panels manufactured on-site
- Diesel, combusted in industrial equipment [RNA]: 0.3503 l
  Amount of diesel consumed during trimming. Represents 5% of mill use of diesel
- Natural gas, combusted in industrial equipment, 1.357 m3/kg, 52.13 MJ/kg [RNA]: 0.0004425 m3; provider Natural gas, combusted in industrial equipment
  Amount of natural gas consumed during trimming. Represents 14.3% of mill use of natural gas; proxy for propane
- Pressed raw panels; purchased; hardwood; at eng wood flooring plant [US]: 177 kg; provider Pressed raw panels, purchased, hardwood, at eng wood flooring plant, E
  Panesl purchased off-site

## Emissions to nature
- Particulate matter, ≤ 10μm [emission, air, troposphere, rural]: 0.07 kg
  Two mills reported

## Allocation factors
- causal, Sawdust; hardwood; dry; at engineered wood flooring plant, for Electricity, at grid: 0.154087
- physical, Sawdust; hardwood; dry; at engineered wood flooring plant: 0.154087
- causal, Wood fuel; hardwood; dry; at engineered wood flooring plant, for Natural gas, combusted in industrial equipment, 1.357 m3/kg, 52.13 MJ/kg: 0.00558211
- causal, Sawdust; hardwood; dry; at engineered wood flooring plant, for Pressed raw panels; purchased; hardwood; at eng wood flooring plant: 0.154087
- causal, Wood fuel; hardwood; dry; at engineered wood flooring plant, for Diesel, combusted in industrial equipment: 0.00558211
- causal, Shavings; hardwood; dry; at engineered wood flooring plant, for Natural gas, combusted in industrial equipment, 1.357 m3/kg, 52.13 MJ/kg: 0.0153952
- causal, Engineered flooring; hardwood; unfinished, for Pressed raw panels; hardwood; at engineered wood flooring plant: 0.824936
- economic, Wood fuel; hardwood; dry; at engineered wood flooring plant: 0.00558211
- economic, Sawdust; hardwood; dry; at engineered wood flooring plant: 0.154087
- causal, Shavings; hardwood; dry; at engineered wood flooring plant, for Gasoline, combusted in equipment: 0.0153952
- causal, Sawdust; hardwood; dry; at engineered wood flooring plant, for Diesel, combusted in industrial equipment: 0.154087
- causal, Wood fuel; hardwood; dry; at engineered wood flooring plant, for Pressed raw panels; hardwood; at engineered wood flooring plant: 0.00558211
- causal, Sawdust; hardwood; dry; at engineered wood flooring plant, for Gasoline, combusted in equipment: 0.154087
- causal, Engineered flooring; hardwood; unfinished, for Pressed raw panels; purchased; hardwood; at eng wood flooring plant: 0.824936
- causal, Sawdust; hardwood; dry; at engineered wood flooring plant, for Particulate matter, ≤ 10μm: 0.154087
- causal, Shavings; hardwood; dry; at engineered wood flooring plant, for Pressed raw panels; purchased; hardwood; at eng wood flooring plant: 0.0153952
- causal, Sawdust; hardwood; dry; at engineered wood flooring plant, for Pressed raw panels; hardwood; at engineered wood flooring plant: 0.154087
- causal, Wood fuel; hardwood; dry; at engineered wood flooring plant, for Electricity, at grid: 0.00558211
- causal, Wood fuel; hardwood; dry; at engineered wood flooring plant, for Particulate matter, ≤ 10μm: 0.00558211
- causal, Engineered flooring; hardwood; unfinished, for Gasoline, combusted in equipment: 0.824936
- economic, Shavings; hardwood; dry; at engineered wood flooring plant: 0.0153952
- causal, Shavings; hardwood; dry; at engineered wood flooring plant, for Diesel, combusted in industrial equipment: 0.0153952
- causal, Engineered flooring; hardwood; unfinished, for Natural gas, combusted in industrial equipment, 1.357 m3/kg, 52.13 MJ/kg: 0.824936
- physical, Engineered flooring; hardwood; unfinished: 0.824936
- causal, Engineered flooring; hardwood; unfinished, for Diesel, combusted in industrial equipment: 0.824936
- causal, Sawdust; hardwood; dry; at engineered wood flooring plant, for Natural gas, combusted in industrial equipment, 1.357 m3/kg, 52.13 MJ/kg: 0.154087
- causal, Wood fuel; hardwood; dry; at engineered wood flooring plant, for Pressed raw panels; purchased; hardwood; at eng wood flooring plant: 0.00558211
- causal, Shavings; hardwood; dry; at engineered wood flooring plant, for Pressed raw panels; hardwood; at engineered wood flooring plant: 0.0153952
- causal, Wood fuel; hardwood; dry; at engineered wood flooring plant, for Gasoline, combusted in equipment: 0.00558211
- physical, Shavings; hardwood; dry; at engineered wood flooring plant: 0.0153952
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
## Sampling procedure
Questionnaires from 4 veneer and 5 flooring mills in the E. United States representing 32 states.

## Intended application
Only mass allocation factors are available for the multi-functional processes (disregard economic allocation factor values-they are mass allocation factors).

## Sources
- Richard D. Bergman
- Maureen Puettmann
