# Fuels, burned at coated mechanical paper, average production, at mill

Dataset: openLCA process, unit process
Category: 31-33: Manufacturing/3221: Pulp, Paper, and Paperboard Mills
Geography: Northern America
Time period: 2005-12-31 to 2005-12-31
Allocation method: no allocation
Generated by: Caroline Gaudreault
Reviewer: Martha Stevenson
Published in: AF&PA
restrictionsDescription: All information can be accessed by everybody.
copyright: false

## General comment
Coated mechanical paper, average North American production, at mill. All flows are production-weighted means. Data were developed for a full LCA that was critically reviewed. Reviewers were: • Martha Stevenson, Chairperson – Private Consultant to the public interest with ten years of experience in sustainability, environmental management, packaging and materials recovery; led the development of the Design Guidelines for Sustainable Packaging and the COMPASS software used to compare the environmental impacts of package designs; • Pascal Lesage – Life cycle assessment consultant, Researcher at École Polytechnique de Montréal [at the Inter-University Research Centre for the Life Cycle of Products, Processes and Services (CIRAIG) in Montreal]; and • Dale Phenicie, Environmental Affairs Consulting – Consultant with 35 years of experience in environmental protection and process consulting for the forest products industry. Has served on several U.S. EPA Task Forces dealing with water quality issues and authored several AF&PA Environmental, Health and Safety/Sustainability reports.

## Technology
current technology mix for coated mechanical

## Time period
Primary data collected from participating companies and associations for their operational activities are representative for 2006 and 2007.

## Reference product
- Fuels, burned at coated mechanical paper, average production, at mill [RNA]: 10691 MJ

## Inputs from technosphere
- Diesel, combusted in industrial boiler, at pulp and paper mill (EXCL.) [RNA]: 0.48484 l
  Proxy for light fuel oil.
- RFO, combusted in industrial boiler, at pulp and paper mill (EXCL.) [RNA]: 28.99 l
  All combusted on site. Actually received at supplier, not refinery.
- Natural gas, combusted in industrial boiler, at pulp and paper mill (EXCL.) [RNA]: 58.529 m3
- LPG, combusted in industrial boiler, at pulp and paper mill (EXCL.) [RNA]: 0.37175 l
- TDF, combusted in industrial boiler, at pulp and paper mill (EXCL.) [RNA]: 10.209 kg
  All combusted. Not present in any database.
- Gasoline, combusted in equipment, at pulp and paper mill (EXCL.) [RNA]: 0.19681 l
  Gasoline and kerosene, assumed to be gasoline.
- Hog fuel, pur., combusted in industrial boiler, at pulp and paper mill (EXCL.) [RNA]: 54.337 kg
  Purchased hogged fuel. Typically from wood products manufacturing.
- Hog fuel, self-gen., combusted in ind. boiler, at pulp and paper mill (EXCL.) [RNA]: 134.19 kg
  Combustion of self-generated hogged fuel from pulpwood. Wood inputs are accounted for in the process named Coated mechanical paper, average production, at mill
- Bituminous coal, combusted in industrial boiler, at pulp and paper mill (EXCL.) [RNA]: 99.057 kg

## Emissions to nature
- Lead [emission, air]: 4.1462e-6 kg
  From spent liquor recovery, non-recyclable paper combustion and wastewater residuals combustion
- Sulfuric acid [emission, air]: 0.0059072 kg
  (same comment as for Lead)
- Vanadium [emission, air]: 3.7603e-7 kg
  (same comment as for Lead)
- Methanol [emission, air]: 0.031076 kg
  (same comment as for Lead)
- Hydrochloric acid [emission, air]: 0.017386 kg
  (same comment as for Lead)
- Carbon tetrachloride [emission, air]: 1.0832e-5 kg
  (same comment as for Lead)
- Hydrogen sulfide [emission, air]: 0.01075 kg
  Total reduced sulfur assumed to be hydrogen sulfide. From all combustion processes at pulp and paper mill.
- Barium [emission, air]: 0.00027845 kg
  (same comment as for Lead)
- Nitrogen dioxide [emission, air]: 1.8762 kg
  From all combustion processes at pulp and paper mill.
- Zinc [emission, air]: 5.4854e-5 kg
  (same comment as for Lead)
- Xylene [emission, air]: 0.00021957 kg
  (same comment as for Lead)
- Silver [emission, air]: 2.5242e-5 kg
  (same comment as for Lead)
- Sulfur dioxide [emission, air]: 3.0664 kg
  From all combustion processes at pulp and paper mill.
- Nitrous oxide [emission, air]: 0.011709 kg
  (same comment as for Lead)
- Polycyclic organic matter [emission, air]: 6.5194e-5 kg
  (same comment as for Lead)
- 1,1,1-Trichloroethane [emission, air]: 1.264e-5 kg
  (same comment as for Lead)
- Formaldehyde [emission, air]: 0.0016146 kg
  (same comment as for Lead)
- Cadmium [emission, air]: 1.9357e-5 kg
  (same comment as for Lead)
- Beryllium [emission, air]: 0.00035369 kg
  (same comment as for Lead)
- Styrene [emission, air]: 5.5973e-5 kg
  (same comment as for Lead)
- Phenol [emission, air]: 0.0029043 kg
  (same comment as for Lead)
- Cumene [emission, air]: 0.00019051 kg
  (same comment as for Lead)
- Hexane [emission, air]: 0.00012008 kg
  (same comment as for Lead)
- Methyl isobutyl ketone [emission, air]: 0.00011986 kg
  (same comment as for Lead)
- Mercury [emission, air]: 7.203e-7 kg
  (same comment as for Lead)
- Biphenyl [emission, air]: 3.6491e-5 kg
  (same comment as for Lead)
- Methylene chloride [emission, air]: 6.4101e-5 kg
  (same comment as for Lead)
- Hydrofluoric acid [emission, air]: 0.00026209 kg
  (same comment as for Lead)
- Chloroform [emission, air]: 7.873e-6 kg
  (same comment as for Lead)
- Arsenic [emission, air]: 8.0034e-7 kg
  (same comment as for Lead)
- 1,2,4-Trichlorobenzene [emission, air]: 3.6448e-5 kg
  (same comment as for Lead)
- Nickel [emission, air]: 6.5045e-6 kg
  (same comment as for Lead)
- Selenium [emission, air]: 0.00039923 kg
  (same comment as for Lead)
- Naphthalene [emission, air]: 3.7262e-5 kg
  (same comment as for Lead)
- Hexachlorobenzene [emission, air]: 4.2596e-10 kg
  (same comment as for Lead)
- Tetrachloroethylene [emission, air]: 2.2761e-6 kg
  (same comment as for Lead)
- 1,1,2-Trichloroethane [emission, air]: 1.596e-5 kg
  (same comment as for Lead)
- 2,3,7,8-Tetrachlorodibenzo-p-dioxin [emission, air]: 2.0229e-13 kg
  (same comment as for Lead)
- Antimony [emission, air]: 2.0337e-5 kg
  (same comment as for Lead)
- Benzo[ghi]perylene [emission, air]: 7.8951e-7 kg
  (same comment as for Lead)
- Chromium [emission, air]: 1.8063e-5 kg
  (same comment as for Lead)
- Copper [emission, air]: 1.8083e-5 kg
  (same comment as for Lead)
- Acetaldehyde [emission, air]: 0.00341 kg
  (same comment as for Lead)
- Methane [emission, air]: 0.01552 kg
  (same comment as for Lead)
- Chloromethane [emission, air]: 0.0051827 kg
  (same comment as for Lead)
- Aldehydes, C3 [emission, air]: 0.0013163 kg
  (same comment as for Lead)
- Benzene [emission, air]: 0.00019068 kg
  (same comment as for Lead)
- Carbon disulfide [emission, air]: 0.00013313 kg
  (same comment as for Lead)
- Carbon dioxide [emission, air]: 469.01 kg
  (same comment as for Lead)
- Cresol [emission, air]: 0.00086088 kg
  (same comment as for Lead)
- Manganese [emission, air]: 0.00012176 kg
  (same comment as for Lead)
- Trisodium phosphate [emission, air]: 0.036131 kg
  (same comment as for Lead)
- Toluene [emission, air]: 0.000149 kg
  (same comment as for Lead)
- Acrolein [emission, air]: 7.5976e-5 kg
  (same comment as for Lead)
- Carbon monoxide [emission, air]: 0.071995 kg
  (same comment as for Lead)
- Trichloroethylene [emission, air]: 6.6791e-6 kg
  (same comment as for Lead)

## Sampling procedure
The survey included results from 18 mills representing 5 million short tons per year (TPY), nearly 95% of 2006/2007 North American production volume.

## Sources
- AF&PA
