# Paper, mechanical, coated, average production, at mill

Dataset: openLCA process, unit process
Category: 31-33: Manufacturing/3221: Pulp, Paper, and Paperboard Mills
Geography: Northern America
Time period: 2005-12-31 to 2005-12-31
Allocation method: no allocation
Generated by: Caroline Gaudreault
Reviewer: Martha Stevenson
Published in: AF&PA
restrictionsDescription: All information can be accessed by everybody.
copyright: false

## General comment
Coated Mechanical Paper, average North American production, at mill. By-products were allocated 0% of the impacts to enable the user to choose and apply their own allocation method more easily. All flows are production-weighted means. Data were developed for a full LCA that was critically reviewed. Reviewers were: • Martha Stevenson, Chairperson – Private Consultant to the public interest with ten years of experience in sustainability, environmental management, packaging and materials recovery; led the development of the Design Guidelines for Sustainable Packaging and the COMPASS software used to compare the environmental impacts of package designs; • Pascal Lesage – Life cycle assessment consultant, Researcher at École Polytechnique de Montréal [at the Inter-University Research Centre for the Life Cycle of Products, Processes and Services (CIRAIG) in Montreal]; and • Dale Phenicie, Environmental Affairs Consulting – Consultant with 35 years of experience in environmental protection and process consulting for the forest products industry. Has served on several U.S. EPA Task Forces dealing with water quality issues and authored several AF&PA Environmental, Health and Safety/Sustainability reports.

## Technology
current technology mix for coated mechanical paper

## Time period
Primary data collected from participating companies and associations for their operational activities are representative for 2006 and 2007.

## Reference product
- Paper, mechanical, coated, average production, at mill [RNA]: 861.83 kg
  861.83 dry kg is equal to 1 market-dried short ton (5% water).

## By-products
- Tall oil, at coated mechanical paper mill [RNA]: 7.0307 kg
  Produced as byproduct of pulp production. Sold i.e., not used on site. Allocation set to 0%.
- Steam, at coated mechanical paper mill [RNA]: 66.2 MJ
  (same comment as for Tall oil, at coated mechanical paper mill)
- Turpentine, at coated mechanical paper mill [RNA]: 0.54431 kg
  (same comment as for Tall oil, at coated mechanical paper mill)
- Electricity, at coated mechanical paper mill [RNA]: 65 kWh
  (same comment as for Tall oil, at coated mechanical paper mill)

## Inputs from technosphere
- Electricity, at grid [RNA]: 538.99, 204.77 kWh (2 entries); provider Electricity, at Grid, US, 2010
  Net purchased, National average grid, Medium voltage: <50 kV
- Pulpwood, softwood, average, at forest road [RNA]: 0.2868 m3; provider Pulpwood, softwood, average, at forest road, NE-NC
  Mass of incoming northern softwood logs (assumed 63.5% East/Central based on mill location) intended for pulping. Assumed density: 450 kg/m3. Wood usage in the process is distrubuted as follows: 42% ends up in pulp, 37% in self-generated hogged fuel and 21% in black liquor. All the hogged fuel is combusted onsite. Combustion of this fuel is important to the economic viability of all modern pulp mills. Substitution of other fuels for this fuel is not recommended. Need to be paired with "Self-generated hogged fuel, combusted in industrial boiler, at pulp and paper mill". Black liquor solides are combusted onsite as part of the pulping chemical recovery process that is integral to and is essential to the economic viability of all modern pulp mills. Substitution of other fuels for this fuel is not recommended.
- Pulpwood, softwood, average, at forest road, US S: 0.1159 m3
  Mass of incoming southern softwood logs intended for pulping. Assumed density: 450 kg/m3. US LCI: "Softwood logs with bark, harvested at average intensity site, at mill, US SE/US" can be used but transportation needs to be removed as it is already included here. Wood usage in the process is distrubuted as follows: 42% ends up in pulp, 37% in self-generated hogged fuel and 21% in black liquor. All the hogged fuel is combusted onsite. Combustion of this fuel is important to the economic viability of all modern pulp mills. Substitution of other fuels for this fuel is not recommended. Need to be paired with "Self-generated hogged fuel, combusted in industrial boiler, at pulp and paper mill". Black liquor solides are combusted onsite as part of the pulping chemical recovery process that is integral to and is essential to the economic viability of all modern pulp mills. Substitution of other fuels for this fuel is not recommended.
- Transport, combination truck, average fuel mix [RNA]: 294.91 t*km
  Transportation of pulpwood and chips to pulp mill. Pulpwood: 200 km (rounded trip distance), chips: 254 km (rounded trip distance).
- Natural gas, combusted in industrial boiler [RNA]: 23.495 m3
  Purchased steam, assumed to be natural gas.
- Polyethylene, linear low density, LLDPE, resin, at plant [RNA]: 0.08709 kg
  Packaging material
- Pulpwood; hardwood; average; at forest road [US]: 0.1549 m3; provider Pulpwood, hardwood, average, at forest road, NE-NC
  Mass of incoming northern hardwood logs intended for pulping. Assumed density: 650 kg/m3. Wood usage in the process is distrubuted as follows: 42% ends up in pulp, 37% in self-generated hogged fuel and 21% in black liquor. All the hogged fuel is combusted onsite. Combustion of this fuel is important to the economic viability of all modern pulp mills. Substitution of other fuels for this fuel is not recommended. Need to be paired with "Self-generated hogged fuel, combusted in industrial boiler, at pulp and paper mill". Black liquor solides are combusted onsite as part of the pulping chemical recovery process that is integral to and is essential to the economic viability of all modern pulp mills. Substitution of other fuels for this fuel is not recommended.
- Disposal, wastewater treatment plant residuals, to uns. land application: 9.8883 kg
  Typically off-site agricultural/silvicultural. (uns. = unspecified)
- Core board, at plant: 3.3475 kg
  Packaging material
- Disposal, wastewater treatment plant residuals, to uns. landfill: 22.952 kg
  Typically company-owned, but some third party. (uns. = unspecified)
- Pulp, kraft market, bleached, average production, at mill [RNA]: 108.86 kg
- Disposal, solid waste, unspecified, to unspecified incinerator: 0.24494 kg
  Typically on-site with energy recovery.
- Transport, combination truck, average fuel mix [RNA]: 17.374 t*km
  Transport market pulp. Bleached kraft market pulp, Deinked bleached market pulp: 256 km.
- Sulfur dioxide, at plant: 7.575 kg
  ei: sulfur dioxide liquid, at plant
- Transport, train, diesel powered [RNA]: 98.986 t*km
  Transport market pulp. Bleached kraft market pulp, Deinked bleached market pulp: 1452 km.
- Disposal, solid waste, unspecified, to unspecified landfill: 10.07 kg
  Typically company-owned, but some third party.
- Transport, train, diesel powered [RNA]: 52.851 t*km
  Transportation of pulpwood and chips to pulp mill. Pulpwood: 375 km, chips: 127 km.
- Hot rolled sheet, steel, at plant [RNA]: 0.17962 kg
  Packaging material
- Transport, train, diesel powered [RNA]: 5.6647 t*km
  Transport of packaging. Containerboard: 1410 km. Core board: 1276 km. Polypropylene and Polyethylene: 1806 km. Steel: 1083 km.
- Sodium hydrosulfite, at plant: 1.4152 kg
  ei: dithionite
- Transport, train, diesel powered [RNA]: 268.73 t*km
  Transportation of chemicals. Kaolin: 1204 km. Titanium dioxide, Ground calcium carbonate, Precipitated calcium carbonate, Sulfur dioxide, Dithonite and Hydrogen peroxide: 1088 km. Latex: 985 km. Starch: 1788 km. Transports of fuels. Coal: 653 km. Residual fuel oil, Distillate fuel oil: 1114 km. Liquefied petroleum gas: 1246 km. Tire derived fuel: 1156 km.
- Disposal, unspecified ashes, to unspecified landfill: 17.69 kg
  Mix of wood and coal ashes. Based on typical ash contents can be assumed to be 78% from wood and 22% from coal. Typically company-owned, but some third party.
- Polypropylene, PP, resin, at plant [RNA]: 1.016 kg
  Packaging material
- Fuels, burned at coated mechanical paper, average production, at mill [RNA]: 10691 MJ
  Includes all fuels burned on site
- Old news paper: 17.418 kg
- Disposal, solid waste, unspecified, to unspecified beneficial use: 5.9511 kg
  Typically off-site.
- Titanium dioxide, at plant: 14.243 kg
  ei: titanium dioxide, production mix, at plant
- Disposal, wastewater treatment plant residuals, to uns. Incinerator: 4.1912 kg
  Typically on-site with energy recovery. (uns. = unspecified)
- Pulp, refiner market, bleached, average production, at mill: 16.057 kg
- Transport, combination truck, average fuel mix [RNA]: 1.9564 t*km
  Transport of packaging. Containerboard: 201 km. Core board: 369 km. Polypropylene and Polyethylene: 417 km. Steel: 257 km.
- Latex, at plant: 25.945 kg
  ei. Latex, at plant
- Starch, at plant: 10.297 kg
  ei: Maize starch, at plant and/or Potato starch, at plant
- Electricity from hydro: 27.722 kWh
  Generation at company facilities. Ei: Electricity, hydropower, at run-of-river power plant
- Transport, ocean freighter, average fuel mix [RNA]: 4.0003 t*km
  Transportation of chemicals. Kaolin, Starch and Latex: 0 km. Titanium dioxide, Ground calcium carbonate, Precipitated calcium carbonate, Sulfur dioxide, Dithonite and Hydrogen peroxide: 517 km. Transports of fuels. Residual fuel oil , Distillate fuel oil: 682 km. Kerosene and gasoline, Other fossil assumed to be diesel: 1183 km.
- Precipitated calcium carbonate, at plant: 1.1657 kg
- Electricity, at grid, BC: 135.34 kWh
- Transport, combination truck, average fuel mix [RNA]: 54.374 t*km
  Transportation of chemicals. Kaolin: 295 km. Titanium dioxide, Ground calcium carbonate, Precipitated calcium carbonate, Sulfur dioxide, Dithonite and Hydrogen peroxide: 183 km. Latex: 312 km. Starch: 510 km. Transports of fuels. Coal: 153 km. Residual fuel oil, Distillate fuel oil: 50 km. Liquefied petroleum gas, Kerosene and gasoline, Other fossil assumed to be diesel: 80 km. Tire derived fuel: 98 km.
- Electricity, at grid, QC: 297.74 kWh
- Disposal, solid waste, unspecified, to unspecified land application: 0.9979 kg
  Typically off-site agricultural/silvicultural
- Quicklime, at plant [RNA]: 5.8753 kg
  For production of precipitated calcium carbonate on site
- Clay, at mine: 190.06 kg
  ei: Kaolin
- Containerboard, average production, at mill [US]: 8.0286 kg
  Packaging material
- Chips; softwood; green; at sawmill [US]: 412.77 kg
  Mass of incoming pulp chips intended for pulping. US LCI: "Pulp chips, at sawmill,US SE/kg" can be used as a proxy. The actual mix of chips is: northern softwood chips: 66%, northern hardwood chips: 18%, southern softwood chips: 11% and southern hardwood chips: 6%. Pulp chips usage in the process is distrubuted as follows: 67% ends up in pulp and 33% in black liquor. Combusted onsite as part of the pulping chemical recovery process that is integral to and is essential to the economic viability of all modern pulp mills. Substitution of other fuels for this fuel is not recommended.
- Disposal, unspecified ashes, to unspecified land application: 2.3224 kg
  Mix of wood and coal ashes. Based on typical ash contents can be assumed to be 78% from wood and 22% from coal. Typically off-site agricultural/silvicultural.
- Ground calcium carbonate, at plant: 45.813 kg
  ei. Limestone, milled, loose, at plant
- Disposal, unspecified ashes, to unspecified beneficial use: 7.4117 kg
  Mix of wood and coal ashes. Based on typical ash contents can be assumed to be 78% from wood and 22% from coal. Typically off-site.
- Hydrogen peroxide, at plant: 8.4368 kg
  ei: Hydrogen peroxide, 50% in H2O, at plant
- Transport, pipeline, natural gas [RNA]: 69.5 t*km
  Transports of fuels. Natural gas: 33584 tkm/MMcf, Average transportation for natural gas in North America according to the US LCI database
- Disposal, wastewater treatment plant residuals, to uns. beneficial use: 13.426 kg
  Typically off-site. (uns. = unspecified)
- Pulpwood; softwood; average; at forest road [US]: 0.1783 m3; provider Pulpwood, softwood, average, at forest road, INW
  Mass of incoming northern softwood logs (assumed 36.5% West based on mill location) intended for pulping. Assumed density: 450 kg/m3. Wood usage in the process is distrubuted as follows: 42% ends up in pulp, 37% in self-generated hogged fuel and 21% in black liquor. All the hogged fuel is combusted onsite. Combustion of this fuel is important to the economic viability of all modern pulp mills. Substitution of other fuels for this fuel is not recommended. Need to be paired with "Self-generated hogged fuel, combusted in industrial boiler, at pulp and paper mill". Black liquor solides are combusted onsite as part of the pulping chemical recovery process that is integral to and is essential to the economic viability of all modern pulp mills. Substitution of other fuels for this fuel is not recommended.
- Transport, barge, average fuel mix [RNA]: 70.892 t*km
  Transportation of chemicals. Kaolin, Starch and Latex: 0 km. Titanium dioxide, Ground calcium carbonate, Precipitated calcium carbonate, Sulfur dioxide, Dithonite and Hydrogen peroxide : 489 km. Transports of fuels. Coal: 515 km. Residual fuel oil, Distillate fuel oil: 163 km. Kerosene and gasoline, Other fossil assumed to be diesel : 163 km. Tire derived fuel: 315 km.

## Inputs from nature
- Water [resource, water]: 43014, 43144 kg (2 entries)
  Estimated based on individual mill process effluent and cooling water flows and process characteristics. Share between process and cooling estimated.

## Emissions to nature
- Adsorbable organic halides [emission, water]: 0.043562 kg
  In effluent.
- Nickel [emission, ground]: 0.001 kg
  From onsite management of solid waste. All metals reported as elemental althought in most cases they are releases into metal compounds.
- Mercury [emission, water]: 2.4063e-8 kg
  In effluent.
- Methanol [emission, air]: 0.14615 kg
  From process
- Nitrogen [emission, water]: 0.16816 kg
  In effluent.
- Toluene [emission, air]: 3.91e-5 kg
  From process
- Manganese [emission, water]: 0.0059584 kg
  In effluent.
- Carbon dioxide [emission, air]: -3.074, -1.5423 kg (2 entries)
  From process (Precipitated Calcium Carbonate (PCC) production on site). Some emissions reported under "Fuels burned at coated mechanical paper, average producion, at mill" are capture to produce PCC
- Xylene [emission, air]: 0.00061278 kg
  From process
- Water [emission, air]: 1952 kg
  Estimated based on individual mill process effluent and cooling water flows and process characteristics. Share between process and cooling estimated. Includes evaporation and other losses (e.g., water in solid waste).
- Nickel [emission, water]: 0.00016806 kg
  In effluent.
- Phenol [emission, water]: 4.7687e-6 kg
  In effluent.
- Arsenic [emission, ground]: 0.0012 kg
  (same comment as for Nickel)
- Barium [emission, water]: 0.00089758 kg
  In effluent.
- Lead [emission, ground]: 0.0047 kg
  (same comment as for Nickel)
- Manganese [emission, ground]: 0.0516 kg
  (same comment as for Nickel)
- Ammonia [emission, water]: 0.010785 kg
  In effluent.
- Biological Oxygen Demand [emission, water]: 0.80662 kg
  In effluent.
- Arsenic [emission, water]: 4.7744e-5 kg
  In effluent.
- Phosphorus [emission, water]: 0.021767 kg
  In effluent.
- Barium [emission, ground]: 0.02 kg
  (same comment as for Nickel)
- Acetaldehyde [emission, ground]: 0.000124 kg
  (same comment as for Nickel)
- Zinc [emission, water]: 0.0046884 kg
  In effluent.
- Mercury [emission, ground]: 3.41e-6 kg
  (same comment as for Nickel)
- Acetaldehyde [emission, water]: 0.0011257 kg
  In effluent.
- Water [emission, water]: 43014 kg
  (same comment as for Water)
- Acetaldehyde [emission, air]: 0.0158 kg
  From process
- Zinc [emission, ground]: 0.00403 kg
  (same comment as for Nickel)
- Copper [emission, ground]: 0.00433 kg
  (same comment as for Nickel)
- Phenol [emission, air]: 0.004372 kg
  From process
- Methanol [emission, water]: 0.005619 kg
  In effluent.
- Formaldehyde [emission, water]: 0.0009283 kg
  In effluent.
- Process effluent [emission, water]: 42052 kg
  (same comment as for Water)
- Polycyclic aromatic hydrocarbons [emission, water]: 2.4106e-6 kg
  In effluent.
- Ammonia [emission, air]: 0.038615 kg
  From process
- Suspended solids, inorganic [emission, water]: 1.4243 kg
  In effluent.
- Chromium [emission, ground]: 0.00371 kg
  (same comment as for Nickel)
- Copper [emission, water]: 7.639e-5 kg
  In effluent.
- Polycyclic aromatic hydrocarbons [emission, ground]: 5.72e-6 kg
  (same comment as for Nickel)
- Lead [emission, water]: 8.5939e-6 kg
  In effluent.
- Chromium [emission, water]: 4.2014e-5 kg
  In effluent.
- Ammonia [emission, ground]: 0.000546 kg
  (same comment as for Nickel)
- Vanadium [emission, ground]: 0.00086 kg
  (same comment as for Nickel)

## Allocation factors
- causal, Electricity, at coated mechanical paper mill, for Chromium: 0
- causal, Electricity, at coated mechanical paper mill, for Manganese: 0
- causal, Steam, at coated mechanical paper mill, for Polyethylene, linear low density, LLDPE, resin, at plant: 0
- causal, Tall oil, at coated mechanical paper mill, for Process effluent: 0
- causal, Electricity, at coated mechanical paper mill, for Containerboard, average production, at mill: 0
- causal, Steam, at coated mechanical paper mill, for Transport, ocean freighter, average fuel mix: 0
- causal, Steam, at coated mechanical paper mill, for Electricity, at grid, BC: 0
- physical, Electricity, at coated mechanical paper mill: 0
- causal, Tall oil, at coated mechanical paper mill, for Pulp, refiner market, bleached, average production, at mill: 0
- causal, Turpentine, at coated mechanical paper mill, for Fuels, burned at coated mechanical paper, average production, at mill: 0
- causal, Tall oil, at coated mechanical paper mill, for Pulpwood; softwood; average; at forest road: 0
- causal, Paper, mechanical, coated, average production, at mill, for Manganese: 1
- causal, Paper, mechanical, coated, average production, at mill, for Pulpwood; softwood; average; at forest road: 1
- causal, Tall oil, at coated mechanical paper mill, for Ground calcium carbonate, at plant: 0
- causal, Turpentine, at coated mechanical paper mill, for Carbon dioxide: 0
- causal, Tall oil, at coated mechanical paper mill, for Starch, at plant: 0
- causal, Paper, mechanical, coated, average production, at mill, for Nitrogen: 1
- causal, Paper, mechanical, coated, average production, at mill, for Carbon dioxide: 1
- causal, Tall oil, at coated mechanical paper mill, for Polyethylene, linear low density, LLDPE, resin, at plant: 0
- causal, Electricity, at coated mechanical paper mill, for Disposal, unspecified ashes, to unspecified land application: 0
- causal, Electricity, at coated mechanical paper mill, for Polycyclic aromatic hydrocarbons: 0
- causal, Paper, mechanical, coated, average production, at mill, for Process effluent: 1
- causal, Steam, at coated mechanical paper mill, for Copper: 0
- causal, Turpentine, at coated mechanical paper mill, for Precipitated calcium carbonate, at plant: 0
- causal, Electricity, at coated mechanical paper mill, for Xylene: 0
- causal, Steam, at coated mechanical paper mill, for Polypropylene, PP, resin, at plant: 0
- causal, Turpentine, at coated mechanical paper mill, for Xylene: 0
- causal, Electricity, at coated mechanical paper mill, for Lead: 0
- causal, Electricity, at coated mechanical paper mill, for Phosphorus: 0
- causal, Paper, mechanical, coated, average production, at mill, for Pulp, refiner market, bleached, average production, at mill: 1
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
## Sampling procedure
The survey included results from 18 paper mills representing 5 million short tons per year (TPY), nearly 95% of 2006/2007 North American production volume.

## Sources
- AF&PA
