# Cotton, whole plant, at field

Dataset: openLCA process, unit process
Category: 11: Agriculture, Forestry, Fishing and Hunting/1119: Other Crop Farming
Geography: Northern America
Time period: 1996-12-31 to 1999-12-31
Allocation method: no allocation
Generated by: Olivier Muller
Published in: USDA/National Agricultural Statistics Se
restrictionsDescription: All information can be accessed by everybody.
copyright: false

## General comment
Agricultural Crop Production, Harvested acres are 84% of the planted acres (1998-2000 US average).
The impacts of producing 1 kg of seed are assumed equal to those of producing 1kg of lint.
For Water, only consumptive use is taken into account (i.e. 60.7% of the total water consumption).
Important note: although most of the data in the US LCI database has
undergone some sort of review, the database as a whole has not yet
undergone a formal validation process.
Please email comments to lci@nrel.gov.

## Technology
US average

## Geography
USA

## Reference product
- Cotton, at field [RNA]: 1 kg
  Planted surface (1), Production (1), Seeds (18)

## By-products
- Cotton straw, at field [RNA]: 4.5 kg
  Residue to Crop Ratio (20), C content of residues - same value as soybeans and peanuts in (4), N content and dry content of residues (10). Initially considered an output to nature. Changed to unvalued co-product by Pascal Lesage (12/07)

## Inputs from technosphere
- Quicklime, at plant [RNA]: 0.158 kg
  Fertilizers NPK Ca and method of application (9)
- Diesel, combusted in industrial equipment [RNA]: 0.231 l
  Farm tractor. Energy consumption (18)
- Agrochemicals, at plant: 0.009 kg
  Pesticides - consumption (19)
- Natural gas, combusted in industrial boiler [RNA]: 6.61e-5 m3
  Energy consumption (18)
- Transport, train, diesel powered [RNA]: 0.302 t*km
  Transportation of fertilizers (400km)
- Electricity, at grid [RNA]: 0.247 kWh; provider Electricity, at Grid, US, 2010
  Energy consumption (18)
- Liquefied petroleum gas, combusted in industrial boiler [RNA]: 0.0257 m3
  Energy consumption (18). Was initially reported as MJ. Converted using following factors: 50.3 MJ/kg, 1.85L/kg
- Potash Fertilizer (K2O), at plant: 0.0556 kg
  Fertilizers NPK Ca and method of application (9)
- Nitrogen fertilizer, production mix, at plant [RNA]: 0.124 kg
  Fertilizers NPK Ca and method of application (9)
- Phosphorous Fertilizer (TSP as P2O5), at plant: 0.0503 kg
  Fertilizers NPK Ca and method of application (9)
- Transport, single unit truck, diesel powered [RNA]: 0.113 t*km
  Transportation of fertilizers (200 km)

## Inputs from nature
- Land use [resource, ground, human-dominated, agricultural]: 1.55, 10.4, 2.75 m2*a (3 entries)
  Planted surface (1), Tillage practices (3)
- Water [resource, water, fresh water body, river]: 287000 kg
  Water consumption - consumptive use for irrigation (5), Water consumption - area irrigated and depth of irrigation water applied and ratio surface/ground water (2)
- Water [resource, water, subterranean]: 1.02e6 kg
  (same comment as for Water)
- Carbon dioxide [resource, air]: 1.69 kg
  Carbon fixation through plant growth

## Emissions to nature
- Malathion [emission, water]: 7.47e-6 kg
  Pesticides - consumption (19), Pesticides - application method (11), Runoff of pesticide (15)
- Glyphosate [emission, air, troposphere, rural]: 7.72e-5 kg
  Pesticides - consumption (19), Pesticides - application method (11), Pesticides - air emission factors (12), Pesticides - vapor pressure (13)
- Oxamyl [emission, water]: 1.14e-6 kg
  (same comment as for Malathion)
- Phorate [emission, air, troposphere, rural]: 4e-5 kg
  (same comment as for Glyphosate)
- Bromoxynil [emission, water]: 1.35e-7 kg
  (same comment as for Malathion)
- Pendimethalin [emission, air, troposphere, rural]: 0.00015 kg
  (same comment as for Glyphosate)
- Mancozeb [emission, air, troposphere, rural]: 5.19e-7 kg
  (same comment as for Glyphosate)
- Metolachlor [emission, water]: 8.85e-7 kg
  (same comment as for Malathion)
- Trifluralin [emission, air, troposphere, rural]: 0.000393 kg
  (same comment as for Glyphosate)
- Methyl parathion [emission, water]: 5.63e-6 kg
  (same comment as for Malathion)
- Disulfoton [emission, water]: 7.69e-7 kg
  (same comment as for Malathion)
- Ethephon [emission, water]: 9.25e-6 kg
  (same comment as for Malathion)
- Methyl parathion [emission, air, troposphere, rural]: 0.000131 kg
  (same comment as for Glyphosate)
- Aldicarb [emission, water]: 4.73e-6 kg
  (same comment as for Malathion)
- Clomazone [emission, air, troposphere, rural]: 2.45e-5 kg
  (same comment as for Glyphosate)
- Malathion [emission, air, troposphere, rural]: 0.000174 kg
  (same comment as for Glyphosate)
- Sodium chlorate [emission, air, troposphere, rural]: 0.000271 kg
  (same comment as for Glyphosate)
- Phosphorus compounds [emission, water]: 0.000296 kg
  Runoff/leaching of fertilizers (16)
- Prometryn [emission, air, troposphere, rural]: 6.78e-5 kg
  (same comment as for Glyphosate)
- Nitrogen oxides [emission, air, troposphere, rural]: 0.0202 kg
  Air emissions of N2O and NH3 and NOx (4)
- Endosulfan [emission, air, troposphere, rural]: 1.84e-5 kg
  (same comment as for Glyphosate)
- Pendimethalin [emission, water]: 6.45e-6 kg
  (same comment as for Malathion)
- Clomazone [emission, water]: 1.05e-6 kg
  (same comment as for Malathion)
- Phorate [emission, water]: 1.03e-6 kg
  (same comment as for Malathion)
- 1,3-Dichloropropene [emission, water]: 6.46e-6 kg
  (same comment as for Malathion)
- Carbofuran [emission, water]: 3.36e-7 kg
  (same comment as for Malathion)
- Cyanazine [emission, water]: 5.43e-6 kg
  (same comment as for Malathion)
- Acephate [emission, air, troposphere, rural]: 4.36e-5 kg
  (same comment as for Glyphosate)
- Mancozeb [emission, water]: 1.34e-8 kg
  (same comment as for Malathion)
- Oxamyl [emission, air, troposphere, rural]: 4.41e-5 kg
  (same comment as for Glyphosate)
- 1,3-Dichloropropene [emission, air, troposphere, rural]: 0.00025 kg
  (same comment as for Glyphosate)
- Tribufos [emission, air, troposphere, rural]: 0.000204 kg
  (same comment as for Glyphosate)
- Diuron [emission, water]: 2.41e-6 kg
  (same comment as for Malathion)
- Sodium methyldithiocarbamate [emission, air, troposphere, rural]: 5.52e-5 kg
  (same comment as for Glyphosate)
- Azinphos-methyl [emission, water]: 4.17e-7 kg
  (same comment as for Malathion)
- Fluometuron [emission, air, troposphere, rural]: 0.00022 kg
  (same comment as for Glyphosate)
- Glyphosate [emission, water]: 3.31e-6 kg
  (same comment as for Malathion)
- Nitrous oxide [emission, air, troposphere, rural]: 0.00569 kg
  Air emissions of N2O and NH3 and NOx (4)
- 2,4-D [emission, air, troposphere, rural]: 4.72e-7 kg
  (same comment as for Glyphosate)
- Acephate [emission, water]: 1.87e-6 kg
  (same comment as for Malathion)
- Fluometuron [emission, water]: 9.44e-6 kg
  (same comment as for Malathion)
- Monosodium methanearsonate [emission, water]: 8.31e-6 kg
  (same comment as for Malathion)
- Carbofuran [emission, air, troposphere, rural]: 7.85e-6 kg
  (same comment as for Glyphosate)
- Cyanazine [emission, air, troposphere, rural]: 0.000127 kg
  (same comment as for Glyphosate)
- Paraquat [emission, water]: 1.86e-6 kg
  (same comment as for Malathion)
- Monosodium methanearsonate [emission, air, troposphere, rural]: 0.000194 kg
  (same comment as for Glyphosate)
- Suspended solids, inorganic [emission, water]: 10.2 kg
  Erosion (6)
- Particulate matter [emission, air, troposphere, rural]: 4.08e-5 kg
  Particulate emissions during harvesting (16)
- Disulfoton [emission, air, troposphere, rural]: 2.97e-5 kg
  (same comment as for Glyphosate)
- Endosulfan [emission, water]: 7.88e-7 kg
  (same comment as for Malathion)
- Norflurazon [emission, water]: 2.75e-6 kg
  (same comment as for Malathion)
- Sodium chlorate [emission, water]: 1.16e-5 kg
  (same comment as for Malathion)
- Hydrocarbons [emission, air, troposphere, rural]: 0.0054 kg
  (same comment as for Glyphosate)
- Nitrogen [emission, water]: 0.0152 kg
  Runoff/leaching of fertilizers (16)
- Norflurazon [emission, air, troposphere, rural]: 6.42e-5 kg
  (same comment as for Glyphosate)
- Bromoxynil [emission, air, troposphere, rural]: 5.21e-6 kg
  (same comment as for Glyphosate)
- Tribufos [emission, water]: 8.74e-6 kg
  (same comment as for Malathion)
- Ethephon [emission, air, troposphere, rural]: 0.000216 kg
  (same comment as for Glyphosate)
- Metolachlor [emission, air, troposphere, rural]: 2.06e-5 kg
  (same comment as for Glyphosate)
- Aldicarb [emission, air, troposphere, rural]: 0.00011 kg
  (same comment as for Glyphosate)
- Prometryn [emission, water]: 2.91e-6 kg
  (same comment as for Malathion)
- Paraquat [emission, air, troposphere, rural]: 4.34e-5 kg
  (same comment as for Glyphosate)
- Trifluralin [emission, water]: 1.02e-5 kg
  (same comment as for Malathion)
- Sodium methyldithiocarbamate [emission, water]: 2.37e-6 kg
  (same comment as for Malathion)
- Chlorpyrifos [emission, water]: 1.99e-6 kg
  (same comment as for Malathion)
- Azinphos-methyl [emission, air, troposphere, rural]: 9.73e-6 kg
  (same comment as for Glyphosate)
- 2,4-D [emission, water]: 2.02e-8 kg
  (same comment as for Malathion)
- Ammonia [emission, air, troposphere, rural]: 0.00748 kg
  Air emissions of N2O and NH3 and NOx (4)
- Diuron [emission, air, troposphere, rural]: 5.63e-5 kg
  (same comment as for Glyphosate)
- Chlorpyrifos [emission, air, troposphere, rural]: 4.63e-5 kg
  (same comment as for Glyphosate)

## Allocation factors
- causal, Cotton straw, at field, for Water: 0
- causal, Cotton, at field, for Cyanazine: 1
- causal, Cotton straw, at field, for Phorate: 0
- causal, Cotton, at field, for Diesel, combusted in industrial equipment: 1
- causal, Cotton, at field, for Hydrocarbons: 1
- causal, Cotton straw, at field, for Phorate: 0
- causal, Cotton, at field, for Phorate: 1
- causal, Cotton, at field, for Chlorpyrifos: 1
- causal, Cotton, at field, for 1,3-Dichloropropene: 1
- causal, Cotton straw, at field, for Sodium chlorate: 0
- causal, Cotton straw, at field, for Water: 0
- causal, Cotton, at field, for Sodium methyldithiocarbamate: 1
- causal, Cotton, at field, for Monosodium methanearsonate: 1
- causal, Cotton straw, at field, for Acephate: 0
- causal, Cotton, at field, for Sodium methyldithiocarbamate: 1
- causal, Cotton, at field, for Transport, single unit truck, diesel powered: 1
- causal, Cotton straw, at field, for Liquefied petroleum gas, combusted in industrial boiler: 0
- causal, Cotton, at field, for Diuron: 1
- causal, Cotton straw, at field, for Acephate: 0
- causal, Cotton straw, at field, for Natural gas, combusted in industrial boiler: 0
- causal, Cotton, at field, for Glyphosate: 1
- causal, Cotton straw, at field, for Cyanazine: 0
- causal, Cotton straw, at field, for Land use: 0
- causal, Cotton, at field, for Nitrous oxide: 1
- causal, Cotton, at field, for Water: 1
- causal, Cotton straw, at field, for Agrochemicals, at plant: 0
- causal, Cotton, at field, for Metolachlor: 1
- causal, Cotton, at field, for Fluometuron: 1
- causal, Cotton straw, at field, for Sodium chlorate: 0
- causal, Cotton straw, at field, for Land use: 0
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
## Sources
- USDA/NRCS
- National Center for Food and Agricultura
- Conservation Technology Information Cent
- USGS
- USDA/ERS
- USDA/ERS
- USDA/ERS
- USDA/NRI
- USDA/National Agricultural Statistics Se
- USDA/ERS
- USGS
- USDA/ERS
- U.S. EPA
- USDA/ERS
- U.S. EPA
- U.S. EPA
- USDA/NCRS
- USDA/ERS
- U.S. EPA
- USDA / NCRS Tennessee
