# Galvanized steel coil, coated, at plant

Dataset: openLCA process, unit process
Category: 31-33: Manufacturing/3328: Coating, Engraving, Heat Treating, and Allied Activities
Geography: Northern America
Time period: 2013-12-31 to 2015-02-27
Allocation method: no allocation
Generated by: PE INTERNATIONAL
Published in: PE INTERNATIONAL
restrictionsDescription: All information can be accessed by everybody.
copyright: false

## General comment
The coil coating process includes all known cradle-to-gate processes necessary for the treatment of metallic sheets. This process includes galvanized sheet as the metal feedstock. Raw materials include all known pre-treatments, cleaners, paints, and packaging materials to protect the finished sheets--as well as inbound transport. Manufacturing processes require electricity, heat from natural gas, and process water. Air and water emissions are captured in the output of the process.

## Technology
Coil coating of galvanized steel sheet. Technology based on companies identified by Metal Construction Association to be representative of industry.

## Geography
North America

## Reference product
- Galvanized steel coil, coated, at plant [RNA]: 5.82563 kg

## Inputs from technosphere
- Recycling, Steel scrap: 0.15687 kg
- Coil, coating, m2, at plant [RNA]: 1 m2
- Galvanized steel sheet, at plant: 5.82563 kg

## Sources
- PE INTERNATIONAL
