# Scanner, desktop, E1025, E1035, S2040, S2050, S2060w, S2070, S2080w

Dataset: openLCA process, unit process
Category: 31-33: Manufacturing/3341: Computer and Peripheral Equipment Manufacturing
Geography: China
Time period: 2017-12-31 to 2019-05-29
Allocation method: no allocation
Data quality: US EPA - Process Pedigree Matrix (2;1)
Exchange data quality scheme: US EPA - Flow Pedigree Matrix
Generated by: Roy Wood
Owner: Kodak Alaris
Reviewer: Jay Mathewson
Published in: Wood R (2012) LC GHG Summary Report Kodak i2800, i2600, i2400 Scanners
restrictionsDescription: Summary is available to public.
These U.S. LCI Database Project data ("Data") are provided by the National Renewable Energy Laboratory ("NREL"), operated by the Alliance for Sustainable Energy, LLC ("Alliance") for the US Department of Energy ("DOE") under Contract No. DE-AC36-08GO28308. The United States Government (the "Government") retains and the user acknowledges that the Government retains a non-exclusive, paid-up, irrevocable, worldwide license to publish or reproduce the published form of these data, or allow others to do so, for Government purposes.
Access to and use of these Data shall impose the following obligations on the user, as set forth in this Agreement. The user is granted the right, without any fee or cost, to use, copy, modify, alter, enhance and distribute these Data for any purpose whatsoever, provided that this entire notice appears in all copies of the Data. Any modification, alteration or enhancement of these data shall be identified and documented by the user. Further, the user agrees to credit the DOE/NREL/Alliance in any publication that results from the use of these Data. The names DOE/NREL/Alliance, however, may not be used in any advertising or publicity to endorse or promote any products or commercial entities unless specific written permission is obtained from DOE/NREL/Alliance. The user also understands that DOE/NREL/Alliance is not obligated to provide the user with any support, consulting, training or assistance of any kind with regard to the use of these Data or to provide the user with any updates, revisions or new versions of these Data.
YOU AGREE TO INDEMNIFY THE GOVERNMENT AND DOE/NREL/ALLIANCE, AND ITS SUBSIDIARIES, AFFILIATES, OFFICERS, AGENTS, AND EMPLOYEES AGAINST ANY CLAIM OR DEMAND, INCLUDING REASONABLE ATTORNEYS' FEES, RELATED TO YOUR USE OF THESE DATA. THESE DATA ARE PROVIDED BY DOE/NREL/ALLIANCE "AS IS" AND ANY EXPRESS OR IMPLIED WARRANTIES, INCLUDING BUT NOT LIMITED TO, THE IMPLIED WARRANTIES OF MERCHANTABILITY AND FITNESS FOR A PARTICULAR PURPOSE ARE DISCLAIMED. IN NO EVENT SHALL THE GOVERNMENT OR DOE/NREL/ALLIANCE BE LIABLE FOR ANY SPECIAL, INDIRECT OR CONSEQUENTIAL DAMAGES OR ANY DAMAGES WHATSOEVER, INCLUDING BUT NOT LIMITED TO CLAIMS ASSOCIATED WITH THE LOSS OF DATA OR PROFITS, WHICH MAY RESULT FROM AN ACTION IN CONTRACT, NEGLIGENCE OR OTHER TORTIOUS CLAIM THAT ARISES OUT OF OR IN CONNECTION WITH THE ACCESS, USE OR PERFORMANCE OF THESE DATA.
copyright: false

## General comment
This unit process represents the gate-to-gate production of one Kodak Alaris scanner models E1025, E1035, S2040, S2050, S2060w, S2070, and S2080w (mass = 3.72 kg). The system boundary includes: 1) the transport of raw materials to multiple manufacturing facilities where various subcomponents are produced; 2) the manufacture of subcomponents; 3) the transport of subcomponents to a different manufacturing plant for final assembly; 4) the assembly of subcomponents into a complete scanner; and 5) the transport of generated waste from the manufacturing facilities to a municipal solid waste landfill. The following processes and life cycle phases fall outside of the system boundary: 1) packaging of the completed scanner; 2) all transport downstream of the assembly plant gate; 3) sale of product; 4) product use phase; and 5) end-of-life phase (including recycling).

The use of this unit process for the analysis of similar devices requires professional judgement based on the degree of similarity.

## Technology
The manufacture of a desktop scanner that uses 2016 technology including information storage and processing and energy savings features. The manufacture includes the manufacturing of subcomponents at other facilities and assembly at a central location.

## Geography
Scanners are manufactured in China, but components represent a global supply chain and secondary data is based on best available data from global sources.

## Time period
Primary data is valid from 2017 - 2019. Secondary data is valid from 2005 - 2019

## Reference product
- Scanner, desktop, E1025, E1035, S2040, S2050, S2060w, S2070, S2080w [CN]: 1 Item(s)
  3.72 kg desktop E and S series scanners

## Inputs from technosphere
- Polyvinyl chloride, PVC, resin, at plant [RNA]: 0.16 kg; triangle minimum 0.158, mode 0.16, maximum 0.162
- tetrachloroethylene, at plant - RER U: 0.027 kg; triangle minimum 0.0265, mode 0.027, maximum 0.0275
- flat glass, uncoated - GLO: 0.04 kg; triangle minimum 0.039, mode 0.04, maximum 0.041
- polyoxymethylene (POM) - EU-27: 0.107 kg; triangle minimum 0.106, mode 0.107, maximum 0.108
- synthetic rubber: 0.041 kg; triangle minimum 0.04, mode 0.041, maximum 0.042
- polycarbonate: 0.118 kg; triangle minimum 0.117, mode 0.118, maximum 0.119
- Natural gas, processed, at plant, 1.357 m3/kg [RNA]: 0.0019 m3; triangle minimum 0.0015, mode 0.0019, maximum 0.0023; provider Natural gas, processed, at plant
- Iron, sand casted: 0.039 kg; triangle minimum 0.0385, mode 0.039, maximum 0.0395
- steel, chromium steel, 18/8 - GLO: 0.144 kg; triangle minimum 0.142, mode 0.144, maximum 0.146
- metal product manufacturing, average metal working: 0.788 kg; triangle minimum 0.779, mode 0.788, maximum 0.797
- copper, primary, at refinery: 0.123 kg; triangle minimum 0.121, mode 0.123, maximum 0.125
- Cold rolled sheet, steel, at plant: 0.463 kg; triangle minimum 0.458, mode 0.463, maximum 0.468
- electricity, low voltage, at grid: 5.05 kWh; triangle minimum 4.5, mode 5.05, maximum 5.6
- printed wiring board, through-hole mounted, unspecified, Pb free: 0.211 kg; triangle minimum 0.209, mode 0.211, maximum 0.213
- Transport, aircraft, freight [RNA]: 0.58 t*km; triangle minimum 0.4, mode 0.58, maximum 0.75
- Transport, pipeline, natural gas [RNA]: 0.00136 t*km; triangle minimum 0.0068, mode 0.00136, maximum 0.0021
- glass, for liquid crystal display: 0.038 kg; triangle minimum 0.0375, mode 0.038, maximum 0.0385
- nylon 6-6 - GLO: 0.061 kg; triangle minimum 0.06, mode 0.061, maximum 0.062
- petrol, unleaded: 0.08 kg; triangle minimum 0.079, mode 0.08, maximum 0.081
- Aluminum ingot, production mix, at plant [US]: 0.019 kg; triangle minimum 0.0188, mode 0.019, maximum 0.0192
- Polyethylene, low-density, LDPE, virgin resin, at plant: 0.00042 kg; triangle minimum 0.000415, mode 0.00042, maximum 0.000425
- Transport, combination truck, average fuel mix [RNA]: 3.37 t*km; triangle minimum 2.8, mode 3.37, maximum 3.95
- transport, passenger, aircraft: 0.56 p*km; triangle minimum 0.35, mode 0.56, maximum 0.77
- Injection molding, rigid polypropylene part, at plant [RNA]: 2.29 kg; triangle minimum 2.1, mode 2.29, maximum 2.55
- Acrylonitrile-butadiene-styrene, ABS, copolymer resin, at plant [RNA]: 1.921 kg; triangle minimum 1.902, mode 1.921, maximum 1.94

## Inventory method
Attributional.

## Modelling constants
Allocation rules: Materials were based on actual specifications. Energy and fuels were allocated to products manufactured at the location based on their mass.
Substitution allocation: Substitution by close proxy ( data for similar processes were used for the components)

## Completeness
TREATMENT OF MISSING Environmental Data - all known elementary flows are included, so cutoff is <1%
Technosphere flow data - Intermediate flows are cut-off at less than 1% (physical criteria). Capital equipment used for manufacturing are not included.

MASS BALANCE - The mass of inputs (not including fuels) balances with the scanner output, so there is less than 1% difference.

## Data selection
An attempt was made to include data for all inputs. Primary data was used where available and the most representative secondary data was used where primary data was not available.

## Data treatment
Primary data were taken from precise engineering specifications specific to this unit process. These data were then transformed into material and energy flows using the methodology described in Wood (2019) which is due to be released in August, 2019. The Wood (2019) methodology is almost identical to the methodology described in Wood (2012) which is an ISO 14044 compliant, peer-reviewed life cycle assessment report of three Kodak scanners (Kodak i2800; i2600; and i2400).

Secondary data were taken from the ecoinvent 3.2 database (Wernet et al. 2016) and the U.S. Life Cycle Inventory Database (National Renewable Energy Laboratory 2016). The data were global except where otherwise specified.

## Data collection
All primary data were collected from 2018 to 2019. Secondary data were collected from 2005-2019 (National Renewable Energy Laboratory 2016; Wernet et al. 2016).

## Sampling procedure
BOUNDARY CONDITIONS
The system boundary includes: 1) the transport of raw materials to multiple manufacturing facilities where various subcomponents are produced; 2) the manufacture of subcomponents; 3) the transport of subcomponents to a different manufacturing plant for final assembly; 4) the assembly of subcomponents into a complete scanner; and 5) the transport of generated waste from the manufacturing facilities to a municipal solid waste landfill. The following processes and life cycle phases fall outside of the system boundary: 1) packaging of the completed scanner; 2) all transport downstream of the assembly plant gate; 3) sale of product; 4) product use phase; and 5) end-of-life phase (including recycling).

DATA COLLECTION
For material inputs, data collection was based on scanner specifications provided by the manufacturer. Other inputs (e.g. energy; waste transport and disposal) were calculated on the basis of quantity of input per kg of scanner produced.

UNCERTAINTY ESTIMATION
Uncertainty was estimated based on engineering judgment. Material inputs had less uncertainty because they were based off of precise engineering specifications. Other inputs (e.g. energy; waste transport and disposal) had more uncertainty.

## Review details
The Wood (2019) methodology is almost identical to the methodology described in Wood (2012) which is an ISO 14044 compliant, peer-reviewed LCA report of three Kodak scanners (Kodak i2800; i2600; and i2400), which was peer reviewed by Kate Wennebeck of Rochester Institute of Technology's Pollution Prevention Institute.

## Intended application
The intended application for this unit process is for "Accounting" purposes as described in Situation C2 from the Institute for Environment and Sustainablility (2011:3). As such, it describes the gate-to-gate production of one E or one S series desktop scanner "without being interested in any potential consequences on other parts of the economy" (Institute for Environment and Sustainablility 2011:3) and without consideration of potential benefits from recycling the scanner at the end of its useful life.

## Project
Data and LCA results are reported in Wood (2019) Life Cycle Greenhouse Gas Assessment Summary Report -
Kodak Alaris models E1025, E1035, S2040, S2050, S2060w, S2070, S2080w Scanners - ISO 14044 Protocol

## Sources
- Wernet et al. (2016) The ecoinvent database version 3 (part I): overview and methodology.
