# Poles, softwood, PCP treated

Dataset: openLCA process, unit process
Category: 31-33: Manufacturing/3211: Sawmills and Wood Preservation
Geography: Northern America
Time period: 2004-12-31 to 2009-12-30
Allocation method: no allocation
Generated by: Chris Bolin;
Reviewer: Paul Cooper
Published in: Chris Bolin
restrictionsDescription: All information can be accessed by everybody.
copyright: false

## General comment
Pressure-treated pentachlorophenol (aka penta or PCP) softwood debarked logs seasoned utility poles. Base process data presented with allocations to within process co-products noted. Refer to allocation worksheet for specifics. All allocations performed using mass or volume. This sheet sets out each unit process in the production of one cubic meter of penta treated utility poles producted in the US Pacific Northwest and Southeast regions. Important note: although most of the data in the US LCI database has undergone some sort of review, the database as a whole has not yet undergone a formal validation process. Please email comments to lci@nrel.gov.; Geography: US

## Technology
typical

## Geography
US

## Time period
2005-2009

## Reference product
- Poles, softwood, PCP treated [RNA]: 1 m3
  Retention = 0.359 lb/ft3 = 5.750628 kg/m3, dry basis

## Inputs from technosphere
- Roundwood; softwood; debarked; at plywood mill [US]: 180 kg
  PNW Fraction = 40%; weighed average mass = 491.4 kg/m3; Energy to dry wood is included in fuel inputs
- Transport, train, diesel powered [RNA]: 9.9 t*km
  Preservative Production; 95% of penta preservative transport; survey data
- Electricity, at grid [RNA]: 1.852, 2.778 kWh (2 entries); provider Electricity, at Grid, US, 2010
  Preservative Production
- Residual fuel oil, at refinery [RNA]: 0.783 l; provider Petroleum refining, at refinery
  Preservative Production; feedstock
- Gasoline, combusted in equipment [RNA]: 0.22 l
  Preservative Wood Treatment
- Natural gas, processed, at plant, 1.357 m3/kg [RNA]: 1.19 m3; provider Natural gas, processed, at plant
  Preservative Wood Treatment; feedstock
- Natural gas, combusted in industrial boiler [RNA]: 1.2 m3
  Preservative Production
- Residual fuel oil, combusted in industrial boiler [RNA]: 0.578 l
  Preservative Production
- Natural gas, combusted in industrial boiler [RNA]: 2 m3
  Preservative Wood Treatment
- Chlorine, at plant: 7.7 kg
  Preservative Production
- Wood waste, unspecified, combusted in industrial boiler [RNA]: 87.9 kg
  Preservative Wood Treatment; based on green moisture content 50%
- Phenol, at plant: 2 kg
  Preservative Production
- Diesel, combusted in industrial equipment [RNA]: 2.5 l
  Preservative Wood Treatment
- Bituminous coal, combusted in industrial boiler [RNA]: 0.125 kg
  Preservative Production
- Natural gas, combusted in industrial equipment, 1.357 m3/kg, 52.13 MJ/kg [RNA]: 0.000106 m3; provider Natural gas, combusted in industrial equipment
  Preservative Wood Treatment; surrogate for LPG
- Diesel, at refinery: 78.7 l; provider Petroleum refining, at refinery
  Preservative Production; feedstock
- Electricity, at grid [RNA]: 12.948, 19.422 kWh (2 entries); provider Electricity, at Grid, US, 2010
  Preservative Wood Treatment
- Disposal, solid waste, unspecified, to unspecified landfill: 34 kg
  Preservative Wood Treatment; Solid waste disposal associated with the coal mining and coal distillation by product processing. Solid waste disposal as reported in treater surveys as other (normal trash or municipal waste). Other waste disposal—Amount of normal trash or municipal waste that is typically collected in trash cans or dumpsters.
- Transport, combination truck, diesel powered [RNA]: 380 t*km
  Preservative Wood Treatment; 100% of log resource; survey data
- Transport, combination truck, diesel powered [RNA]: 0.52 t*km
  Preservative Production; 5% of penta preservative transport; survey data
- Roundwood; softwood; debarked; at plywood mill [US]: 311.4 kg
  SE Fraction = 60%; weighed average mass = 491.4 kg/m3; Energy to dry wood is included in fuel inputs
- Diesel, combusted in industrial boiler [RNA]: 0.0323 l
  Preservative Production
- Disposal, solid waste, unspecified, to unspecified treatment: 35 kg
  Preservative Wood Treatment; Hazardous and Process waste disposed—Amount of hazardous waste for the survey year and units (pounds, tons, drums, etc.). Chemical and process waste disposed—Amount of waste and units from the treatment process, such as from tanks, treatment equipment, and drip pad area, but not including hazardous waste. This may be regulated in your state as chemical, industrial, or special waste.

## Inputs from nature
- Water [resource, water]: 170000 kg
  Preservative Production
- Water [resource, water]: 0.17 kg
  Preservative Wood Treatment

## Emissions to nature
- Hydrochloric acid [emission, air, troposphere, rural]: 9.9e-7 kg
  Preservative Production
- Carbon monoxide [emission, air, troposphere, rural]: 0.00063 kg
  Preservative Production
- Volatile organic compounds [emission, air, troposphere, rural]: 0.13 kg
  Preservative Wood Treatment; at kiln: emission from the wood product being dried
- Nitrogen oxides [emission, air, troposphere, rural]: 0.0019 kg
  Preservative Production
- Volatile organic compounds [emission, air, troposphere, rural]: 2.3e-5 kg
  Preservative Production
- Sulfur oxides [emission, air, troposphere, rural]: 0.00089 kg
  Preservative Production
- Carbon dioxide [emission, air, troposphere, rural]: 0.2 kg
  Preservative Production
- Pentachlorophenol [emission, air, troposphere, rural]: 0.00013 kg
  Preservative Wood Treatment
- Lead [emission, air, troposphere, rural]: 3.4e-11 kg
  Preservative Production
- Particulate matter, ≤ 10μm [emission, air, troposphere, rural]: 0.00039 kg
  Preservative Production
- Pentachlorophenol [emission, ground, human-dominated, industrial]: 0.00025 kg
  Preservative Wood Treatment
- Mercury [emission, air, troposphere, rural]: 1e-6 kg
  Preservative Production

## Sampling procedure
Industry survey

## Sources
- Chris Bolin
- Chris Bolin
