# Electricity, at eGrid, SRTV, 2010

Dataset: openLCA process, unit process
Category: 22: Utilities/2211: Electric Power Generation, Transmission and Distribution
Geography: Northern America
Time period: 2009-12-31 to 2009-12-31
Allocation method: no allocation
Generated by: Samantha Wascavage
Published in: Chris Goemans, Athena Institute
restrictionsDescription: All information can be accessed by everybody.
copyright: false

## General comment
The methodology used to put together the grid information is outlined in reference 1.

## Technology
Typical

## Geography
SRTV Tennessee Valley electricity grid to includes Tennessee, most of Kentucky (less RFCW) and a small portions of West Virginia, North Carolina, Georgia, Alabama and Mississippi.

## Reference product
- Electricity, at grid [RNA]: 1 kWh

## Inputs from technosphere
- Electricity, hydropower, at power plant, unspecified: 0.068729 kWh
  Hydroelectric WAT – Water (Conventional, Pumped Storage)
- Electricity, nuclear, at power plant [RNA]: 0.217661 kWh
  Nuclear Fission NUC – Nuclear (Uranium, Plutonium, Thorium)
- Electricity, tire derived fuel, at power plant: 0.001831 kWh
  Solid Renewable Fuels (Biomass) TDF, AB, MSB, MSW, OBS, WDS - tires, tire derived fuel
- Electricity, natural gas, at power plant [RNA]: 0.10982 kWh
  Natural Gas
- Electricity, lignite coal, at power plant [RNA]: 0.013681 kWh
  Lignite Coal
- Electricity, diesel, at power plant [RNA]: 0.001699 kWh
  Petroleum (DFO, JF, KER) – Distillate Fuel Oil (includes all Diesel and No. 1, No. 2, and No. 4 Fuel Oils)
- Electricity, at wind power plant, unspecified: 0.000167 kWh
  Wind
- Electricity, petroleum coke, at power plant: 0.008922 kWh
  Petroleum (Other Fossil) PC, SG, WO - petroleum coke
- Electricity, bituminous coal, at power plant [RNA]: 0.516354 kWh
  Bituminous Coal BIT, SC, SGC, WC - Anthracite Coal, and Bituminous Coal.
- Electricity, bituminous coal, at power plant [RNA]: 0.052475 kWh
  SUB – Subbituminous Coal
- Electricity, residual fuel oil, at power plant [RNA]: 1.7e-5 kWh
  Petroleum (RFO) – Residual Fuel Oil (includes No. 5 and No. 6 Fuel Oils and Bunker C Fuel Oil)
- Electricity, biomass,liquid, unspecified, at power plant: 0.008358 kWh
  Liquid Renewable Fuels (Biomass) BLQ, OBL, SLW, WDL - black liquor
- Electricity, biomass, gas, landfill, at power plant: 0.000286 kWh
  Gaseous Renewable Fuels (Biomass) LFG, OBG - landfill gas

## Sampling procedure
based on EIA electricity reports for all power plants in the US.

## Sources
- EIA
- EIA
- Statistics Canada
- Statistics Canada
- Chris Goemans, Athena Institute
- EIA
- USEPA
- EIA
- Statistics Canada
- EIA
- Statistics Canada
- EIA
- unspecified
- EIA
- USEPA
- EIA
- EIA
- Statistics Canada
- US DOE
- International Energy Agency
- EIA
