# Electricity, at Grid, HICC, 2010

Dataset: openLCA process, unit process
Category: 22: Utilities/2211: Electric Power Generation, Transmission and Distribution
Geography: Northern America
Time period: 2009-12-31 to 2009-12-31
Allocation method: no allocation
Generated by: Samantha Wascavage
Published in: Chris Goemans, Athena Institute
restrictionsDescription: All information can be accessed by everybody.
copyright: false

## General comment
The methodology used to put together the grid information is outlined in reference 1.

## Technology
Typical

## Geography
Hawaii

## Reference product
- Electricity, at grid [RNA]: 1 kWh

## Inputs from technosphere
- Electricity, geothermal, unspecified: 0.018605 kWh
  GEO – Geothermal
- Electricity, bituminous coal, at power plant [RNA]: 0.143348 kWh
  BIT, SC, SGC, WC - Anthracite Coal, and Bituminous Coal.
- Electricity, biomass, solid, biogenic MSW, at power plant: 0.026141 kWh
  MSB, AB, MSW, OBS, TDF, WDS – Municipal Solid Waste – Biogenic Component
- Electricity, diesel, at power plant [RNA]: 0.132548 kWh
  DFO, JF, KER – Distillate Fuel Oil (includes all Diesel and No. 1, No. 2, and No. 4 Fuel Oils)
- Electricity, MSW, non-biogenic, at power plant: 0.03375 kWh
  MSN – Municipal Solid Waste – Non-biogenic components
- Electricity, residual fuel oil, at power plant [RNA]: 0.585734 kWh
  RFO – Residual Fuel Oil (includes No. 5 and No. 6 Fuel Oils and Bunker C Fuel Oil)
- Electricity, solar, unspecified, at power plant: 0.000164 kWh
  SUN – Solar (Photovoltaic, Thermal)
- Electricity, petroleum, waste oil, at power plant: 0.026926 kWh
  WO, PC, SG – Waste/Other Oil (including Crude Oil, Liquid Butane, Liquid Propane, Oil Waste, Re-Refined Motor Oil, Sludge Oil, Tar Oil, or other petroleum-based liquid wastes)
- Electricity, at wind power plant, unspecified: 0.024219 kWh
  WND – Wind
- Electricity, other gases, unspecified, at power plant: 0.002033 kWh
  OG, BFG, PG – Other Gas (Butane, Coal Processes, Coke-Oven, Refinery, and other processes)
- Electricity, hydropower, at power plant, unspecified: 0.006532 kWh
  WAT – Water (Conventional, Pumped Storage)

## Sampling procedure
based on EIA electricity reports for all power plants in the US.

## Sources
- EIA
- EIA
- Statistics Canada
- Statistics Canada
- Chris Goemans, Athena Institute
- EIA
- USEPA
- EIA
- Statistics Canada
- EIA
- Statistics Canada
- EIA
- unspecified
- EIA
- USEPA
- EIA
- EIA
- Statistics Canada
- US DOE
- International Energy Agency
- EIA
