# Electricity, at Grid, NPCC, 2008

Dataset: openLCA process, unit process
Category: 22: Utilities/2211: Electric Power Generation, Transmission and Distribution
Geography: Northern America
Time period: 2007-12-31 to 2007-12-31
Allocation method: no allocation
Generated by: Alberta Carpenter
Published in: Chris Goemans, Athena Institute
restrictionsDescription: All information can be accessed by everybody.
copyright: false

## General comment
The methodology used to put together the grid information is outlined in reference 1.

## Technology
Typical

## Geography
Connecticut, Maine, Massachusetts, New Brunswick, New Hampshire, New York, Nova Scotia, Ontario, Prince Edward Island, Quebec, Rhode Island and Vermont.

## Reference product
- Electricity, at grid [RNA]: 1 kWh

## Inputs from technosphere
- Electricity, bituminous coal, at power plant [RNA]: 0.000210976 kWh
  SC - Coal Synfuel. Coal-based solid fuel that has been processed by a coal synfuel plant, and coal-based fuels such as briquettes, pellets, or extrusions, which are formed from fresh or recycled coal and binding materials.
- Electricity, petroleum coke, at power plant: 0.000589686 kWh
  PC – Petroleum Coke
- Electricity, diesel, at power plant [RNA]: 0.00243744 kWh
  DFO – Distillate Fuel Oil (includes all Diesel and No. 1, No. 2, and No. 4 Fuel Oils)
- Electricity, bituminous coal, at power plant [RNA]: 0.105322 kWh
  BIT - Anthracite Coal, and Bituminous Coal.
- Electricity, biomass, at power plant [RNA]: 0.0167474 kWh
  WDS – Wood/Wood Waste Solids (Paper Pellets, Railroad Ties, Utility Poles, Wood Chips, and other wood solids)
- Electricity, tire derived fuel, at power plant: 0.00162658 kWh
  TDF – Tired (tire derived fuel)
- Electricity, petroleum, waste oil, at power plant: 5.40244e-5 kWh
  WO – Waste/Other Oil (including Crude Oil, Liquid Butane, Liquid Propane, Oil Waste, Re-Refined Motor Oil, Sludge Oil, Tar Oil, or other petroleum-based liquid wastes)
- Electricity, residual fuel oil, at power plant [RNA]: 0.0228154 kWh
  RFO – Residual Fuel Oil (includes No. 5 and No. 6 Fuel Oils and Bunker C Fuel Oil)
- Electricity, biomass, solid, biogenic MSW, at power plant: 0.0112872 kWh
  MSB – Municipal Solid Waste – Biogenic Component
- Electricity, bituminous coal, at power plant [RNA]: 0.0364627 kWh
  SUB – Subbituminous Coal
- Electricity, natural gas, at power plant [RNA]: 0.355602 kWh
  NG – Natural Gas
- Electricity, biomass,liquid, unspecified, at power plant: 0.00456588 kWh
  BLQ – Black Liquor
- Electricity, solar, unspecified, at power plant: 2.99869e-7 kWh
  SUN – Solar (Photovoltaic, Thermal)
- Electricity, other fuels, unspecified, at power plant: 4.88452e-5 kWh
  PUR – Purchased Steam
- Electricity, nuclear, at power plant [RNA]: 0.294507 kWh
  NUC – Nuclear (Uranium, Plutonium, Thorium)
- Electricity, biomass,liquid, unspecified, at power plant: 5.92394e-7 kWh
  OBL – Other Biomass Liquid (Ethanol, Fish Oil, Liquid Acetonitrile Waste, Medical Waste, Tall Oil, Waste Alcohol, and other Biomass not specified)
- Electricity, biomass,liquid, unspecified, at power plant: 0.000273362 kWh
  WDL – Wood Waste Liquids (Red Liquor, Sludge Wood, Spent Sulfite Liquor, and other wood based liquids
- Electricity, other fuels, unspecified, at power plant: 8.82005e-5 kWh
  OTH – Other (Batteries, Chemicals, Coke Breeze, Hydrogen, Pitch, Sulfur, Tar Coal, and miscellaneous technologies)
- Electricity, hydropower, at power plant, unspecified: 0.129236 kWh
  WAT – Water (Conventional, Pumped Storage)
- Electricity, diesel, at power plant [RNA]: 0.000514152 kWh
  KER – Kerosene
- Electricity, biomass, liquid, sludge, at power plant: 0.00019456 kWh
  SLW – Sludge Waste
- Electricity, biomass, gas, unspecified, at power plant: 5.67354e-6 kWh
  OBG – Other Biomass Gases (Digester Gas, Methane, and other biomass gases)
- Electricity, biomass, gas, landfill, at power plant: 0.00326427 kWh
  LFG – Landfill Gas
- Electricity, at wind power plant, unspecified: 0.00525976 kWh
  WND – Wind
- Electricity, diesel, at power plant [RNA]: 1.63972e-5 kWh
  JF – Jet Fuel
- Electricity, MSW, non-biogenic, at power plant: 0.00886858 kWh
  MSN – Municipal Solid Waste – Non-biogenic components

## Sampling procedure
based on EIA electricity reports for all power plants in the US.

## Sources
- EIA
- EIA
- EIA
- Chris Goemans, Athena Institute
- US DOE
- International Energy Agency
- Statistics Canada
- EIA
- Statistics Canada
- EIA
- EIA
- US DOE
- EIA
- USEPA
- Statistics Canada
- unspecified
- Statistics Canada
- EIA
- EIA
- EIA
- Statistics Canada
- USEPA
- Statistics Canada
- EIA
