# Transport, school bus, diesel powered, Northeast

Dataset: openLCA process, unit process
Category: 48-49: Transportation and Warehousing/4854: School and Employee Bus Transportation
Geography: Northern America
Time period: 2009-12-31 to 2009-12-31
Allocation method: no allocation
Generated by: Nathan Hardesty
Published in: U.S. Environmental Protection Agency (EP
restrictionsDescription: All information can be accessed by everybody.
copyright: false

## General comment
This dataset represents the Northeastern U.S. (CT, DC, DE, ME, MD, MA, NH, NJ, NY, PA, RI, VT (Reference 10)) average airborne emissions for operating a diesel powered school bus. The inventory includes all vehicle operation processes, including off-network and refueling activities.
The refinery-to-pump transportation and distribution data are calculated from Argonne National Laboratory's GREET 1.8d.1 model.
The vehicle operation data are calculated from EPA's MOVES2010a model, using the assumptions described in the corresponding detailed spreadsheet. Emissions factors in MOVES2010a are largely based on EPA's Mobile Source Observation Database, which in turn includes data from a variety of vehicle studies (References 6-8).
MOVES2010a acknowledges sources of uncertainty in the model structure, the population and acitivty data, and other model parameters. As of July 2011, the uncertainty calculation function of the model has not been activated.

## Technology
Combustion of diesel in a school bus.

## Geography
US

## Reference product
- Transport, school bus, diesel powered [RNA]: 1 p*km

## Inputs from technosphere
- Transport, combination truck, average fuel mix [RNA]: 0.00138605 t*km
- Transport, ocean freighter, average fuel mix [RNA]: 0.0094756 t*km
- Diesel, at refinery: 0.00429972 l; provider Petroleum refining, at refinery
- Transport, pipeline, unspecified petroleum products [RNA]: 0.0139709 t*km
- Transport, train, diesel powered [RNA]: 0.00258654 t*km
- Transport, barge, average fuel mix [RNA]: 0.00134063 t*km

## Emissions to nature
- Particulate matter, ≤ 10μm [emission, air]: 5.21758e-6 kg
  PM10 from organic carbon, elemental carbon, and sulfate particulates.
- Sulfur dioxide [emission, air]: 1.90529e-7 kg
- Particulate matter, ≤ 2.5μm [emission, air]: 1.99788e-7 kg
  PM2.5 from brakewear.
- Volatile organic compounds [emission, air]: 9.65455e-6 kg
- Particulate matter, ≤ 2.5μm [emission, air]: 5.06125e-6 kg
  PM2.5 from organic carbon, elemental carbon, and sulfate particulates.
- Methane [emission, air]: 5.85922e-7 kg
- Nitrogen oxides [emission, air]: 8.94394e-5, 9.74431e-5 kg (2 entries)
- Particulate matter, ≤ 2.5μm [emission, air]: 4.68769e-8 kg
  PM2.5 from tirewear.
- Nitrous oxide [emission, air]: 5.54781e-8 kg
- Particulate matter, ≤ 10μm [emission, air]: 1.95476e-7 kg
  PM10 from tirewear.
- Carbon monoxide [emission, air]: 6.49832e-5 kg
- Ammonia [emission, air]: 2.22155e-7 kg
- Hydrocarbons [emission, air]: 9.35535e-6 kg
- Nitrogen dioxide [emission, air]: 8.00383e-6 kg
- Carbon dioxide [emission, air]: 0.011289 kg
- Particulate matter, ≤ 10μm [emission, air]: 7.63188e-7 kg
  PM10 from brakewear.

## Sources
- American School Bus Council
- Assessment and Standards Division, Offic
- National Institute of Standards and Tech
- Wang, M.
- National Climatic Data Center, National
- U.S. Alternative Fuels and Advanced Vehi
- U.S. Environmental Protection Agency (EP
- Eastern Research Group
- Assessment and Standards Division, Offic
- EPA
