# Calcium carbonate, ground, fine slurry, 3 micron, at plant

Dataset: openLCA process, unit process
Category: 31-33: Manufacturing/3274: Lime and Gypsum Product Manufacturing
Geography: United States
Time period: 2013-12-30 to 2015-12-29
Allocation method: no allocation
Generated by: Sustainble Solutions Corporation
Reviewer: Industrial Ecology Consultants
Published in: Sustainable Solutions Corporation. (2016). IMA-NA Calcium Carbonate Life Cycle Assessment
restrictionsDescription: All information can be accessed by everybody.
copyright: false

## General comment
This unit process represents the gate-to-gate production of 1 kg of calcium carbonate (fine slurry, 3 micron) from calcium carbonate rock (i.e., marble, limestone, or chalk) using average technologies for the contiguous United States in 2014-2015. Additional details on the technologies used in this process are available in the Technology description field at the bottom of this section.

The system boundary includes: 1) quarry operations at the mine/quarry; 2) raw material transport from quarry operations to plant processing; 3) plant processing; 4) overhead energy consumption (e.g., lighting, heating, cooling, etc.) at quarry operations and plant processing; and 5) manufacturing waste and emissions. The following processes and life cycle phases fall outside of the system boundary: 1) construction of capital equipment; 2) maintenance of operation and support equipment; 3) Human labor and employee commute; 4) final product shipping; 5) packaging; 6) product use; and 7) product disposal. Additional details regarding system boundaries are available in the Modeling and validation section in the Sampling Procedure field.

## Technology
The technologies described in this process are representative of average technologies in use in the United States from 2014-2015.

Quarry operations include mechanical extraction, primary crushing, screening, and intermediate storage of calcium carbonate rock (marble, limestone, or chalk). The output of quarry operations is then transported via barge, train, or truck to plant processing which includes washing, wet milling, flotation, cycloning, a second wet milling or thickening, mixing, and wet fine grinding.

## Geography
This unit process is reflective of U.S. production.

## Time period
This unit process is representative of operations from 2014-2015.

## Reference product
- Calcium carbonate, ground, fine slurry, 3 micron, at plant [US]: 1 kg

## Inputs from technosphere
- Polyethylene terephthalate, PET, virgin resin, at plant, kg: 0.000584225 kg
- Lead, at regional storage: 0.000628317 kg
  Battery proxy for quarrying equipment
- Petroleum refining coproduct, at refinery [RNA]: 0.0165761 l
  Assumed density of 0.665 kg/l, materials for quarrying equipment. USLCI NOTE: Flow from USLCI used as proxy for 'Naphtha, at regional storage'; note transport to regional storage not included.
- Silica sand, at plant: 0.164244 kg
  Proxy for grinding media
- Residual fuel oil, combusted in industrial boiler [RNA]: 0.399037 l
- Glycerine, at plant [RNA]: 0.298726 kg
- Polypropylene, PP, resin, at plant [RNA]: 0.000650364 kg
- Electricity, at grid [RNA]: 241.406 kWh; provider Electricity, at Grid, US, 2010
- Alumina, at plant [RNA]: 0.295419 kg
  Proxy for grinding media
- Acrylic acid, at plant: 0.00485017 kg
- Methylene diphenyl diisocyanate, MDI, resin, at plant [RNA]: 0.00110231 kg; provider Methylene diphenyl diisocyanate, MDI, at plant
- Sulfuric acid, at plant: 0.000936965 kg
  Battery proxy for quarrying equipment
- Steel, stainless 304, quarto plate [RNA]: 0.010979 kg
  Materials for quarrying equipment and materials for screens
- Diesel, combusted in industrial equipment [RNA]: 2.29281 l
- Kerosene, at refinery [RNA]: 0.0308647 l; provider Petroleum refining, at refinery
  Materials for quarrying equipment
- Gasoline, combusted in equipment [RNA]: 0.0198416 l
- Disposal, municipal solid wastes, to sanitary landfill: 0.165347 kg
- Transport, barge, diesel powered [RNA]: 308.647 t*km
  Raw material transport to processing plant
- Transport, combination truck, diesel powered [RNA]: 14.6607 t*km
  Raw material, accessory material and fuel transport to quarry and processing plant
- Biocide, at plant: 0.0318568 kg
- Disposal, mineral waste, underground deposit: 1631.42 kg
- Acetic acid, at plant [RNA]: 0.523598 kg
- Conveyor belt, at plant: 0.000264555 m
- Textile, woven cotton, at plant: 0.00364865 kg
  Materials for quarrying equipment
- Ethylene glycol, at plant, kg: 0.0191802 kg; provider Ethylene glycol, materials production, organic compound, at plant, kg
  Antifreeze for quarrying equipment
- Natural gas, combusted in industrial equipment, 1.357 m3/kg, 52.13 MJ/kg [RNA]: 2.41406e-5 m3; provider Natural gas, combusted in industrial equipment
- Polybutadiene, butadiene rubber, BR, at plant [RNA]: 0.0152119 kg
  Materials for quarrying equipment
- Mixed recyclables, at collection, curbside, weight basis [RNA]: 0.00534621 kg
- Transport, train, diesel powered [RNA]: 294.317 t*km
  Raw material transport to processing plant
- Benzimidazole-compounds, at regional storehouse: 0.224872 kg
- Sodium hydroxide, production mix, at plant [US]: 0.0030975 kg; provider Chlorine, production mix, at plant
- Water, process: 275 kg
  This flow has no corresponding water output. The water remains in the final slurry product (27.5% water).
- Polycarboxylates, 40% active substance, at plant: 4.2213 kg
  Proxy for dispersants
- Blasting: 0.918225 kg
  Explosives for quarrying
- Polyol ether, for rigid foam polyurethane production, at plant [RNA]: 0.000738549 kg

## Inputs from nature
- Calcium carbonate [resource, ground]: 3.0714 kg

## Emissions to nature
- Particulate matter, ≤ 2.5μm [emission, air]: 0.000959011 kg
  Direct emissions from quarry operations and plant processing
- Particulate matter, ≤ 10μm [emission, air]: 0.00723116 kg
  Direct emissions from quarry operations and plant processing
- Particulate matter [emission, air]: 0.0405651 kg
  Direct emissions from quarry operations and plant processing

## Sampling procedure
BOUNDARY CONDITIONS
The system boundary includes: 1) quarry operations at the mine/quarry; 2) raw material transport from quarry operations to plant processing; 3) plant processing; 4) overhead energy consumption (e.g., lighting, heating, cooling, etc.) at quarry operations and plant processing; and 5) manufacturing waste and emissions.

Quarry operations include mechanical extraction, primary crushing, screening, and intermediate storage of calcium carbonate rock (marble, limestone, or chalk). Plant processing includes washing, wet milling, flotation, cycloning, a second wet milling or thickening, mixing, and wet fine grinding. Both quarry operations and plant processing include inputs of energy/fuel, water, and support materials and outputs of waste and emissions.

The following processes and life cycle phases fall outside of the system boundary: 1) construction of capital equipment; 2) maintenance of operation and support equipment; 3) human labor and employee commute; 4) final product shipping; 5) Packaging; 6) product use; and 7) product disposal.

DATA COLLECTION
Primary data were collected for both quarry operations and plant processing. These data represent 2014-2015 weighted industry averages based on production from multiple U.S. locations. Quarry operations data were collected from four companies and five locations. Plant processing data were collected from three companies and three locations.

Secondary data were taken from the ecoinvent 3.2 database (Wernet et al., 2016) and the U.S. Life Cycle Inventory Database (National Renewable Energy Laboratory, 2016). The data were global except where otherwise specified.

UNCERTAINTY ESTIMATION
Uncertainty was not quantified.

## Review details
The life cycle assessment study which produced this unit process was critically reviewed per ISO 14040 and 14044 standards by Dr. Thomas Gloria of Industrial Ecology Consultants.

## Sources
- Sustainable Solutions Corporation. (2016). IMA-NA Calcium Carbonate Life Cycle Assessment
- Institute for Environment and Sustainablility. (2011). General guide for Life Cycle Assessment - Detailed guidance.
- National Renewable Energy Laboratory (2016). U.S. Life Cycle Inventory Database.
- Wernet et al. (2016) The ecoinvent database version 3 (part I): overview and methodology.
