# Limestone, at mine

Dataset: openLCA process, unit process
Category: 21: Mining, Quarrying, and Oil and Gas Extraction/2123: Nonmetallic Mineral Mining and Quarrying
Geography: Northern America
Time period: 1991-12-31 to 2001-12-31
Allocation method: no allocation
Generated by: Franklin Associates
Published in: Franklin Associates
restrictionsDescription: All information can be accessed by everybody.
copyright: false

## General comment
Limestone mining is quarried from open pits by blasting, followed by mechanical crushing and screening.
Important note: although most of the data in the US LCI database has
undergone some sort of review, the database as a whole has not yet
undergone a formal validation process.
Please email comments to lci@nrel.gov.

## Geography
United States

## Reference product
- Limestone, at mine [RNA]: 1 kg
  The quantity of limestone-containing material per unit of crushed and screened limestone is unknown. The non-limestone material recovered from limestone processing is returned to the mining site. This quantity represents minimum amount of limestone extracted/kg limestone output

## Inputs from technosphere
- Gasoline, combusted in equipment [RNA]: 5.11e-5 l
- Electricity, at grid [RNA]: 0.00423 kWh; provider Electricity, at Grid, US, 2010
- Natural gas, combusted in industrial boiler [RNA]: 0.00014 m3
- Diesel, combusted in industrial boiler [RNA]: 0.000584 l
- Bituminous coal, combusted in industrial boiler [RNA]: 3.58e-5 kg

## Inputs from nature
- Limestone [resource, ground]: 1 kg

## Emissions to nature
- Particulate matter [emission, air]: 5.11e-5 kg

## Sources
- U.S. EPA
- US EPA
- US EPA
- M. Michael Miller
- U.S. Department of Energy, EERE
- US Geological Survey
- unspecified
- unspecified
- Franklin Associates
- U.S. Energy Information Administration
