# Roundwood, hardwood, green, at logyard, SE

Dataset: openLCA process, unit process
Category: 11: Agriculture, Forestry, Fishing and Hunting/1133: Logging
Geography: United States
Time period: 2004-12-31 to 2005-12-31
Allocation method: physical allocation
Generated by: Maureen Puettmann
Published in: Richard D. Bergman
restrictionsDescription: All information can be accessed by everybody.
copyright: false

## General comment
All weights given on an ovendry basis.
Important note: although most of the data in the US LCI database has
undergone some sort of review, the database as a whole has not yet
undergone a formal validation process.
Please email comments to lci@nrel.gov.

## Technology
Average for log yard activities in regions

## Geography
SE = Southeast United States. The 8 states are Arkansas, Louisiana, Mississippi, Alabama, Tennessee, North Carolina, South Carolina, Georgia.

## Reference product
- Roundwood; hardwood; green; at logyard [US]: 1 m3
  oven-dried weight. Wood specific gravity of 0.528 and 85% MC dry basis.

## By-products
- Bark; hardwood; green; at logyard [US]: 21.6 kg
  Oven-dried weight; specific gravity of 0.558 and 100% MC dry basis

## Inputs from technosphere
- Gasoline, combusted in equipment [RNA]: 0.0721 l
  40% of mill transporation on-site
- Bark; hardwood; green; at mill [US]: 21.6 kg; provider Roundwood, hardwood, green, at mill, SE
  Weight reported on an ovendry basis.
- Roundwood; hardwood; green; at mill [US]: 1 m3; provider Roundwood, hardwood, green, at mill, SE
  oven-dried weight. Wood specific gravity of 0.528 and 85% MC dry basis.
- Diesel, combusted in industrial equipment [RNA]: 0.693 l
  40% of mill transporation on-site
- Electricity, at grid [RNA]: 3.41 kWh; provider Electricity, Eastern US, 2014
  5% of total electricity is used for wetting logs and lumberyard
- Natural gas, combusted in industrial equipment, 1.357 m3/kg, 52.13 MJ/kg [RNA]: 0.0057 l; provider Natural gas, combusted in industrial equipment
  40% of mill transporation on-site; proxy for propane
- Electricity; onsite boiler; hardwood mill; average [US]: 0.19 kWh; provider Heat, onsite boiler, hardwood mill, average, SE
  5% of total electricity is used for wetting logs and lumberyard

## Inputs from nature
- Water [resource, water, subterranean]: 88.09 kg

## Allocation factors
- causal, Bark; hardwood; green; at logyard, for Roundwood; hardwood; green; at mill: 0.0216346
- causal, Bark; hardwood; green; at logyard, for Diesel, combusted in industrial equipment: 0.0216346
- causal, Roundwood; hardwood; green; at logyard, for Diesel, combusted in industrial equipment: 0.978365
- physical, Bark; hardwood; green; at logyard: 0.0216346
- causal, Bark; hardwood; green; at logyard, for Water: 0.0216346
- causal, Roundwood; hardwood; green; at logyard, for Bark; hardwood; green; at mill: 0.978365
- causal, Roundwood; hardwood; green; at logyard, for Electricity, at grid: 0.978365
- causal, Bark; hardwood; green; at logyard, for Electricity, at grid: 0.0216346
- causal, Roundwood; hardwood; green; at logyard, for Roundwood; hardwood; green; at mill: 0.978365
- causal, Roundwood; hardwood; green; at logyard, for Electricity; onsite boiler; hardwood mill; average: 0.978365
- causal, Roundwood; hardwood; green; at logyard, for Water: 0.978365
- causal, Bark; hardwood; green; at logyard, for Electricity; onsite boiler; hardwood mill; average: 0.0216346
- physical, Roundwood; hardwood; green; at logyard: 0.978365
- causal, Bark; hardwood; green; at logyard, for Bark; hardwood; green; at mill: 0.0216346
- economic, Roundwood; hardwood; green; at logyard: 0.978365
- causal, Roundwood; hardwood; green; at logyard, for Natural gas, combusted in industrial equipment, 1.357 m3/kg, 52.13 MJ/kg: 0.978365
- causal, Roundwood; hardwood; green; at logyard, for Gasoline, combusted in equipment: 0.978365
- economic, Bark; hardwood; green; at logyard: 0.0216346
- causal, Bark; hardwood; green; at logyard, for Gasoline, combusted in equipment: 0.0216346
- causal, Bark; hardwood; green; at logyard, for Natural gas, combusted in industrial equipment, 1.357 m3/kg, 52.13 MJ/kg: 0.0216346

## Sampling procedure
Questionnaires from 12 mills from the 8 states of southeast region. Hardwood sawmills were members of the Hardwood Manufacturer Association (HMA).

## Intended application
Only mass allocation factors are available for the multi-functional processes (disregard economic allocation factor values-they are mass allocation factors).

## Sources
- Maureen Puettmann
- Richard D. Bergman
