# Pulpwood, softwood, average, at forest road, INW

Dataset: openLCA process, unit process
Category: 11: Agriculture, Forestry, Fishing and Hunting/1133: Logging
Geography: United States
Time period: 1988-12-31 to 1995-12-31
Allocation method: no allocation
Generated by: Maureen Puetmann
Published in: Leonard R. Johnson
restrictionsDescription: All information can be accessed by everybody.
copyright: false

## General comment
Important note: although most of the data in the US LCI database has undergone some sort of review, the database as a whole has not yet undergone a formal validation process. Please email comments to lci@nrel.gov.

## Technology
Average technology. Some data extrapolated from similar processes.

## Geography
US Inland West including Montana, Idaho, and eastern Washington

## Reference product
- Pulpwood; softwood; average; at forest road [US]: 1 m3

## Inputs from technosphere
- Pulpwood; softwood; national forest; average; at forest road [US]: 0.193186 m3; provider Pulpwood, softwood, national forest, average, at forest road, INW
- Pulpwood; softwood; average; state or private dry forest; at forest road [US]: 0.268283 m3; provider Pulpwood, softwood, average, state or private dry forest, at forest road, INW
- Pulpwood; softwd; avg; state or private moist forest; at forest rd [US]: 0.538532 m3; provider Pulpwood, softwd, avg, state or private moist forest, at forest rd, INW

## Sampling procedure
Average is calculated based on harvested areas and the specific yield for each type of forest.
Thirty year average harvest rates by owner group and sub-region (1970-2000) were applied to existing inventory data and simulated forward at the harvest intensity that has occurred in the past.

## Sources
- Maureen Puettmann
- Leonard R. Johnson
