# Pressed raw panels, hardwood, at engineered wood flooring plant, E

Dataset: openLCA process, unit process
Category: 31-33: Manufacturing/3219: Other Wood Product Manufacturing
Geography: United States
Time period: 2006-12-31 to 2006-12-31
Allocation method: no allocation
Generated by: Maureen Puettmann
Published in: Richard D. Bergman
restrictionsDescription: All information can be accessed by everybody.
copyright: false

## General comment
All weights given on an ovendry basis. All moisture contents are on an ovendry basis. MC% =(weight of water in wood / weight of oven dry wood) *100. Reference to specific gravities use oven dry mass and volumes at specified moisture contents. Reference to densities use mass and volume at specified moistrue contents.

Important note: although most of the data in the US LCI database has
undergone some sort of review, the database as a whole has not yet
undergone a formal validation process.
Please email comments to lci@nrel.gov.

## Technology
Average Transport distance

## Geography
E= Eastern US United States. The states included MN, IA, MO, WI, IL, NJ, OH, IN, MI, WV, PA, MD, DW, NJ, NY, ME, VT, NH, RI, MA, CT, VA, KY, AR, LA, MS, AL, FL,GA, NC, SC, and TN

## Reference product
- Pressed raw panels; hardwood; at engineered wood flooring plant [US]: 1 kg
  Oven dry mass, od basis

## Inputs from technosphere
- Electricity, at grid [RNA]: 0.337 kWh; provider Electricity, Eastern US, 2014
  Amount of electricity consumed during pressing. Represents 18.1% of mill use of electricity
- Heat; pressing panels; hardwood; at engineered wood flooring plant [US]: 1.077 MJ; provider Heat, drying veneer, hardwood, at veneer mill, E
  Amount of heat energy consumed during pressing. Reporesent 64.3% of flooring plant use of energy.
- Transport, combination truck, diesel powered [RNA]: 0.0797 t*km
  Transported 0.167 kg resins over 477 km; 0.0797tkm=0.167kg*1tonne/1000kg*477km
- Gasoline, combusted in equipment [RNA]: 0.000143792 l
  Amount of gasoline consumed during pressing. Represents 14.3% of mill use of gasoline
- Diesel, combusted in industrial equipment [RNA]: 0.000595638 l
  Amount of diesel consumed during pressing. Represents 5% of mill use of diesel
- Polyvinyl Acetate: 0.0584 kg
- Natural gas, combusted in industrial equipment, 1.357 m3/kg, 52.13 MJ/kg [RNA]: 7.43289e-7 m3; provider Natural gas, combusted in industrial equipment
  Amount of natural gas consumed during pressing. Represents 14.3% of mill use of natural gas; proxy for propane
- Veneer; hardwood; dry; at veneer mill [US]: 0.8977 kg; provider Veneer, hardwood, dry, at veneer mill, E
  Based on a weighted average green density and specific gravity of 613 kg/m3 and 0.578. Moisture content (ovendry basis) = 6.0%.
- Transport, combination truck, diesel powered [RNA]: 0.503 t*km
  Transporting non-purchased dry veneer 1,043 km; 0.8977kg*561km/1000=0.503 tkm. Transporting non-purchased dry veneer 1,043 km; 0.8977kg*561km/1000=0.503 tkm
- Urea formaldehyde, UF, resin, neat, 65% solids [RNA]: 0.1114 kg

## Emissions to nature
- Phenol [emission, air, troposphere, rural]: 9.22819e-6 kg
  EPA data
- Volatile organic compounds [emission, air, troposphere, rural]: 0.000553691 kg
  Two mills reported
- Formaldehyde [emission, air, troposphere, rural]: 5.03356e-5 kg
  One mills reported
- Hydrocarbons [emission, air, troposphere, rural]: 4.61409e-5 kg
  EPA data (total hydrocarbons as C per EPA Method 25A)
- Methyl isobutyl ketone [emission, air]: 4.78188e-6 kg
  EPA Data
- Methanol [emission, air, troposphere, rural]: 8.38926e-5 kg
  Two mills reported
- Acetone [emission, air, troposphere, rural]: 2.09732e-5 kg
  EPA Plywood Manufacturing—Emission Factor Documentation, AP-42, Chapter 10, Table 10.5-6, 2002
- Acetaldehyde [emission, air, troposphere, rural]: 0.000167785 kg
  One mill reported

## Sampling procedure
Questionnaires from 4 veneer and 5 flooring mills in the E. United States representing 32 states.

## Sources
- Richard D. Bergman
