# Electricity, aluminum smelting and ingot casting regions

Dataset: openLCA process, unit process
Category: 22: Utilities/2211: Electric Power Generation, Transmission and Distribution
Geography: Northern America
Time period: 2003-12-31 to 2003-12-31
Allocation method: no allocation
Generated by: James Littlefield, Franklin Associates
Published in: Franklin Associates, A Division of ERG
restrictionsDescription: All information can be accessed by everybody.
copyright: false

## General comment
Aluminum smelting is based upon an electrolytic process; therefore, a relatively large quantity of electricity is used to produce primary aluminum. According to IPAI 2002 statistics, the electricity profile for North American (Canada and the U.S.) smelters consists of the following fuels: hydro, 63.9%; coal, 34.6%; oil, 0.1%; natural gas, 0.4%; and nuclear, 0.9%. Of this electricity, 35.2% is self-generated and 64.8% is purchased.
Important note: although most of the data in the US LCI database has
undergone some sort of review, the database as a whole has not yet
undergone a formal validation process.
Please email comments to lci@nrel.gov.

## Technology
hydropower (63.9%), coal (34.6%), oil (0.1%), natural gas (0.4%), nuclear (0.9%).

## Geography
North America (100%)

## Reference product
- Electricity, aluminum smelting and ingot casting regions [RNA]: 1 MJ

## Inputs from technosphere
- Electricity, bituminous coal, at power plant [RNA]: 0.34631 kWh
- Electricity, nuclear, at power plant [RNA]: 0.008617 kWh
- Electricity, hydropower, at power plant, unspecified: 0.63943 kWh
- Electricity, natural gas, at power plant [RNA]: 0.004461 kWh
- Electricity, diesel, at power plant [RNA]: 0.001182 kWh

## Sources
- US Geological Survey
- Franklin Associates, A Division of ERG
- The Aluminum Association
- Energy Information Administration (EIA)
- IAI Statistical Report: Electrical Power
- US EPA
