# Medium density fiberboard (MDF), at MDF mill

Dataset: openLCA process, unit process
Category: 31-33: Manufacturing/3212: Veneer, Plywood, and Engineered Wood Product Manufacturing
Geography: Northern America
Time period: 2003-12-31 to 2003-12-31
Allocation method: physical allocation
Generated by: Maureen Puettmann
Published in: James B. Wilson
restrictionsDescription: All information can be accessed by everybody.
copyright: false

## General comment
All weights given on an ovendry basis.

Important note: although most of the data in the US LCI database has
undergone some sort of review, the database as a whole has not yet
undergone a formal validation process.
Please email comments to lci@nrel.gov. Review off this data by three industry representatives selected by the composite panel association (CPA); two academic reviewers selected by editors peer review journal

## Technology
The MDF process represents average US technology.

## Geography
Average US, United States data

## Reference product
- Medium density fiberboard (MDF), at MDF mill [RNA]: 1 m3
  1.0 m3 of mdf weighing 741 kg which includes wood, resin, wax, etc; ovendry weight; wt. average for 4 mills in US

## By-products
- Bark, at MDF mill [RNA]: 12.9 kg
  ovend dry weight; landscape mulch
- Wood fuel, sanderdust, at MDF mill [RNA]: 70 kg
  oven dry weight
- Wood waste, at MDF mill [RNA]: 0.0625 kg
  oven dry weight; sold for fuel
- Wood fuel, at MDF mill [RNA]: 54 kg
  oven dry weight

## Inputs from technosphere
- Wood waste, unspecified: 2.21 kg
- Shavings; softwood; kiln dried; at planer [US]: 61.6 kg; provider Sawn lumber, softwood, planed, kiln dried, at planer, NE-NC
  oven dry weight; original input was "Planer shavings, from green lumber, at planer mill" CUTOFF replaced with product linked to CORRIM database
- Wood fuel, MDF, purchased, combusted in industrial boiler [RNA]: 236 kg
  ovendryweight--bark hog fuel
- Shavings; softwood; kiln dried; at planer [US]: 95.152 kg; provider Sawn lumber, softwood, planed, kiln dried, at planer, NE-NC
  oven dry weight; original input was "Planer shavings, at planer mill" CUTOFF replaced with product linked to CORRIM database
- Electricity, at grid [RNA]: 415 kWh; provider Electricity, at Grid, US, 2010
- Chips; softwood; green; at sawmill [US]: 38.439, 230.634 kg (2 entries)
  oven dry weight
- Gasoline, combusted in equipment [RNA]: 0.131 l
- Urea formaldehyde, UF, resin, neat, 65% solids [RNA]: 134.4 kg
  UF neat resin at 62% solids; includes surrogate of 2.3 kg MUF resin at 65% solids and 1.1 kg of PMDI at 100% solids
- Emulsion wax 53% solids: 8.98 kg
  neat weight includes water
- Wood chips; hardwood; green; at sawmill [US]: 158.027 kg; provider Sawn lumber, hardwood, rough, green, at sawmill, SE
  oven dry weight
- Shavings; softwood; kiln dried; at planer [US]: 30.048 kg; provider Sawn lumber, softwood, planed, kiln dried, at planer, NE-NC
  oven dry weight; original input was "Planer shavings, from dried lumber, at planer mill" CUTOFF replaced with product linked to CORRIM database
- Transport, combination truck, diesel powered [RNA]: 1.63 t*km
  average one way delivery of 8.98 kg wax and 3.20 kg of urea by truck for 134 km with no back haul
- Panel trim; softwood; at plywood mill [US]: 27.9 kg
  oven dry weight
- Sawdust; hardwood; green; at sawmill [US]: 10.584 kg; provider Sawn lumber, hardwood, rough, green, at sawmill, NE-NC
  oven dry weight
- Urea 40% solids: 3.2 kg
  neat weight includes water
- Sawdust, at rough green lumber production [RNA]: 140.616 kg
  oven dry weight
- Diesel, combusted in industrial equipment [RNA]: 0.427 l
- Transport, combination truck, diesel powered [RNA]: 0.2 t*km
  average one way rail 1% of 134.4 kg of neat resin at 62% solids
- Wood fuel, MDF, generated on-site, combusted in industrial boiler [RNA]: 126.7 kg
  ovendry weight; actual MC of this fuel would be in the 20-30% dry basis range. 70 kg sanderdust and 54 kg wood fuel
- Transport, combination truck, diesel powered [RNA]: 177 t*km
  average oneway delivery at 161 km of 792.9 kg od wood at 39%mc with no backhaul (1.39X);
- Liquefied petroleum gas, combusted in industrial boiler [RNA]: 0.755 l
  forklifts
- Diesel, combusted in industrial boiler [RNA]: 0.272 l
  surrogate for DFO
- Transport, combination truck, diesel powered [RNA]: 17.8 t*km
  average one way delivery at 134 km of 134.4 kg of neat resin at 62% solids with no backhaul --99% of resin shipped by truck
- Disposal, fly ash, to unspecified landfill: 1.94 kg
- Natural gas, combusted in industrial boiler [RNA]: 43 m3

## Inputs from nature
- Water [resource, water]: 935 kg
  Municipal
- Water [resource, water, subterranean]: 452 kg

## Emissions to nature
- Methanol [emission, air]: 0.219 kg
- Suspended solids, inorganic [emission, water]: 0.0101 kg
- Particulate matter, ≤ 10μm [emission, air]: 0.29 kg
- Volatile organic compounds [emission, air]: 0.84 kg
  Reported in survey. Might overestimate VOC's. Total VOC here, might include some boiler emissions from the "Wood…combusted in industrial boiler" process
- Particulate matter [emission, air]: 0.363 kg
- Biological Oxygen Demand [emission, water]: 0.007 kg
- Formaldehyde [emission, air]: 0.159 kg
- Nitrogen [emission, water]: 0.002 kg

## Allocation factors
- causal, Wood fuel, at MDF mill, for Wood fuel, MDF, generated on-site, combusted in industrial boiler: 0.061506
- causal, Medium density fiberboard (MDF), at MDF mill, for Natural gas, combusted in industrial boiler: 0.844
- causal, Bark, at MDF mill, for Shavings; softwood; kiln dried; at planer: 0.0146931
- causal, Wood waste, at MDF mill, for Electricity, at grid: 7.11876e-5
- causal, Wood fuel, at MDF mill, for Emulsion wax 53% solids: 0.061506
- causal, Wood fuel, at MDF mill, for Transport, combination truck, diesel powered: 0.061506
- causal, Bark, at MDF mill, for Wood fuel, MDF, generated on-site, combusted in industrial boiler: 0.0146931
- causal, Medium density fiberboard (MDF), at MDF mill, for Shavings; softwood; kiln dried; at planer: 0.844
- causal, Wood fuel, at MDF mill, for Water: 0.061506
- causal, Wood fuel, at MDF mill, for Sawdust; hardwood; green; at sawmill: 0.061506
- causal, Wood fuel, at MDF mill, for Methanol: 0.061506
- causal, Wood fuel, at MDF mill, for Urea formaldehyde, UF, resin, neat, 65% solids: 0.061506
- causal, Wood waste, at MDF mill, for Shavings; softwood; kiln dried; at planer: 7.11876e-5
- causal, Wood fuel, at MDF mill, for Diesel, combusted in industrial equipment: 0.061506
- causal, Wood fuel, at MDF mill, for Volatile organic compounds: 0.061506
- causal, Medium density fiberboard (MDF), at MDF mill, for Shavings; softwood; kiln dried; at planer: 0.844
- physical, Wood fuel, sanderdust, at MDF mill: 0.0797301
- causal, Wood fuel, sanderdust, at MDF mill, for Shavings; softwood; kiln dried; at planer: 0.0797301
- causal, Bark, at MDF mill, for Shavings; softwood; kiln dried; at planer: 0.0146931
- causal, Wood waste, at MDF mill, for Sawdust; hardwood; green; at sawmill: 7.11876e-5
- causal, Medium density fiberboard (MDF), at MDF mill, for Shavings; softwood; kiln dried; at planer: 0.844
- causal, Medium density fiberboard (MDF), at MDF mill, for Diesel, combusted in industrial boiler: 0.844
- causal, Wood waste, at MDF mill, for Shavings; softwood; kiln dried; at planer: 7.11876e-5
- causal, Bark, at MDF mill, for Liquefied petroleum gas, combusted in industrial boiler: 0.0146931
- causal, Wood fuel, at MDF mill, for Natural gas, combusted in industrial boiler: 0.061506
- causal, Medium density fiberboard (MDF), at MDF mill, for Disposal, fly ash, to unspecified landfill: 0.844
- causal, Wood waste, at MDF mill, for Liquefied petroleum gas, combusted in industrial boiler: 7.11876e-5
- causal, Wood fuel, sanderdust, at MDF mill, for Formaldehyde: 0.0797301
- causal, Wood fuel, sanderdust, at MDF mill, for Suspended solids, inorganic: 0.0797301
- causal, Wood fuel, at MDF mill, for Shavings; softwood; kiln dried; at planer: 0.061506
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
## Sampling procedure
Survey of industry production practice; manufacturing technology typical for industry

## Intended application
Only mass allocation factors are available for the multi-functional processes (disregard economic allocation factor values-they are mass allocation factors).

## Sources
- James B. Wilson
- Maureen Puettmann
- James B. Wilson
