# Electricity, at eGrid, HIMS, 2008

Dataset: openLCA process, unit process
Category: 22: Utilities/2211: Electric Power Generation, Transmission and Distribution
Geography: Northern America
Time period: 2007-12-31 to 2007-12-31
Allocation method: no allocation
Generated by: Alberta Carpenter
Published in: Chris Goemans, Athena Institute
restrictionsDescription: All information can be accessed by everybody.
copyright: false

## General comment
The methodology used to put together the grid information is outlined in reference 1.

## Technology
Typical

## Geography
Misc Hawaii electricity grid that includes all of Hawaii except for Oahu (HIOA).

## Reference product
- Electricity, at grid [RNA]: 1 kWh

## Inputs from technosphere
- Electricity, petroleum, waste oil, at power plant: 0.196487 kWh
  Petroleum (Other Fossil) WO - Waste/Other Oil (including Crude Oil, Liquid Butane, Liquid Propane, Oil Waste, Re-Refined Motor Oil, Sludge Oil, Tar Oil, or other petroleum-based liquid wastes)
- Electricity, biomass,solid, unspecified, at power plant: 0.0356299 kWh
  Solid Renewable Fuels (Biomass) OBS - Other Biomass Solid (Animal Manure and Waste, Solid By-products, and other solid biomass not specified)
- Electricity, geothermal, unspecified: 0.0743659 kWh
  Geothermal
- Electricity, bituminous coal, at power plant [RNA]: 0.0227242 kWh
  Bituminous Coal
- Electricity, at wind power plant, unspecified: 0.0761717 kWh
  Wind
- Electricity, residual fuel oil, at power plant [RNA]: 0.169547 kWh
  Petroleum (RFO) - Residual Fuel Oil (includes No. 5 and No. 6 Fuel Oils and Bunker C Fuel Oil)
- Electricity, solar, unspecified, at power plant: 5.71233e-6 kWh
  Solar (Photovoltaic, Thermal)
- Electricity, diesel, at power plant [RNA]: 0.396351 kWh
  Petroleum (DFO) - Distillate Fuel Oil (includes all Diesel and No. 1, No. 2, and No. 4 Fuel Oils)
- Electricity, hydropower, at power plant, unspecified: 0.0267665 kWh
  Hydroelectric
- Electricity, biomass, solid, agriculture by-products, at power plant: 0.0019503 kWh
  Solid Renewable Fuels (Biomass) AB - Agriculture Crop By-products/ Straw/ Energy Crops

## Sampling procedure
based on EIA electricity reports for all power plants in the US.

## Sources
- EIA
- EIA
- EIA
- Chris Goemans, Athena Institute
- US DOE
- International Energy Agency
- Statistics Canada
- EIA
- Statistics Canada
- EIA
- EIA
- US DOE
- EIA
- USEPA
- Statistics Canada
- unspecified
- Statistics Canada
- EIA
- EIA
- EIA
- Statistics Canada
- USEPA
- Statistics Canada
- EIA
