# Particleboard, average, softwood, particleboard mill

Dataset: openLCA process, unit process
Category: 31-33: Manufacturing/3212: Veneer, Plywood, and Engineered Wood Product Manufacturing
Geography: Northern America
Time period: 2003-12-31 to 2003-12-31
Allocation method: physical allocation
Generated by: Maureen Puettmann
Published in: James B. Wilson
restrictionsDescription: All information can be accessed by everybody.
copyright: true

## General comment
All weights given on an ovendry basis.

Important note: although most of the data in the US LCI database has
undergone some sort of review, the database as a whole has not yet
undergone a formal validation process.
Please email comments to lci@nrel.gov. Review off this data by three industry representatives selected by the composite panel association (CPA); two academic reviewers selected by editors peer review journal

## Technology
The particle board process represents average US technology. The particleboard manufacturing process is a highly automate and process-controlled. Wood residues are sorted and stored, screeened by particle size, oversized particles are refined, particles are dried and then blended with resin, wax, catalyst, and scavengers, the board is formed forming a mat with mulitple layers consisting of face and core layers, the board is then pressed, cooled, sanded and sawn to final size.

## Geography
Average US, United States data

## Reference product
- Particleboard, average, softwood, particleboard mill [RNA]: 1 m3
  1 m3 of particleboard weighs 746 kg on oven dry (OD) basis--5 mill average

## By-products
- Wood fuel, sanderdust, particleboard mill [RNA]: 25 kg
  oven dry weight; sanderdust
- Wood waste, softwood, particleboard mill [RNA]: 5.18 kg
  oven dry weight
- Wood fuel, hogfuel, particleboard mill [RNA]: 2 kg
  oven dry weight; hogfuel

## Inputs from technosphere
- Sawdust, at rough green lumber production [RNA]: 42.3 kg
  oven dry weight
- Ammonium sulfate 30% solids: 2.4 kg
  liquid catalyst at 30% solids
- Gasoline, combusted in equipment [RNA]: 0.02 l
- Diesel, combusted in industrial equipment [RNA]: 0.26 l
- Chips; softwood; green; at sawmill [US]: 3, 57 kg (2 entries)
  oven dry weight
- Fines, at oriented strand board production [RNA]: 3.1 kg
  oven dry weight
- Panel trim; softwood; at plywood mill [US]: 30 kg
- Urea 40% solids: 7.25 kg
  liguid urea scavenger at 40% solids
- Disposal, fly ash, to unspecified landfill: 0.103 kg
- Shavings; softwood; kiln dried; at planer [US]: 291.6 kg; provider Sawn lumber, softwood, planed, kiln dried, at planer, NE-NC
  oven dry weight; original input was "Planer shavings, at planer mill" CUTOFF replaced with product linked to CORRIM database
- Shavings; softwood; kiln dried; at planer [US]: 113.4 kg; provider Sawn lumber, softwood, planed, kiln dried, at planer, NE-NC
  oven dry weight; original input was "Planer shavings, from dried lumber, at planer mill" CUTOFF replaced with product linked to CORRIM database
- Emulsion wax 53% solids: 4.72 kg
  liquid wax emulsion at 53% solids
- Transport, combination truck, diesel powered [RNA]: 114.8 t*km
  wood residue delivery to mill, based on FAL database, 136 km oneway with no back haul and an average mc of furnish of 25.7%
- Transport, combination truck, diesel powered [RNA]: 1.76 t*km
  wax, scavenger, and ammon. sulfate delivery based on FAL database, 124 km oneway with no back haul
- Shavings; softwood; kiln dried; at planer [US]: 32 kg; provider Sawn lumber, softwood, planed, kiln dried, at planer, NE-NC
  oven dry weight; original input was "Planer shavings, from green lumber, at planer mill" CUTOFF replaced with product linked to CORRIM database
- Natural gas, combusted in industrial boiler [RNA]: 30 m3
  oven dry weight
- Transport, combination truck, diesel powered [RNA]: 13.03 t*km
  neat resin delivery to mill based on FAL database, 124 km oneway with no back haul
- Wood, particleboard, generated onsite, combusted in industrial boiler [RNA]: 27 kg
  oven dry weight
- Electricity, at grid [RNA]: 158.1 kWh; provider Electricity, at Grid, US, 2010
- Wood waste, unspecified: 0.4 kg
- Sawdust; softwood; green; at sawmill [US]: 49.7 kg
  oven dry weight
- Urea formaldehyde, UF, resin, neat, 65% solids [RNA]: 104.6 kg
  liquid UF resin at 65% solids
- Diesel, combusted in industrial boiler [RNA]: 0.06 l
  Surragate for DFO
- Liquefied petroleum gas, combusted in industrial boiler [RNA]: 0.33 l
  Surragate for LPG for forklifts
- Chips; softwood; dry; at planer [US]: 49 kg
  oven dry weight

## Inputs from nature
- Water [resource, water]: 304 kg

## Emissions to nature
- Acetaldehyde [emission, air, troposphere, rural]: 0.000552 kg
- HAPS [emission, air, troposphere, rural]: 0.0789 kg
- Particulate matter, ≤ 10μm [emission, air, troposphere, rural]: 0.0326 kg
- Particulate matter [emission, air, troposphere, rural]: 0.215 kg
- Phenol [emission, air, troposphere, rural]: 0.0036 kg
- Methanol [emission, air, troposphere, rural]: 0.025 kg
- Acrolein [emission, air, troposphere, rural]: 3.78e-5 kg
- Formaldehyde [emission, air, troposphere, rural]: 0.0551 kg
- Suspended solids, inorganic [emission, water]: 0.0103 kg
- Volatile organic compounds [emission, air, troposphere, rural]: 0.357 kg

## Allocation factors
- causal, Wood fuel, sanderdust, particleboard mill, for Chips; softwood; green; at sawmill: 0.0321262
- causal, Particleboard, average, softwood, particleboard mill, for Diesel, combusted in industrial equipment: 0.958647
- causal, Wood fuel, sanderdust, particleboard mill, for Acrolein: 0.0321262
- causal, Particleboard, average, softwood, particleboard mill, for Chips; softwood; dry; at planer: 0.958647
- causal, Wood fuel, sanderdust, particleboard mill, for Wood, particleboard, generated onsite, combusted in industrial boiler: 0.0321262
- causal, Wood fuel, sanderdust, particleboard mill, for Shavings; softwood; kiln dried; at planer: 0.0321262
- causal, Particleboard, average, softwood, particleboard mill, for HAPS: 0.958647
- causal, Wood fuel, sanderdust, particleboard mill, for Transport, combination truck, diesel powered: 0.0321262
- causal, Wood waste, softwood, particleboard mill, for Chips; softwood; dry; at planer: 0.00665656
- causal, Particleboard, average, softwood, particleboard mill, for Transport, combination truck, diesel powered: 0.958647
- causal, Wood fuel, hogfuel, particleboard mill, for Particulate matter, ≤ 10μm: 0.0025701
- causal, Wood waste, softwood, particleboard mill, for Diesel, combusted in industrial boiler: 0.00665656
- causal, Wood waste, softwood, particleboard mill, for Water: 0.00665656
- causal, Particleboard, average, softwood, particleboard mill, for Formaldehyde: 0.958647
- causal, Wood fuel, hogfuel, particleboard mill, for Sawdust, at rough green lumber production: 0.0025701
- causal, Wood fuel, hogfuel, particleboard mill, for Panel trim; softwood; at plywood mill: 0.0025701
- causal, Particleboard, average, softwood, particleboard mill, for Acrolein: 0.958647
- causal, Particleboard, average, softwood, particleboard mill, for Gasoline, combusted in equipment: 0.958647
- causal, Wood waste, softwood, particleboard mill, for Transport, combination truck, diesel powered: 0.00665656
- causal, Wood fuel, sanderdust, particleboard mill, for Shavings; softwood; kiln dried; at planer: 0.0321262
- causal, Wood waste, softwood, particleboard mill, for Gasoline, combusted in equipment: 0.00665656
- causal, Wood fuel, hogfuel, particleboard mill, for Natural gas, combusted in industrial boiler: 0.0025701
- causal, Wood fuel, sanderdust, particleboard mill, for Acetaldehyde: 0.0321262
- causal, Wood fuel, hogfuel, particleboard mill, for Diesel, combusted in industrial equipment: 0.0025701
- causal, Particleboard, average, softwood, particleboard mill, for Ammonium sulfate 30% solids: 0.958647
- causal, Wood fuel, hogfuel, particleboard mill, for Water: 0.0025701
- causal, Particleboard, average, softwood, particleboard mill, for Fines, at oriented strand board production: 0.958647
- causal, Wood fuel, hogfuel, particleboard mill, for Suspended solids, inorganic: 0.0025701
- causal, Wood fuel, hogfuel, particleboard mill, for Particulate matter: 0.0025701
- causal, Wood waste, softwood, particleboard mill, for Emulsion wax 53% solids: 0.00665656
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
## Sampling procedure
Survey of industry production practice; manufacturing technology typical for industry.

## Intended application
Only mass allocation factors are available for the multi-functional processes (disregard economic allocation factor values-they are mass allocation factors).

## Sources
- James B. Wilson
- James B. Wilson
- Maureen Puettmann
