# Electricity, at eGrid, SPSO, 2010

Dataset: openLCA process, unit process
Category: 22: Utilities/2211: Electric Power Generation, Transmission and Distribution
Geography: Northern America
Time period: 2009-12-31 to 2009-12-31
Allocation method: no allocation
Generated by: Samantha Wascavage
Published in: Chris Goemans, Athena Institute
restrictionsDescription: All information can be accessed by everybody.
copyright: false

## General comment
The methodology used to put together the grid information is outlined in reference 1.

## Technology
Typical

## Geography
SPSO South electricity grid to include Oklahoma, and portions of Arkansas, Louisiana, Texas and New Mexico.

## Reference product
- Electricity, at grid [RNA]: 1 kWh

## Inputs from technosphere
- Electricity, at wind power plant, unspecified: 0.032648 kWh
  Wind
- Electricity, bituminous coal, at power plant [RNA]: 0.009099 kWh
  Bituminous Coal BIT, SC, SGC, WC - Anthracite Coal, and Bituminous Coal.
- Electricity, lignite coal, at power plant [RNA]: 0.150498 kWh
  Lignite Coal
- Electricity, bituminous coal, at power plant [RNA]: 0.387316 kWh
  Subbituminous Coal
- Electricity, solar, unspecified, at power plant: 1.3e-5 kWh
  SUN – Solar (Photovoltaic, Thermal)
- Electricity, other fuels, unspecified, at power plant: 5.8e-5 kWh
  Other Fuels OTH, MSN, PUR, WH – Other (Batteries, Chemicals, Coke Breeze, Hydrogen, Pitch, Sulfur, Tar Coal, and miscellaneous technologies)
- Electricity, residual fuel oil, at power plant [RNA]: 2.6e-5 kWh
  Petroleum (RFO) – Residual Fuel Oil (includes No. 5 and No. 6 Fuel Oils and Bunker C Fuel Oil)
- Electricity, hydropower, at power plant, unspecified: 0.016731 kWh
  Hydroelectric WAT – Water (Conventional, Pumped Storage)
- Electricity, diesel, at power plant [RNA]: 0.000352 kWh
  Petroleum (DFO, JF, KER) – Distillate Fuel Oil (includes all Diesel and No. 1, No. 2, and No. 4 Fuel Oils)
- Electricity, biomass, solid, agriculture by-products, at power plant: 0.002421 kWh
  Solid Renewable Fuels (Biomass) AB, MSB, MSW, OBS, TDF, WDS – Agriculture Crop By-products / Straw / Energy Crops
- Electricity, other gases, unspecified, at power plant: 0.003167 kWh
  Other Gases OG, BFG, PG – Other Gas (Butane, Coal Processes, Coke-Oven, Refinery, and other processes)
- Electricity, natural gas, at power plant [RNA]: 0.383095 kWh
  Natural Gas
- Electricity, biomass,liquid, unspecified, at power plant: 0.004567 kWh
  Liquid Renewable Fuels (Biomass) BLQ, OBL, SLW, WDL - black liquor
- Electricity, petroleum, waste oil, at power plant: 0.010009 kWh
  Petroleum (Other Fossil) WO, PC, SG – Waste/Other Oil (including Crude Oil, Liquid Butane, Liquid Propane, Oil Waste, Re-Refined Motor Oil, Sludge Oil, Tar Oil, or other petroleum-based liquid wastes)

## Sampling procedure
based on EIA electricity reports for all power plants in the US.

## Sources
- EIA
- EIA
- Statistics Canada
- Statistics Canada
- Chris Goemans, Athena Institute
- EIA
- USEPA
- EIA
- Statistics Canada
- EIA
- Statistics Canada
- EIA
- unspecified
- EIA
- USEPA
- EIA
- EIA
- Statistics Canada
- US DOE
- International Energy Agency
- EIA
