# Electricity, at eGrid, NWPP, 2010

Dataset: openLCA process, unit process
Category: 22: Utilities/2211: Electric Power Generation, Transmission and Distribution
Geography: Northern America
Time period: 2009-12-31 to 2009-12-31
Allocation method: no allocation
Generated by: Samantha Wascavage
Published in: Chris Goemans, Athena Institute
restrictionsDescription: All information can be accessed by everybody.
copyright: false

## General comment
The methodology used to put together the grid information is outlined in reference 1.

## Technology
Typical

## Geography
Northwest electricity grid to include Washington, Oregon, Idaho, Utah, most of Montana (less NROW), Wyoming (less RMPA), Nevada (less AZNM) and northern parts of California, Arizona and New Mexico.

## Reference product
- Electricity, at grid [RNA]: 1 kWh

## Inputs from technosphere
- Electricity, MSW, non-biogenic, at power plant: 0.001315 kWh
  Other Fuels MSN, OTH, PUR, WH – Municipal Solid Waste – Non-biogenic components
- Electricity, nuclear, at power plant [RNA]: 0.028296 kWh
  Nuclear Fission
- Electricity, hydropower, at power plant, unspecified: 0.388259 kWh
  Hydroelectric
- Electricity, petroleum coke, at power plant: 0.0601805 kWh
  Petroleum (Other Fossil) PC, SG, WO - petroleum coke
- Electricity, geothermal, unspecified: 0.005955 kWh
  Geothermal
- Electricity, solar, unspecified, at power plant: 5e-6 kWh
  SUN – Solar (Photovoltaic, Thermal)
- Electricity, biomass,liquid, unspecified, at power plant: 0.002578 kWh
  Liquid Renewable Fuels (Biomass) BLQ, OBL, SLW, WDL - black liquor
- Electricity, lignite coal, at power plant [RNA]: 0.000962 kWh
  LIG – Lignite Coal
- Electricity, bituminous coal, at power plant [RNA]: 0.192929 kWh
  Bituminous Coal BIT, SC, SGC, WC - Anthracite Coal, and Bituminous Coal.
- Electricity, diesel, at power plant [RNA]: 0.000677 kWh
  Petroleum (DFO, JF, KER) – Distillate Fuel Oil (includes all Diesel and No. 1, No. 2, and No. 4 Fuel Oils)
- Electricity, other gases, unspecified, at power plant: 0.001865 kWh
  Other Gases OG, BFG, PG – Other Gas (Butane, Coal Processes, Coke-Oven, Refinery, and other processes)
- Electricity, residual fuel oil, at power plant [RNA]: 9e-6 kWh
  Petroleum (RFO) – Residual Fuel Oil (includes No. 5 and No. 6 Fuel Oils and Bunker C Fuel Oil)
- Electricity, natural gas, at power plant [RNA]: 0.118705 kWh
  Natural Gas
- Electricity, biomass, solid, biogenic MSW, at power plant: 0.005752 kWh
  Solid Renewable Fuels (Biomass) MSB, AB, MSW, OBS, TDF, WDS
- Electricity, biomass, gas, landfill, at power plant: 0.000494 kWh
  Gaseous Renewable Fuels (Biomass) LFG, OBG - landfill gas
- Electricity, at wind power plant, unspecified: 0.024797 kWh
  Wind
- Electricity, bituminous coal, at power plant [RNA]: 0.184006 kWh
  Subbituminous Coal

## Sampling procedure
based on EIA electricity reports for all power plants in the US.

## Sources
- EIA
- EIA
- Statistics Canada
- Statistics Canada
- Chris Goemans, Athena Institute
- EIA
- USEPA
- EIA
- Statistics Canada
- EIA
- Statistics Canada
- EIA
- unspecified
- EIA
- USEPA
- EIA
- EIA
- Statistics Canada
- US DOE
- International Energy Agency
- EIA
