# Electricity, at Grid, FRCC, 2010

Dataset: openLCA process, unit process
Category: 22: Utilities/2211: Electric Power Generation, Transmission and Distribution
Geography: Northern America
Time period: 2009-12-31 to 2009-12-31
Allocation method: no allocation
Generated by: Samantha Wascavage
Published in: Chris Goemans, Athena Institute
restrictionsDescription: All information can be accessed by everybody.
copyright: false

## General comment
The methodology used to put together the grid information is outlined in reference 1.

## Technology
Typical

## Geography
Florida

## Reference product
- Electricity, at grid [RNA]: 1 kWh

## Inputs from technosphere
- Electricity, residual fuel oil, at power plant [RNA]: 0.022225 kWh
  RFO – Residual Fuel Oil (includes No. 5 and No. 6 Fuel Oils and Bunker C Fuel Oil)
- Electricity, biomass, gas, landfill, at power plant: 0.000991 kWh
  LFG, OBG – Landfill Gas
- Electricity, diesel, at power plant [RNA]: 0.005056 kWh
  DFO, JF, KER – Distillate Fuel Oil (includes all Diesel and No. 1, No. 2, and No. 4 Fuel Oils)
- Electricity, natural gas, at power plant [RNA]: 0.570634 kWh
  NG – Natural Gas
- Electricity, biomass, solid, agriculture by-products, at power plant: 0.013429 kWh
  AB, MSB, MSW, OBS, TDF, WDS – Agriculture Crop By-products / Straw / Energy Crops
- Electricity, other fuels, unspecified, at power plant: 0.01285 kWh
  OTH, MSN, PUR, WH – Other (Batteries, Chemicals, Coke Breeze, Hydrogen, Pitch, Sulfur, Tar Coal, and miscellaneous technologies)
- Electricity, biomass,liquid, unspecified, at power plant: 0.003532 kWh
  BLQ, OBL, SLW, WDL – Black Liquor
- Electricity, hydropower, at power plant, unspecified: 0.000819 kWh
  WAT – Water (Conventional, Pumped Storage)
- Electricity, nuclear, at power plant [RNA]: 0.110455 kWh
  NUC – Nuclear (Uranium, Plutonium, Thorium)
- Electricity, petroleum coke, at power plant: 0.014773 kWh
  PC, SG, WO – Petroleum Coke
- Electricity, bituminous coal, at power plant [RNA]: 0.245236 kWh
  BIT, SC, SGC, WC - Anthracite Coal, and Bituminous Coal.

## Sampling procedure
based on EIA electricity reports for all power plants in the US.

## Sources
- EIA
- EIA
- Statistics Canada
- Statistics Canada
- Chris Goemans, Athena Institute
- EIA
- USEPA
- EIA
- Statistics Canada
- EIA
- Statistics Canada
- EIA
- unspecified
- EIA
- USEPA
- EIA
- EIA
- Statistics Canada
- US DOE
- International Energy Agency
- EIA
