# Mixed recyclables, at collection, curbside, volume basis

Dataset: openLCA process, unit process
Category: 56: Administrative and Support and Waste Management and Remediation Services/5621: Waste Collection
Geography: Northern America
Time period: 2006-12-31 to 2007-12-31
Allocation method: no allocation
Generated by: Franklin Associates
restrictionsDescription: All information can be accessed by everybody.
copyright: false

## General comment
Important note: although most of the data in the US LCI database has
undergone some sort of review, the database as a whole has not yet
undergone a formal validation process.
Please email comments to lci@nrel.gov.

## Technology
Typical

## Geography
United States

## Reference product
- Mixed recyclables, at collection, curbside, volume basis [RNA]: 1 m3
  Applies to one cu m of any collected material (see Data Module Report for packer truck densities for individual materials)

## Inputs from technosphere
- Transport, single unit truck, diesel powered [RNA]: 0.765021 t*km
  Fuel use allocated to one cu m of material collected, based on fuel use per truckload collected and total volume of truck space per load
- Mixed recyclables, at source: 1 m3
  Based on wastes removed at MRF, the collected material contains about 0.087 kg waste per kg of usable material.

## Sources
- THE PLASTICS DIVISION OF THE AMERICAN CH
