# Harvest, corn, single pass

Dataset: openLCA process, unit process
Category: 11: Agriculture, Forestry, Fishing and Hunting/1151: Support Activities for Crop Production
Geography: Northern America
Time period: 2009-12-31 to 2100-12-30
Allocation method: no allocation
Generated by: Daniel Inman
Published in: Hsu, D.
restrictionsDescription: All information can be accessed by everybody.
copyright: false

## General comment
INL design report 2007 for single pass concept. This process is for the single pass harvest of grain and crop residue from one hectare of land. This is applicable to both corn-corn stover and wheat-wheat straw collection systems. The process does not include unloading the material from the combine and subsequent loading to a truck.

## Technology
modern

## Geography
North America

## Time period
2010 and after

## Reference product
- Harvest, corn, single pass [RNA]: 1 m2

## Inputs from technosphere
- Combine harvesting: 1.38 m2
  Scaled combine up in acreage because now collecting stover in addition to corn grain-still one hectare

## Sources
- Wu, M.
- EcoInvent
- Hsu, D.
- Hess, J. R.
