# Roundwood, hardwood, green, at mill, E

Dataset: openLCA process, unit process
Category: 11: Agriculture, Forestry, Fishing and Hunting/1133: Logging
Geography: United States
Time period: 2006-12-31 to 2006-12-31
Allocation method: physical allocation
Generated by: Maureen Puettmann
Published in: Richard D. Bergman
restrictionsDescription: All information can be accessed by everybody.
copyright: false

## General comment
All weights given on an ovendry basis.
Both logs and bark were transported jointly - however, these were seperated in the model based on mass allocation. This unit process only accounts for the transport of logs and excludes the transport of bark.
Important note: although most of the data in the US LCI database has
undergone some sort of review, the database as a whole has not yet
undergone a formal validation process.
Please email comments to lci@nrel.gov.

## Technology
Average Transport distance

## Geography
E= Eastern US United States. The states included MN, IA, MO, WI, IL, NJ, OH, IN, MI, WV, PA, MD, DW, NJ, NY, ME, VT, NH, RI, MA, CT, VA, KY, AR, LA, MS, AL, FL,GA, NC, SC, and TN

## Reference product
- Roundwood; hardwood; green; at mill [US]: 1 m3
  Based on a weighted average green density of 944 kg/m3 and green specific gravity of 0.510. 2.46 M3 = 1255 KG Moisture content (ovendry basis) = 85%.

## By-products
- Bark; hardwood; green; at mill [US]: 27.1865 kg
  Weight reported on an ovendry basis. Moisture content (ovendry basis) = 85%

## Inputs from technosphere
- Diesel, combusted in industrial equipment [RNA]: 1.70677 l
  Diesel used for on-site transportation. Represents 60% of mill use of diesel for transport.
- Roundwood, hardwood, average, at forest road [RNA]: 1 m3
  Based on a weighted average green density of 944 kg/m3. 2.46M3 = 1255 KG Moisture content (ovendry basis) = 85%. proxy for hardwood logs at forest road
- Transport, combination truck, diesel powered [RNA]: 189.777 t*km
  Transportation of logs from forest: 201km*1255*(1+.85)/1000/2.46tonnes=190tkm
- Bark; hardwood; average; at forest road [US]: 27.1865 kg; provider Bark, hardwood, average, at forest road, NE-NC
  Weight reported on an ovendry basis. Moisture content (ovendry basis) = 85%; proxy for hardwood bark at forest road
- Transport, combination truck, diesel powered [RNA]: 10.1187 t*km
  Transportation of bark from forest: 201km*27.2*(1+.85)/1000tonnes=10.1tkm

## Inputs from nature
- Water [resource, water, subterranean]: 345.825 kg
  Amount of water consumed as water spray for logs. Represents 30% of mill used of ground water
- Water [resource, water]: 118.661 kg
  (same comment as for Water)

## Allocation factors
- causal, Bark; hardwood; green; at mill, for Transport, combination truck, diesel powered: 0
- causal, Bark; hardwood; green; at mill, for Roundwood, hardwood, average, at forest road: 0
- causal, Bark; hardwood; green; at mill, for Transport, combination truck, diesel powered: 0
- causal, Roundwood; hardwood; green; at mill, for Diesel, combusted in industrial equipment: 0.949406
- causal, Bark; hardwood; green; at mill, for Diesel, combusted in industrial equipment: 0
- causal, Roundwood; hardwood; green; at mill, for Water: 0.949406
- causal, Roundwood; hardwood; green; at mill, for Roundwood, hardwood, average, at forest road: 0.949406
- causal, Bark; hardwood; green; at mill, for Bark; hardwood; average; at forest road: 0
- causal, Roundwood; hardwood; green; at mill, for Transport, combination truck, diesel powered: 0.949406
- causal, Bark; hardwood; green; at mill, for Water: 0
- economic, Bark; hardwood; green; at mill: 0
- causal, Roundwood; hardwood; green; at mill, for Bark; hardwood; average; at forest road: 0.949406
- physical, Bark; hardwood; green; at mill: 0
- economic, Roundwood; hardwood; green; at mill: 0.949406
- causal, Bark; hardwood; green; at mill, for Water: 0
- causal, Roundwood; hardwood; green; at mill, for Transport, combination truck, diesel powered: 0.949406
- causal, Roundwood; hardwood; green; at mill, for Water: 0.949406
- physical, Roundwood; hardwood; green; at mill: 0.949406

## Sampling procedure
Questionnaires from 4 veneer mills and 5 flooring plants in the E. United States representing 32 states.

## Intended application
Only mass allocation factors are available for the multi-functional processes (disregard economic allocation factor values-they are mass allocation factors).

## Sources
- Richard D. Bergman
- Maureen Puettmann
