# Automotive painting, electrocoating, per m2

Dataset: openLCA process, unit process
Category: 31-33: Manufacturing/3362: Motor Vehicle Body and Trailer Manufacturing
Geography: Northern America
Time period: 2004-12-31 to 2004-12-31
Allocation method: no allocation
Generated by: James Littlefield, Franklin Associates
Published in: VRP (Vehicle Recycling Partnership)
restrictionsDescription: All information can be accessed by everybody.
copyright: false

## General comment
Data are shown on 2 bases: 1) per 1,000 m2 of surface area and 2) per 1,000 vehicles., This unit process is on the basis of 1 square meter of vehicle surface area.
Important note: although most of the data in the US LCI database has
undergone some sort of review, the database as a whole has not yet
undergone a formal validation process.
Please email comments to lci@nrel.gov.

## Technology
Representative of current industry practices

## Geography
North America

## Reference product
- Automotive painting, electrocoating, per m2 [RNA]: 1 m2

## Inputs from technosphere
- Electricity, at grid [RNA]: 0.161 kWh; provider Electricity, at Grid, US, 2010
- Electrocoat resin, at plant: 3.1e-5 m3
- Disposal, carbon black, to residual material landfill: 1.3e-5, 2e-8 kg (2 entries)
- Treatment, electrocoating wastewater, unspecified treatment: 6.87 l
- Water, at user: 7.24 kg
- Pigment, at plant: 2.65e-6 m3

## Emissions to nature
- Volatile organic compounds [emission, air]: 4.12e-5 kg
  From pigment
- Volatile organic compounds [emission, air]: 0.00041 kg
  From resin

## Sources
- VRP (Vehicle Recycling Partnership)
