# Electricity, bituminous coal, at power plant

Dataset: openLCA process, unit process
Category: 22: Utilities/2211: Electric Power Generation, Transmission and Distribution
Geography: Northern America
Time period: 2001-12-31 to 2002-12-31
Allocation method: no allocation
Generated by: Franklin Associates
Published in: Franklin Associates
restrictionsDescription: All information can be accessed by everybody.
copyright: false

## General comment
Important note: although most of the data in the US LCI database has
undergone some sort of review, the database as a whole has not yet
undergone a formal validation process.
Please email comments to lci@nrel.gov.

## Technology
Electricity production by coal-fired steam generation.

## Geography
United States

## Reference product
- Electricity, bituminous coal, at power plant [RNA]: 1 kWh

## Inputs from technosphere
- Bituminous coal, at mine [RNA]: 0.44186 kg
- Disposal, ash and flue gas desulfurization sludge, to unspecified reuse: 0.014139 kg
- Transport, pipeline, coal slurry: 0.0022186 t*km
  Represents transportation from bituminous production/processing to utility boiler.
- Disposal, solid waste, unspecified, to unspecified treatment: 0.043755 kg
- Transport, barge, average fuel mix [RNA]: 0.055949 t*km
  Represents transportation from bituminous production/processing to utility boiler.
- Transport, combination truck, diesel powered [RNA]: 0.0029866 t*km
  Represents transportation from bituminous production/processing to utility boiler.
- Transport, train, diesel powered [RNA]: 0.46079 t*km
  Represents transportation from bituminous production/processing to utility boiler.

## Emissions to nature
- Aldehydes, unspecified [emission, air]: 2.0988e-7 kg
- Benzo[a]pyrene [emission, air]: 8.3953e-12 kg
  Sources for PAH data are old or unverifiable. Use this PAH data with caution.
- Chromium(VI) [emission, air]: 1.7453e-8 kg
- Methane [emission, air]: 8.3124e-6 kg
- Carbon monoxide [emission, air]: 0.0001097 kg
- Anthracene [emission, air]: 4.6395e-11 kg
  Sources for PAH data are old or unverifiable. Use this PAH data with caution.
- Nitrous oxide [emission, air]: 2.4231e-5 kg
- Phenanthrene [emission, air]: 5.9651e-10 kg
  Sources for PAH data are old or unverifiable. Use this PAH data with caution.
- Furan [emission, air]: 1.1002e-12 kg
- Tetrachloroethylene [emission, air]: 9.4999e-9 kg
- Fluorene [emission, air]: 2.0104e-10 kg
  Sources for PAH data are old or unverifiable. Use this PAH data with caution.
- Volatile organic compounds [emission, air]: 2.4904e-5 kg
- Arsenic [emission, air]: 9.0581e-8 kg
- Chrysene [emission, air]: 2.2093e-11 kg
  Sources for PAH data are old or unverifiable. Use this PAH data with caution.
- Cobalt [emission, air]: 2.2093e-8 kg
- Formaldehyde [emission, air]: 5.3023e-8 kg
- Benz[a]anthracene [emission, air]: 1.7674e-11 kg
  Sources for PAH data are old or unverifiable. Use this PAH data with caution.
- Pyrene [emission, air]: 7.2906e-11 kg
  Sources for PAH data are old or unverifiable. Use this PAH data with caution.
- Hydrofluoric acid [emission, air]: 3.3139e-5 kg
- Phenols [emission, air]: 3.5349e-9 kg
- Radionuclides [emission, air]: 12.5 kBq
- Methylene chloride [emission, air]: 6.4069e-8 kg
- Sulfur dioxide [emission, air]: 0.006766 kg
- Magnesium [emission, air]: 2.4302e-6 kg
- Oils, unspecified [emission, water]: 8.8847e-7 kg
- Benzofluoranthene [emission, air]: 2.4302e-11 kg
  Sources for PAH data are old or unverifiable. Use this PAH data with caution.
- Indeno[1,2,3-cd]pyrene [emission, air]: 1.3477e-11 kg
  Sources for PAH data are old or unverifiable. Use this PAH data with caution.
- Carbon dioxide [emission, air]: 0.99407 kg
- Suspended solids, inorganic [emission, water]: 1.7769e-6 kg
- Particulate matter, ≤ 10μm [emission, air]: 4.1673e-5 kg
- Acenaphthene [emission, air]: 1.1267e-10 kg
  Sources for PAH data are old or unverifiable. Use this PAH data with caution.
- Fluoranthene [emission, air]: 1.5686e-10 kg
  Sources for PAH data are old or unverifiable. Use this PAH data with caution.
- Nitrogen oxides [emission, air]: 0.0027065 kg
- Cadmium [emission, air]: 1.1267e-8 kg
- Benzene [emission, air]: 2.8721e-7 kg
- Organic compounds [emission, air]: 1.3382e-6 kg
- Mercury [emission, air]: 1.8337e-8 kg
- Hydrochloric acid [emission, air]: 0.00026511 kg
- 5-Methylchrysene [emission, air]: 4.8604e-12 kg
  Sources for PAH data are old or unverifiable. Use this PAH data with caution.
- Biphenyl [emission, air]: 3.7558e-10 kg
  Sources for PAH data are old or unverifiable. Use this PAH data with caution.
- Nickel [emission, air]: 6.186e-8 kg
- Naphthalene [emission, air]: 2.8721e-9 kg
  Sources for PAH data are old or unverifiable. Use this PAH data with caution.
- 2,3,7,8-Tetrachlorodibenzo-p-dioxin [emission, air]: 1.7365e-13 kg
- Acenaphthylene [emission, air]: 5.5232e-11 kg
  Sources for PAH data are old or unverifiable. Use this PAH data with caution.
- Manganese [emission, air]: 1.0825e-7 kg
- Lead [emission, air]: 9.279e-8 kg
- Selenium [emission, air]: 2.8721e-7 kg
- Antimony [emission, air]: 3.9767e-9 kg
- Acrolein [emission, air]: 6.4069e-8 kg
- Beryllium [emission, air]: 4.6395e-9 kg
- Benzo[ghi]perylene [emission, air]: 5.9651e-12 kg
  Sources for PAH data are old or unverifiable. Use this PAH data with caution.
- Chromium [emission, air]: 5.7441e-8 kg

## Sources
- Energy Information Administration
- U.S. EPA
- Energy Information Administration
- U.S. EPA
- Franklin Associates
- U.S. Energy Information Administration
- unspecified
- U.S. EPA
- Energy Information Administration
