# EPS insulation board, at plant

Dataset: openLCA process, unit process
Category: 31-33: Manufacturing/3261: Plastics Product Manufacturing
Geography: Northern America
Time period: 2004-12-31 to 2007-12-31
Allocation method: no allocation
Generated by: Franklin Associates
Published in: Franklin Associates
restrictionsDescription: All information can be accessed by everybody.
copyright: false

## General comment
EPS board manufacturing data from 2008, EPS resin production data from 2005

## Technology
EPS block molding

## Geography
10 EPS insulation board manufacturers in the US and Canada; 2 US EPS resin producers

## Reference product
- EPS insulation board, at plant [RNA]: 1 kg

## Inputs from technosphere
- Transport, barge, average fuel mix [RNA]: 2.38 t*km
- Ethylbenzene styrene, EB, at plant [RNA]: 1.01 kg
- Natural gas, processed, at plant, 0.7369 kg/m3 [RNA]: 0.043 kg; provider Natural gas, processed, for olefins production, at plant
- Transport, train, diesel powered [RNA]: 1.81 t*km
- Disposal, solid waste to incineration without energy recovery: 1.8e-5 kg
- Petroleum refining coproduct, at refinery [RNA]: 0.029 kg; provider Petroleum refining, at refinery
- Disposal, solid waste to sanitary landfill: 0.021 kg
- Liquefied petroleum gas, combusted in industrial boiler [RNA]: 0.002 l
- Disposal, solid waste to incineration with energy recovery: 0.0017 kg
- Transport, combination truck, diesel powered [RNA]: 0.55 t*km
- Electricity, at grid [RNA]: 0.79 kWh; provider Electricity, at Grid, US, 2010
- Natural gas, combusted in industrial boiler [RNA]: 0.28 m3
- Transport, ocean freighter, average fuel mix [RNA]: 1.06 t*km

## Emissions to nature
- Hydrochlorofluorocarbons [emission, air]: 5.5e-7 kg
- Carbon dioxide [emission, air]: 0.0039 kg
- Organic compounds [emission, air]: 1.1e-5 kg
- Pentane [emission, air]: 0.041 kg
- Carbon monoxide [emission, air]: 2.1e-5 kg
- Hydrofluorocarbons [emission, air]: 5.5e-7 kg
- Volatile organic compounds [emission, air]: 0.00013 kg
- Sulfur oxides [emission, air]: 3.6e-7 kg
- Particulate matter [emission, air]: 3.2e-5 kg
- Styrene [emission, air]: 0.00022 kg
- Nitrogen oxides [emission, air]: 4.6e-5 kg

## Sampling procedure
questionaires to ……

## Sources
- Franklin Associates
- Franklin Associates
