# Polyethylene, low-density, LDPE, virgin resin, at plant

Dataset: openLCA process, unit process
Category: 31-33: Manufacturing/3252: Resin, Synthetic Rubber, and Artificial and Synthetic Fibers and Filaments Manufacturing
Geography: Northern America
Time period: 2014-12-31 to 2016-12-30
Allocation method: no allocation
Data quality: US EPA - Process Pedigree Matrix (4;1)
Generated by: Franklin Associates, A Division of ERG
Owner: American Chemistry Council
Reviewer: Franklin Associates, A Division of ERG
Published in: Franklin Associates (2019) Cradle-to-Resin LCA PET for NAPCOR
restrictionsDescription: These U.S. LCI Database Project data ("Data") are provided by the National Renewable Energy Laboratory ("NREL"), operated by the Alliance for Sustainable Energy, LLC ("Alliance") for the US Department of Energy ("DOE") under Contract No. DE-AC36-08GO28308. The United States Government (the "Government") retains and the user acknowledges that the Government retains a non-exclusive, paid-up, irrevocable, worldwide license to publish or reproduce the published form of these data, or allow others to do so, for Government purposes.
Access to and use of these Data shall impose the following obligations on the user, as set forth in this Agreement. The user is granted the right, without any fee or cost, to use, copy, modify, alter, enhance and distribute these Data for any purpose whatsoever, provided that this entire notice appears in all copies of the Data. Any modification, alteration or enhancement of these data shall be identified and documented by the user. Further, the user agrees to credit the DOE/NREL/Alliance in any publication that results from the use of these Data. The names DOE/NREL/Alliance, however, may not be used in any advertising or publicity to endorse or promote any products or commercial entities unless specific written permission is obtained from DOE/NREL/Alliance. The user also understands that DOE/NREL/Alliance is not obligated to provide the user with any support, consulting, training or assistance of any kind with regard to the use of these Data or to provide the user with any updates, revisions or new versions of these Data.
YOU AGREE TO INDEMNIFY THE GOVERNMENT AND DOE/NREL/ALLIANCE, AND ITS SUBSIDIARIES, AFFILIATES, OFFICERS, AGENTS, AND EMPLOYEES AGAINST ANY CLAIM OR DEMAND, INCLUDING REASONABLE ATTORNEYS' FEES, RELATED TO YOUR USE OF THESE DATA. THESE DATA ARE PROVIDED BY DOE/NREL/ALLIANCE "AS IS" AND ANY EXPRESS OR IMPLIED WARRANTIES, INCLUDING BUT NOT LIMITED TO, THE IMPLIED WARRANTIES OF MERCHANTABILITY AND FITNESS FOR A PARTICULAR PURPOSE ARE DISCLAIMED. IN NO EVENT SHALL THE GOVERNMENT OR DOE/NREL/ALLIANCE BE LIABLE FOR ANY SPECIAL, INDIRECT OR CONSEQUENTIAL DAMAGES OR ANY DAMAGES WHATSOEVER, INCLUDING BUT NOT LIMITED TO CLAIMS ASSOCIATED WITH THE LOSS OF DATA OR PROFITS, WHICH MAY RESULT FROM AN ACTION IN CONTRACT, NEGLIGENCE OR OTHER TORTIOUS CLAIM THAT ARISES OUT OF OR IN CONNECTION WITH THE ACCESS, USE OR PERFORMANCE OF THESE DATA.
copyright: false

## General comment
Includes material and energy requirements and environmental emissions for one kilogram of Low-density polyethylene (LDPE) virgin resin production. The LDPE resin is commonly polymerized in high pressure reactors. This is the standard technology for LDPE resin production. The two reactor types used are autoclaves and tubular reactors. Generally, tubular reactors operate at a higher average ethylene conversion than autoclave reactors. The polymerization mechanism is either free-radical, using peroxide initiators, or ionic polymerization, using Ziegler catalyst. All data providers used the high pressure technology and either the tubular or autoclave reactors with either peroxide initiators or a Ziegler catalyst.

## Geography
For the LDPE resin primary data, companies were requested to provide data for the year 2015, the most recent full year of LDPE resin production prior to the project initiation date. Companies providing data were given the option to collect data from the year preceding or following 2015 if either year would reflect more typical production conditions. Two companies provided data for the year 2015, and two companies provided data for the year 2016. After reviewing individual company data in comparison to the average, each manufacturer verified data from 2015-2016 was representative of an average year for LDPE resin production at their company.

The geographic scope of the analysis is the manufacture of LDPE resin in North America. All LDPE resin data collected were from plants in the United States and Canada and modeled using North American databases such as the U.S. LCI database and Franklin Associates’ private database.

## Time period
All primary data were collected from 2015-2016

## Reference product
- Polyethylene, low-density, LDPE, virgin resin, at plant: 1 kg

## Avoided products
- Natural gas, combusted in industrial boiler [RNA]: 0.0061 m3
  Avoided Natural gas from steam energy sent outside plant boundaries
- Natural gas, combusted in industrial boiler [RNA]: 0.0075 m3
  Avoided Natural gas from energy coproduct sent outside plant boundaries

## Inputs from technosphere
- Nitrogen, liquid, at plant: 0.0101 kg
- Ethylene, at plant, kg: 0.996 kg; provider Ethylene, materials production, organic compound, at plant, kg
- Electricity, at cogen, for natural gas turbine [US]: 0.27 kWh
- Electricity, at grid [RNA]: 0.68 kWh; provider Electricity, at Grid, US, 2010
- Transport, combination truck, diesel powered [RNA]: 0.00021 t*km
- Transport, pipeline, natural gas [RNA]: 0.028 t*km
- Transport, train, diesel powered [RNA]: 3.4e-6 t*km
- Propylene, at plant [RNA]: 0.007 kg
- Natural gas, combusted in industrial boiler [RNA]: 0.058 m3

## Inputs from nature
- Water [resource, water]: 0.0029 m3

## Waste to treatment
- Disposal, hazardous waste, to unspecified hazardous waste landfill: 2.1e-5 kg
- Disposal, hazardous waste, to incineration without energy recovery: 8.2e-6 kg
- Recycling, solid waste, to recycling or reuse: 0.0048 kg
  Non hazardous waste
- Disposal, hazardous waste, to incineration with energy recovery: 0.00095 kg
- Disposal, solid waste, to incineration without energy recovery: 0.0014 kg
  Non hazardous waste
- Disposal, solid waste, process, to sanitary landfill: 0.0012 kg
  Non hazardouse waste

## Emissions to nature
- Particulate matter, > 2.5μm and ≤ 10μm [emission, air]: 3.5e-5 kg
- Methanol [emission, air]: 1e-6 kg
  This data was reported by fewer than three companies. To indicate known emissions while protecting the confidentiality of individual company responses, the emission is reported only by order of magnitude.
- Propylene [emission, air]: 1.3e-5 kg
- Volatile organic compounds [emission, air]: 1e-7 kg
  (same comment as for Methanol)
- Nitrogen oxides [emission, air]: 7.6e-5 kg
- Dissolved Organic Carbon [emission, water]: 1e-6 kg
  (same comment as for Methanol)
- Oils, unspecified [emission, water]: 1e-8 kg
  (same comment as for Methanol)
- Hydrofluorocarbons [emission, air]: 1e-6 kg
  (same comment as for Methanol)
- Nitrous oxide [emission, air]: 2.5e-6 kg
- 2-Methylbutane [emission, air]: 1e-6 kg
  (same comment as for Methanol)
- Biological Oxygen Demand [emission, water]: 1e-5 kg
  (same comment as for Methanol)
- Aldehydes, unspecified [emission, air]: 1e-7 kg
  (same comment as for Methanol)
- Naphthalene [emission, air]: 1e-12 kg
  (same comment as for Methanol)
- Ethylene [emission, air]: 0.00063 kg
- Isobutane [emission, air]: 1e-5 kg
  (same comment as for Methanol)
- Particulate matter [emission, air]: 2.5e-5 kg
- 1-Hexene [emission, air]: 1e-6 kg
  (same comment as for Methanol)
- Isopropanol [emission, air]: 1e-5 kg
  (same comment as for Methanol)
- Total dissolved solids [emission, water]: 1e-8 kg
  (same comment as for Methanol)
- Nickel [emission, water]: 1e-12 kg
  (same comment as for Methanol)
- Phenol [emission, water]: 1e-10 kg
  (same comment as for Methanol)
- CFC-11 [emission, water]: 1e-7 kg
  (same comment as for Methanol)
- Carbon dioxide [emission, air]: 0.026 kg
- Particulate matter, ≤ 2.5μm [emission, air]: 8.8e-6 kg
- Chemical Oxygen Demand [emission, water]: 0.0001 kg
  (same comment as for Methanol)
- Ethane [emission, air]: 1e-6 kg
  (same comment as for Methanol)
- Isopropanol [emission, water]: 1e-7 kg
  (same comment as for Methanol)
- Zinc [emission, water]: 1e-8 kg
  (same comment as for Methanol)
- Sulfur oxides [emission, air]: 3.1e-6 kg
- Methane [emission, air]: 7.4e-6 kg
- Suspended solids, inorganic [emission, water]: 2.7e-5 kg
  (same comment as for Methanol)
- Phosphorus [emission, water]: 1e-7 kg
  (same comment as for Methanol)
- Hydrocarbons [emission, air]: 0.00032 kg
  (same comment as for Methanol)
- Aluminum [emission, water]: 1e-7 kg
  (same comment as for Methanol)
- Propane [emission, air]: 1e-7 kg
  (same comment as for Methanol)
- Carbon monoxide [emission, air]: 8.1e-5 kg

## Inventory method
Attributional; Compatible with TRACI

## Modelling constants
LCI data for the production of LDPE resin were collected from four producers (six plants) in North America – all in the United States. Two companies provided data for the year 2015, and two companies provided data for the year 2016. After reviewing individual company data in comparison to the average, each manufacturer verified data from 2015-2016 was representative of an average year for LDPE resin production at their company. Mass allocation was used to allocate all inputs and outputs to each product and co-products. For steam used in other processes, this was treated as an avoided fuel product and were given credits based on the fuel required to create the steam that it would replace.

## Completeness
Data evaluation procedures and criteria were applied consistently to all primary data provided by the participating producers for all data collected. All primary data obtained specifically for this study were considered the most representative available for the systems studied. Data sets were reviewed for completeness and material balances, and follow-up was conducted as needed to resolve any questions about the input and output flows, process technology, etc. The aggregated averaged datasets were also reviewed by the providing companies as compared to the provided dataset. Companies were requested to review whether their data were complete and to comment about their or the average dataset.

## Data selection
All LDPE production data was sourced from primary producers.

## Data treatment
A weighted average was calculated from the data collected and used to develop the LCA model. Small amounts (less than 1 percent of total output) of off-spec/trim/scrap resin and waxes are produced as coproducts during this process. A mass basis was used to allocate the credit for the coproduct. The average LDPE datasets were reviewed and accepted respectively by each LDPE data provider.

## Sampling procedure
BOUNDARY CONDITIONS: The system boundary includes (1) raw material extraction (2) ) intermediate material processing, including incoming transportation for each process LDPE production, and (3) manufacturing of LDPE, including incoming transportation for each material.
DATA COLLECTION: The primary data for the life cycle inventory of the production of LDPE, were collected from four producers (six plants) located in the United States in 2015-2016. A weighted average was calculated from the data collected and used to develop the LCA model. For this process the data sets are based on actual plant data reported by plant personnel. Supporting background data were drawn from credible, widely used databases including the US LCI database, GREET, and Ecoinvent.
UNCERTAINTY ESTIMATION: Primary data collected from actual facilities are considered the best available data for representing industry operations. In this study, primary data were used to model the LDPE production. All data received were carefully evaluated before compiling the production-weighted average data sets used to generate results. No uncertainty analysis was carried out due to the lack of uncertainty data or probability distributions for key parameters, which are often only available as single point estimates from the producers.

## Review details
Some ACC members reviewed the data and associated report. Internal review of data entry proofreading, mass balance verification and data documentation was also carried out.

## Intended application
"Accounting, with system-external interactions" - The intended application is a purely descriptive accounting / documentation of the analysed system including existing interactions with other systems in the LCI model. These data are an update to a previously published dataset which is a generic unit process data.

## Project
These data are an update to a previously published dataset which is a generic unit process data.; Cradle-to-Resin Life Cycle Analysis of Polyethylene Terephthalate Resin. Submitted to the National Associate for PET Container Resources (NAPCOR). September 2019

## Sources
- Franklin Associates (2019) Cradle-to-Resin LCA PET for NAPCOR
