# Methanol, at plant, kg

Dataset: openLCA process, unit process
Category: 31-33: Manufacturing/3251: Basic Chemical Manufacturing
Geography: Northern America
Time period: 2015-12-31 to 2016-11-30
Allocation method: no allocation
Generated by: Franklin Associates, A Division of ERG
Owner: NAPCOR
Reviewer: Franklin Associates, A Division of ERG
Published in: Franklin Associates (2019) Cradle-to-Resin LCA PET for NAPCOR
copyright: false

## General comment
All input and emissions data for methanol is from GREET 2017. The transportation data was collected from an acetic acid producer and calculated using estimates. Includes material and energy requirements and environmental emissions for one kilogram of methanol by steam reformation of light hydrocarbons followed by low-pressure synthesis. The feed gas is compressed, preheated, and desulfurized. Then, it is mixed with steam and fed to the catalytic reformer. The synthesis gas from the reformer, containing primarily hydrogen, carbon monoxide, and carbon dioxide, is cooled to remove condensate and reheated to the proper temperature for entry into the process-to-process interchanger. From the interchanger, the feed goes to a multi-bed inter-cooled methanol converter system. Converter effluent is sent to a cooler, and the crude methanol is removed from the gas mixture. Distillation is used to eliminate dissolved gases from the methanol before refining the crude product to obtain the desired grade. Quantities may vary slightly between the reference to main source and and this module due to rounding.

## Time period
Data from GREET 2017

## Reference product
- Methanol, at plant, kg: 1 kg

## Inputs from technosphere
- Transport, pipeline, natural gas [RNA]: 1 t*km
- Transport, combination truck, diesel powered [RNA]: 0.01 t*km
- Transport, train, diesel powered [RNA]: 0.01 t*km
- Electricity, at grid [RNA]: 0.252 kWh; provider Electricity, at Grid, US, 2010
  GREET 2017 data
- Natural gas, at processing, composite, kg: 0.62 kg; provider Natural gas, at processing, production mixture, to consumer, kg
- Natural gas, combusted in industrial boiler [RNA]: 0.00737 m3
  GREET 2017 data

## Inputs from nature
- Water [resource, water]: 0.394 kg
  GREET 2017 data
- Oxygen [resource, air]: 0.38 kg

## Waste to treatment
- Recycling, hazardous waste, to recovery: 8.49e-6 kg
  Hazardous waste, recovery
- Recycling, solid waste, to recycling or reuse: 0.000209 kg
  Solid waste for recycling or reuse
- Disposal, hazardous waste, to unspecified hazardous waste landfill: 6.93e-6 kg
  Hazardous waste for disposal
- Disposal, solid waste, process, to sanitary landfill: 0.000258 kg
  Non-hazardous waste to landfill

## Emissions to nature
- Nitrogen oxides [emission, air]: 0.00111 kg
  GREET 2017 data
- Volatile organic compounds [emission, air]: 0.0005 kg
  GREET 2017 data
- Methane [emission, air]: 0.00459 kg
  GREET 2017 data
- Carbon monoxide [emission, air]: 0.00072 kg
  GREET 2017 data
- Nitrogen dioxide [emission, air]: 1.021e-5 kg
  GREET 2017 data
- Particulate matter, ≤ 10μm [emission, air]: 0.00026 kg
  GREET 2017 data. Represents PM > 2.5 and <10.
- Sulfur oxides [emission, air]: 0.00033 kg
- Particulate matter, ≤ 2.5μm [emission, air]: 0.00026 kg
  GREET 2017 data
- Carbon dioxide [emission, air]: 0.39 kg
  GREET 2017 data

## Inventory method
Compatible with TRACI

## Modelling constants
The inputs and emissions data for methanol are taken from GREET 2017 and the data for hazardous and non-hazardous waste material is taken from an industrial leader in methanol production. The transportation energy was estimated from discussions with an acetic acid producer.

## Completeness
The inputs and emissions data for methanol are taken from GREET 2017 and the data for hazardous and non-hazardous waste material is taken from an industrial leader in methanol production. The transportation energy was estimated from discussions with an acetic acid producer. The energy and carbon dioxide data for methanol are from a source outside of the United States. No energy and carbon dioxide data for the production of methanol are available for the United States. Waterborne emissions data are provided by an older U.S. source and may be overstated.

## Data collection
Data was taken from GREET 2017

## Sampling procedure
BOUNDARY CONDITIONS: The system boundary includes (1) raw material extraction (e.g., extraction of natural gas as feedstocks for methanol production), (2) incoming transportation for each process, and (3) manufacturing of methanol, including incoming transportation for each material.
DATA COLLECTION: The inputs and emissions data for methanol are taken from GREET 2017 and the data for hazardous and non-hazardous waste material is taken from an industrial leader in methanol production. The transportation energy was estimated from discussions with an acetic acid producer. Supporting background data were drawn from credible, widely used databases including the US LCI database, GREET, and Ecoinvent.
UNCERTAINTY ESTIMATION: All data received were carefully discussed with current producer(s) and evaluated before modeling data sets, used to generate results. No uncertainty analysis was carried out due to the lack of uncertainty data or probability distributions for key parameters, which are often only available as single point estimates from the producers.

## Review details
Internal review of data entry proofreading, mass balance verification and data documentation.

## Intended application
"Accounting, with system-external interactions" - The intended application is a purely descriptive accounting / documentation of the analysed system including existing interactions with other systems in the LCI model. These data are an update to a previously published dataset which is a generic unit process data.

## Sources
- Methanex 2016
- Methanex 2014
- Franklin Associates (2019) Cradle-to-Resin LCA PET for NAPCOR
- Methanex 2005
- ANL (2017) GREET 2017
