# Heat, onsite boiler, hardwood mill average, NE-NC

Dataset: openLCA process, unit process
Category: 22: Utilities/2213: Water, Sewage and Other Systems
Geography: United States
Time period: 2004-12-31 to 2005-12-31
Allocation method: no allocation
Generated by: Maureen Puetmann
Published in: Richard D. Bergman
restrictionsDescription: All information can be accessed by everybody.
copyright: false

## General comment
Allocation on an energy basis (HHV).
Important note: although most of the data in the US LCI database has
undergone some sort of review, the database as a whole has not yet
undergone a formal validation process.
Please email comments to lci@nrel.gov.

## Technology
Average technology.

## Geography
NE/NC = Northeast (NE) and Northcentral (NC) United States. The 20 states are Connecticut, Delaware, Illinois, Indiana, Iowa, Maine, Maryland, Massachusetts, Michigan, Minnesota, Missouri, New Hampshire, New Jersey, New York, Ohio, Pennsylvania, Rhode Island, Vermont, West Virginia, Wisconsin.

## Reference product
- Electricity; onsite boiler; hardwood mill; average [US]: 0.000497 kWh
  Net electricity output.

## By-products
- Heat; onsite boiler; hardwood mill; average [US]: 1 MJ

## Inputs from technosphere
- Wood fuel; hardwood; gen at lumber mill; combusted in industrial boiler [US]: 0.0361 kg; provider Wood fuel, hardwood, gen at lumber mill, combusted in industrial boiler, NE-NC
  Weight reported on an ovendry basis.
- Residual fuel oil, combusted in industrial boiler [RNA]: 1.75e-6 l
- Wood fuel; hardwood; purchased; combusted in industrial boiler [US]: 0.00621 kg; provider Wood fuel, hardwood, purchased, combusted in industrial boiler, NE-NC
  Weight reported on an ovendry basis.
- Natural gas, combusted in industrial boiler [RNA]: 0.00288 m3
- Liquefied petroleum gas, combusted in industrial boiler [RNA]: 0.000212 l
- Diesel, combusted in industrial boiler [RNA]: 0.000368 l
  Proxy for distillate fuel oil, combusted in industrial boiler

## Allocation factors
- economic, Heat; onsite boiler; hardwood mill; average: 0
- causal, Heat; onsite boiler; hardwood mill; average, for Diesel, combusted in industrial boiler: 0
- causal, Heat; onsite boiler; hardwood mill; average, for Wood fuel; hardwood; purchased; combusted in industrial boiler: 0
- causal, Heat; onsite boiler; hardwood mill; average, for Wood fuel; hardwood; gen at lumber mill; combusted in industrial boiler: 0
- causal, Electricity; onsite boiler; hardwood mill; average, for Diesel, combusted in industrial boiler: 1
- causal, Electricity; onsite boiler; hardwood mill; average, for Wood fuel; hardwood; gen at lumber mill; combusted in industrial boiler: 1
- economic, Electricity; onsite boiler; hardwood mill; average: 1
- physical, Heat; onsite boiler; hardwood mill; average: 0
- causal, Heat; onsite boiler; hardwood mill; average, for Liquefied petroleum gas, combusted in industrial boiler: 0
- physical, Electricity; onsite boiler; hardwood mill; average: 1
- causal, Electricity; onsite boiler; hardwood mill; average, for Liquefied petroleum gas, combusted in industrial boiler: 1
- causal, Electricity; onsite boiler; hardwood mill; average, for Natural gas, combusted in industrial boiler: 1
- causal, Electricity; onsite boiler; hardwood mill; average, for Residual fuel oil, combusted in industrial boiler: 1
- causal, Heat; onsite boiler; hardwood mill; average, for Natural gas, combusted in industrial boiler: 0
- causal, Heat; onsite boiler; hardwood mill; average, for Residual fuel oil, combusted in industrial boiler: 0
- causal, Electricity; onsite boiler; hardwood mill; average, for Wood fuel; hardwood; purchased; combusted in industrial boiler: 1

## Sampling procedure
Questionnaires from 20 mills (17 companies) from the 20 states of Forest Service (FS) Northeastern (NE) Region. Hardwood sawmills were members of the Hardwood Manufacturer Association (HMA).

## Sources
- Richard D. Bergman
- Maureen Puettmann
