# Packaging, Production Scanners

Dataset: openLCA process, unit process
Category: 31-33: Manufacturing/3341: Computer and Peripheral Equipment Manufacturing
Geography: Global
Time period: 2003-06-09 to 2012-09-14
Allocation method: no allocation
Generated by: Roy Wood
Reviewer: Jay Mathewson
Published in: Wood R (2012) LC GHG Summary Report - Kodak i2900, i3400, i4200, i4600, i5200, i5200v, i5600, i5600v, and i5800 Scanners
restrictionsDescription: All information can be accessed by everybody.
copyright: false

## General comment
Cradle to Gate data for packaging and information sheets for a single company's production scanners. Internal company validation via business and peer review and internal assessment. This dataset was consistent with LCA conducted using same approach as the office scanner LCA, which was peer reviewed by Kate Winnebeck, LCACP, New York State Pollution Prevention Institute , Rochester Institute of Technology. Data is only directly representative for the scanner models i5200 and i5600, but is similar to the i5200v, 5600v, i4200, and i5800 scanners and is being used for that purpose in the database. However components and manufacturing process is similar for many scanners, so extrapolation to other similar scanners may be done using judement. Component proxy data for original LCA was from Ecoinvent. Each flow represents one or more parts made with the same materials and processes, which were aggregated. The scanner was manufactured in China, but packaging sources were varied. The best available datasets were used as proxy data and the best data often came from different geographic locations from the packaging. Some data was replaced in this cradle to gate dataset by USLCI data where appropriate data was available. Unless otherwise noted in a General Comment for individual flows, data described as dummy_ was from Ecoinvent. Waste scrap was 0.5% of input flows. Although these were included in the full LCA, they were not shown to be significant in the modeling and according to a 1% cutoff criteria, have not been included in this cradle to gate data.

## Technology
Best available technology

## Geography
Global

## Time period
start date was based on earliest date of secondary data. Start date of primary data was 2011-07-01

## Reference product
- Packaging, production scanners [GLO]: 15.766 kg

## Inputs from technosphere
- Transport, combination truck, diesel powered [RNA]: 8.3 t*km; triangle minimum 8.2, mode 8.3, maximum 8.4
  original data - transport, lorry &amp;gt;32t, EURO5/ RER U
- Paper, woodcontaining, LWC, at plant: 0.374 kg; triangle minimum 0.37, mode 0.37, maximum 0.382
- Dry rough lumber, at kiln: 7.381 kg; triangle minimum 7.3, mode 7.343, maximum 7.5
- Electricity, low voltage, at grid: 0.42 kWh; triangle minimum 0.38, mode 0.42, maximum 0.46
- Corrugated board, mixed fibre, single wall, at plant: 8.011 kg; triangle minimum 7.9, mode 8.033, maximum 8.1
  original data - corrugated board, mixed fibre, single wall, at plant/ CH U from Ecoinvent

## Sampling procedure
engineering specifications, variability less than 1% for this model

## Review details
Data was reviewed to ensure in was consistent with the manufacturing process and components, was based on quality sources - primary data from design and manufacturing specifications, and secondary data was from reliable sources (largely from Ecoinvent) and data was properly documented in final report and associated appendices. Initial review was by Roy Wood, followed by an independent internal review by Jay Mathewson.

## Sources
- Wood R (2012) LC GHG Summary Report - Kodak i2900, i3400, i4200, i4600, i5200, i5200v, i5600, i5600v, and i5800 Scanners
