# Combustion, dry wood residue, AP-42

Dataset: openLCA process, unit process
Category: 22: Utilities/2213: Water, Sewage and Other Systems
Geography: Northern America
Time period: 1994-12-31 to 1994-12-31
Allocation method: no allocation
Generated by: Daniel Inman
Published in: Hsu, D.
restrictionsDescription: All information can be accessed by everybody.
copyright: false

## Technology
current

## Geography
North America

## Reference product
- Combustion, dry wood residue, AP-42 [RNA]: 1055.87 MJ
  based on heat input (HHV)

## Emissions to nature
- Sulfur dioxide [emission, air]: 0.0113398 kg
  dry wood-fired boiler
- Particulate matter, ≤ 10μm [emission, air]: 0.0335658 kg
  for fabric filter
- Carbon monoxide [emission, air]: 0.272155 kg
  dry wood-fired boiler
- Hydrochloric acid [emission, air]: 0.00861826 kg
- Nitrogen oxides [emission, air]: 0.22226 kg
  dry wood-fired boiler
- Nitrous oxide [emission, air]: 0.0058967 kg
- Particulate matter, ≤ 2.5μm [emission, air]: 0.0294835 kg
  for fabric filter
- Methane [emission, air]: 0.00952544 kg
- Carbon dioxide [emission, air]: 0 kg
  this is calculated from Aspen. Including this would be double calculating CO2.
- Particulate matter [emission, air]: 0.0453592 kg
  for fabric filter
- Volatile organic compounds [emission, air]: 0.00771107 kg
- Organic compounds [emission, air]: 0.0176901 kg

## Sources
- USEPA
- Hsu, D.
