# Scanner, packaging and information sheets

Dataset: openLCA process, unit process
Category: 31-33: Manufacturing/3222: Converted Paper Product Manufacturing
Geography: Global
Time period: 2009-12-31 to 2100-12-30
Allocation method: no allocation
Generated by: Roy Wood
Published in: Roy Wood
restrictionsDescription: All information can be accessed by everybody.
copyright: false

## Technology
Average technology

## Geography
Asia, China

## Time period
2010 and after

## Reference product
- Scanner, packaging and information sheets [GLO]: 1.88 kg

## Inputs from technosphere
- Electricity, at grid [RNA]: 0.05 kWh; provider Electricity, at Grid, US, 2010
- Paper, woodcontaining, LWC, at plant: 0.27 kg; triangle minimum 0.265, mode 0.27, maximum 0.275
- Polystyrene, high impact, HIPS, resin, at plant [RNA]: 0.266 kg; triangle minimum 0.2655, mode 0.266, maximum 0.2665
- Polyethylene, linear low density, LLDPE, resin, at plant [RNA]: 0.044 kg; triangle minimum 0.0435, mode 0.044, maximum 0.0445
- Transport, combination truck, long-haul, diesel powered [RNA]: 0.99 t*km
- Corrugated board, mixed fibre, single wall, at plant: 1.3 kg; triangle minimum 1.29, mode 1.3, maximum 1.31

## Sources
- Roy Wood
