# Open mold casting, rigid composites part, at plant

Dataset: openLCA process, unit process
Category: 31-33: Manufacturing/3261: Plastics Product Manufacturing
Geography: Northern America
Time period: 2010-12-31 to 2011-12-31
Allocation method: no allocation
Generated by: Franklin Associates
Published in: American Composites Manufacturers Assn.
restrictionsDescription: All information can be accessed by everybody.
copyright: false

## General comment
An average of 0.00049 kg of rigid composite part scrap is produced for every kilogram of open mold casted parts produced; this scrap is sold for recycling. Complete inventory data and metadata are shown in full in the final report, Life Cycle Inventory of Polymer Composites. The report is not publicly available. This report has been extensively reviewed within Franklin Associates by Rebe Feraldi, Anne Marie Molen, and Melissa Huff and has undergone partial critical review by ACMA members. Important note: although most of the data in the US LCI database has undergone some sort of review, the database as a whole has not yet undergone a formal validation process. Please email comments to lci@nrel.gov.

## Technology
Fabrication of rigid composite parts by open mold casting.

## Geography
US

## Reference product
- Open mold casting, rigid composites part, at plant [RNA]: 1 kg

## By-products
- Composite scrap, from composites open mold casting, at plant [US]: 0.00049 kg

## Inputs from technosphere
All rows: lognormal geomSd 1
- Polyethylene terephthalate, PET, virgin resin, at plant, kg: 0.014 kg
- Disposal, solid waste, unspecified, to municipal incineration: 0.0026 kg
- Disposal, solid waste, unspecified, to sanitary landfill: 0.043 kg
- Disposal, solid waste, unspecified, to waste-to-energy: 3e-5 kg
- Limestone, at mine [RNA]: 0.71 kg
- Liquefied petroleum gas, combusted in industrial boiler [RNA]: 0.0056739 l
- Acetone from butane, at plant: 0.0061 kg
- Transport, combination truck, diesel powered [RNA]: 0.57924 t*km
- Electricity, at grid [RNA]: 0.55776 kWh; provider Electricity, at Grid, US, 2010
- Unsaturated polyester, resin, at plant [US]: 0.23 kg
- Dichloromethane, at plant: 0.00015 kg
- Gelcoat, UPR & styrene-based, at plant: 0.025 kg
- Mold-release agent, at plant: 0.0046 kg
- Aluminum hydroxide, at plant: 0.046 kg
- Natural gas, combusted in industrial boiler [RNA]: 0.044386 m3
- Pigment, at plant: 0.0038 kg

## Emissions to nature
- Methyl methacrylate [emission, air]: 1.2e-6 kg; lognormal geomSd 1
- Particulate matter, ≤ 10μm [emission, air]: 1.9e-5 kg; lognormal geomSd 1
- Methylene chloride [emission, air]: 0.00015 kg; lognormal geomSd 1
- Styrene [emission, air]: 0.0071 kg; lognormal geomSd 1

## Allocation factors
- causal, Composite scrap, from composites open mold casting, at plant, for Acetone from butane, at plant: 0
- causal, Open mold casting, rigid composites part, at plant, for Natural gas, combusted in industrial boiler: 1
- causal, Open mold casting, rigid composites part, at plant, for Pigment, at plant: 1
- causal, Composite scrap, from composites open mold casting, at plant, for Styrene: 0
- economic, Open mold casting, rigid composites part, at plant: 1
- causal, Composite scrap, from composites open mold casting, at plant, for Disposal, solid waste, unspecified, to waste-to-energy: 0
- causal, Open mold casting, rigid composites part, at plant, for Disposal, solid waste, unspecified, to sanitary landfill: 1
- physical, Open mold casting, rigid composites part, at plant: 1
- causal, Composite scrap, from composites open mold casting, at plant, for Aluminum hydroxide, at plant: 0
- causal, Composite scrap, from composites open mold casting, at plant, for Transport, combination truck, diesel powered: 0
- causal, Open mold casting, rigid composites part, at plant, for Liquefied petroleum gas, combusted in industrial boiler: 1
- causal, Composite scrap, from composites open mold casting, at plant, for Natural gas, combusted in industrial boiler: 0
- causal, Composite scrap, from composites open mold casting, at plant, for Limestone, at mine: 0
- causal, Open mold casting, rigid composites part, at plant, for Methyl methacrylate: 1
- causal, Composite scrap, from composites open mold casting, at plant, for Disposal, solid waste, unspecified, to municipal incineration: 0
- causal, Open mold casting, rigid composites part, at plant, for Gelcoat, UPR & styrene-based, at plant: 1
- causal, Composite scrap, from composites open mold casting, at plant, for Unsaturated polyester, resin, at plant: 0
- causal, Composite scrap, from composites open mold casting, at plant, for Methyl methacrylate: 0
- causal, Composite scrap, from composites open mold casting, at plant, for Disposal, solid waste, unspecified, to sanitary landfill: 0
- causal, Composite scrap, from composites open mold casting, at plant, for Electricity, at grid: 0
- causal, Composite scrap, from composites open mold casting, at plant, for Methylene chloride: 0
- causal, Open mold casting, rigid composites part, at plant, for Styrene: 1
- causal, Open mold casting, rigid composites part, at plant, for Transport, combination truck, diesel powered: 1
- causal, Open mold casting, rigid composites part, at plant, for Aluminum hydroxide, at plant: 1
- causal, Open mold casting, rigid composites part, at plant, for Mold-release agent, at plant: 1
- causal, Open mold casting, rigid composites part, at plant, for Unsaturated polyester, resin, at plant: 1
- causal, Composite scrap, from composites open mold casting, at plant, for Polyethylene terephthalate, PET, virgin resin, at plant, kg: 0
- causal, Composite scrap, from composites open mold casting, at plant, for Liquefied petroleum gas, combusted in industrial boiler: 0
- causal, Open mold casting, rigid composites part, at plant, for Polyethylene terephthalate, PET, virgin resin, at plant, kg: 0
- causal, Composite scrap, from composites open mold casting, at plant, for Pigment, at plant: 0
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
## Sampling procedure
Data are from primary sources. The composites fabricators who provided data for this module verified that the characteristics of their plants are representative of North American composites fabrication facilities producing open mold casted composite parts. The representativeness of the composites fabrication processes are unknown, but estimated to be less than 10% of the US production volume.

## Sources
- American Composites Manufacturers Assn.
