# Sawn lumber, hardwood, rough, kiln dried, at kiln, SE

Dataset: openLCA process, unit process
Category: 31-33: Manufacturing/3211: Sawmills and Wood Preservation
Geography: United States
Time period: 2004-12-31 to 2005-12-31
Allocation method: no allocation
Generated by: Maureen Puettmann
Published in: Richard D. Bergman
restrictionsDescription: All information can be accessed by everybody.
copyright: false

## General comment
Important note: although most of the data in the US LCI database has
undergone some sort of review, the database as a whole has not yet
undergone a formal validation process.
Please email comments to lci@nrel.gov.

## Technology
Average technology for the production of hardwood lumber in the SE region.

## Geography
SE = Southeast United States. The 8 states are Arkansas, Louisiana, Mississippi, Alabama, Tennessee, North Carolina, South Carolina, Georgia.

## Reference product
- Sawn lumber; hardwood; rough; kiln dried; at kiln [US]: 1 m3
  Oven-dried weights; wood specific gravity of 0.600 at 8%MC dry basis; 1.27 m3 rough dry lumber = 1 m3 planed dry lumber

## Inputs from technosphere
- Gasoline, combusted in equipment [RNA]: 0.0876 l
  20% of mill use for on-site transportation
- Natural gas, combusted in industrial equipment, 1.357 m3/kg, 52.13 MJ/kg [RNA]: 0.00708 l; provider Natural gas, combusted in industrial equipment
  20% of mill use for on-site transportation; proxy for propane
- Heat; onsite boiler; hardwood mill; average [US]: 4828 MJ; provider Heat, onsite boiler, hardwood mill, average, SE
  4,678 MJ per 1.0 cubic meter is equal to 7.46 million BTUs (no efficiencies) during drying; incorporates plant heating
- Electricity; onsite boiler; hardwood mill; average [US]: 2.32 kWh; provider Heat, onsite boiler, hardwood mill, average, SE
  Represents 25% of total mill consumption of electricity generated onsite.
- Diesel, combusted in industrial equipment [RNA]: 0.846 l
  20% of mill use for on-site transportation
- Sawn lumber; hardwood; rough; green; at sawmill [US]: 765 kg; provider Sawn lumber, hardwood, rough, green, at sawmill, SE
  Oven-dried weights.
- Electricity, at grid [RNA]: 41.6 kWh; provider Electricity, Eastern US, 2014
  Represents 25% of total mill consumption of grid electricity.

## Inputs from nature
- Water [resource, water]: 25000 kg
  amount of water consumed as makeup boiler water

## Emissions to nature
- Volatile organic compounds [emission, air, troposphere, rural]: 0.0504 kg
  Derived values are from secondary data found in two Forest Products Journal (Rice and Erich 2006; Beakler et al 2007)

## Sampling procedure
Questionnaires from 12 mills from the 8 states of southeast region. Hardwood sawmills were members of the Hardwood Manufacturer Association (HMA).

## Sources
- Forest Products Laboratory
- Forest Products Laboratory
- Richard D. Bergman
- unspecified
- Maureen Puettmann
- unspecified
- NHLA
