# Electricity, at Grid, TRE, 2008

Dataset: openLCA process, unit process
Category: 22: Utilities/2211: Electric Power Generation, Transmission and Distribution
Geography: Northern America
Time period: 2007-12-31 to 2007-12-31
Allocation method: no allocation
Generated by: Alberta Carpenter
Published in: Chris Goemans, Athena Institute
restrictionsDescription: All information can be accessed by everybody.
copyright: false

## General comment
The methodology used to put together the grid information is outlined in reference 1.

## Technology
Typical

## Geography
Texas

## Reference product
- Electricity, at grid [RNA]: 1 kWh

## Inputs from technosphere
- Electricity, natural gas, at power plant [RNA]: 0.47503 kWh
  NG – Natural Gas
- Electricity, other fuels, unspecified, at power plant: 9.60474e-5 kWh
  OTH – Other (Batteries, Chemicals, Coke Breeze, Hydrogen, Pitch, Sulfur, Tar Coal, and miscellaneous technologies)
- Electricity, nuclear, at power plant [RNA]: 0.120329 kWh
  NUC – Nuclear (Uranium, Plutonium, Thorium)
- Electricity, other fuels, unspecified, at power plant: 0.000783224 kWh
  PUR – Purchased Steam
- Electricity, biomass, gas, landfill, at power plant: 0.00111093 kWh
  LFG – Landfill Gas
- Electricity, biomass,liquid, unspecified, at power plant: 0.000847793 kWh
  BLQ – Black Liquor
- Electricity, biomass, at power plant [RNA]: 0.000404077 kWh
  WDS – Wood/Wood Waste Solids (Paper Pellets, Railroad Ties, Utility Poles, Wood Chips, and other wood solids)
- Electricity, petroleum coke, at power plant: 0.00270797 kWh
  PC – Petroleum Coke
- Electricity, at wind power plant, unspecified: 0.0439623 kWh
  WND – Wind
- Electricity, other gases, unspecified, at power plant: 0.00702204 kWh
  OG – Other Gas (Butane, Coal Processes, Coke-Oven, Refinery, and other processes)
- Electricity, biomass,liquid, unspecified, at power plant: 9.10875e-6 kWh
  OBL – Other Biomass Liquid (Ethanol, Fish Oil, Liquid Acetonitrile Waste, Medical Waste, Tall Oil, Waste Alcohol, and other Biomass not specified)
- Electricity, other fuels, unspecified, at power plant: 4.71068e-5 kWh
  WH – Waste heat not directly attributed to a fuel source. Note that WH should only be reported where the fuel source for the waste heat is undetermined, and for combined cycle steam turbines that are not supplementary fired
- Electricity, bituminous coal, at power plant [RNA]: 0.226331 kWh
  SUB – Subbituminous Coal
- Electricity, hydropower, at power plant, unspecified: 0.00204898 kWh
  WAT – Water (Conventional, Pumped Storage)
- Electricity, diesel, at power plant [RNA]: 0.000299496 kWh
  DFO – Distillate Fuel Oil (includes all Diesel and No. 1, No. 2, and No. 4 Fuel Oils)
- Electricity, residual fuel oil, at power plant [RNA]: 5.13468e-6 kWh
  RFO – Residual Fuel Oil (includes No. 5 and No. 6 Fuel Oils and Bunker C Fuel Oil)
- Electricity, lignite coal, at power plant [RNA]: 0.118863 kWh
  LIG – Lignite Coal
- Electricity, biomass, solid, agriculture by-products, at power plant: 4.24006e-5 kWh
  AB – Agriculture Crop By-products / Straw / Energy Crops
- Electricity, biomass, gas, unspecified, at power plant: 5.98588e-5 kWh
  OBG – Other Biomass Gases (Digester Gas, Methane, and other biomass gases)

## Sampling procedure
based on EIA electricity reports for all power plants in the US.

## Sources
- EIA
- EIA
- EIA
- Chris Goemans, Athena Institute
- US DOE
- International Energy Agency
- Statistics Canada
- EIA
- Statistics Canada
- EIA
- EIA
- US DOE
- EIA
- USEPA
- Statistics Canada
- unspecified
- Statistics Canada
- EIA
- EIA
- EIA
- Statistics Canada
- USEPA
- Statistics Canada
- EIA
