# Post, softwood, CCA treated, SE

Dataset: openLCA process, unit process
Category: 31-33: Manufacturing/3211: Sawmills and Wood Preservation
Geography: United States
Time period: 2004-12-31 to 2009-12-30
Allocation method: no allocation
Generated by: Chris Bolin
Reviewer: Paul Cooper
Published in: Chris Bolin
restrictionsDescription: All information can be accessed by everybody.
copyright: false

## General comment
Pressure-treated chromated copper arsenate (CCA) softwood post. Base process data presented with allocations to within process co-products noted. Refer to allocation worksheet for specifics. All allocations performed using mass or volume. This sheet sets out each unit process in the production of one cubic meter of CCA treated softwood guard rail post as produced in the US southeast. Important note: although most of the data in the US LCI database has undergone some sort of review, the database as a whole has not yet undergone a formal validation process. Please email comments to lci@nrel.gov.; Geography: US Southeast

## Technology
typical

## Geography
US Southeast

## Time period
2005-2009

## Reference product
- Post; softwood; CCA treated [US]: 1 m3
  Retention = 0.57 lb/ft3 = 9.06 kg/m3

## Inputs from technosphere
- Copper Chromium Arsenate (CCA), at plant: 9.0575 kg
- Transport, combination truck, diesel powered [RNA]: 980 t*km
  100% lumber; 100% CCA concentrate; 80% of Cr transport; 100% of Cu transport; survey data
- Residual fuel oil, combusted in industrial boiler [RNA]: 0.496 l
  Preservative Production
- Liquefied petroleum gas, combusted in industrial boiler [RNA]: 0.0661 l
  Preservative Wood Treatment
- Diesel, combusted in industrial equipment [RNA]: 5.94 l
  Preservative Wood Treatment
- Gasoline, combusted in equipment [RNA]: 0.038 l
  Preservative Wood Treatment
- Sawn lumber; softwood; green; rough; at sawmill [US]: 0.350096 m3
  purchase 35% dried onsite. Energy to dry wood is included; 519 kg/m3
- Natural gas, combusted in industrial boiler [RNA]: 0.97 m3
  Preservative Production
- Electricity, at grid [RNA]: 99.8 kWh; provider Electricity, Eastern US, 2014
  Preservative Production
- Disposal, solid waste, unspecified, to unspecified treatment: 0.084 kg
  Preservative Wood Treatment; Hazardous and Process waste disposed—Amount of hazardous waste for the survey year and units (pounds, tons, drums, etc.). Chemical and process waste disposed—Amount of waste and units from the treatment process, such as from tanks, treatment equipment, and drip pad area, but not including hazardous waste. This may be regulated in your state as chemical, industrial, or special waste.
- Diesel, combusted in industrial boiler [RNA]: 0.253 l
  Preservative Production
- Disposal, solid waste, unspecified, to unspecified landfill: 0.469 kg
  Preservative Wood Treatment; Solid waste disposal associated with metals mining. Solid waste disposal as reported in treater surveys as other (normal trash or municipal waste). Other waste disposal—Amount of normal trash or municipal waste that is typically collected in trash cans or dumpsters.
- Disposal, solid waste, unspecified, to unspecified landfill: 12.7 kg
  Preservative Production; Solid waste disposal associated with metals mining. Solid waste disposal as reported in treater surveys as other (normal trash or municipal waste). Other waste disposal—Amount of normal trash or municipal waste that is typically collected in trash cans or dumpsters.
- Bituminous coal, combusted in industrial boiler [RNA]: 0.0374 kg
  Preservative Production
- Sawn lumber; softwood; green; rough; at sawmill [US]: 0.650674 m3
  purchase 65% green air dried onsite. 519 kg/m3
- Electricity, at grid [RNA]: 29.8 kWh; provider Electricity, Eastern US, 2014
  Preservative Wood Treatment
- Transport, train, diesel powered [RNA]: 21 t*km
  11% of Cr transport; 5% of As Transport; survey data
- Natural gas, combusted in industrial boiler [RNA]: 10.2 m3
  Preservative Wood Treatment
- Transport, ocean freighter, residual fuel oil powered [US]: 230 t*km
  95% of As transport; 9% or Cr transport; survey data
- Wood waste, unspecified, combusted in industrial boiler [RNA]: 81.7 kg
  Preservative Wood Treatment; Based on green moisture content 50%
- Gasoline, combusted in equipment [RNA]: 0.0154 l
  Preservative Production

## Inputs from nature
- Water [resource, water]: 285000 kg
  Preservative Production
- Water [resource, water]: 302 kg
  Preservative Wood Treatment

## Emissions to nature
- Carbon monoxide [emission, air, troposphere, rural]: 0.011 kg
  Preservative Production
- Copper [emission, water]: 0.00017 kg
  Preservative Wood Treatment;
- Volatile organic compounds [emission, air, troposphere, rural]: 0.18 kg
  Preservative Wood Treatment; at kiln: emission from the wood product being dried
- Arsenic [emission, water]: 7.5e-5 kg
  Preservative Wood Treatment; Storm water runoff to unspecified location.
- Nitrous oxide [emission, air, troposphere, rural]: 2e-5 kg
  Preservative Production
- Methane [emission, air, troposphere, rural]: 0.00044 kg
  Preservative Production
- Sulfur dioxide [emission, air, troposphere, rural]: 0.008 kg
  Preservative Production
- Sulfur oxides [emission, air, troposphere, rural]: 6.1e-5 kg
  Preservative Production
- Particulate matter, ≤ 10μm [emission, air, troposphere, rural]: 0.28 kg
  Preservative Production
- Mercury [emission, air, troposphere, rural]: 9e-8 kg
  Preservative Production
- Carbon dioxide [emission, air, troposphere, rural]: 5 kg
  Preservative Production
- Nitrogen oxides [emission, air, troposphere, rural]: 0.026 kg
  Preservative Production
- Chromium [emission, water]: 0.0003 kg
  Preservative Wood Treatment;

## Sampling procedure
Industry survey

## Sources
- Chris Bolin
- Chris Bolin
