# Electricity, at eGrid, RFCW, 2010

Dataset: openLCA process, unit process
Category: 22: Utilities/2211: Electric Power Generation, Transmission and Distribution
Geography: Northern America
Time period: 2009-12-31 to 2009-12-31
Allocation method: no allocation
Generated by: Samantha Wascavage
Published in: Chris Goemans, Athena Institute
restrictionsDescription: All information can be accessed by everybody.
copyright: false

## General comment
The methodology used to put together the grid information is outlined in reference 1.

## Technology
Typical

## Geography
RFC West electricity grid to include Indiana, Ohio, West Virginia, and portions of Illinois, Michigan, Minnesota, Kentucky, West Virginia, Maryland and Pennsylvania.

## Reference product
- Electricity, at grid [RNA]: 1 kWh

## Inputs from technosphere
- Electricity, bituminous coal, at power plant [RNA]: 0.150323 kWh
  Subbituminous Coal
- Electricity, at wind power plant, unspecified: 0.006139 kWh
  Wind
- Electricity, petroleum coke, at power plant: 0.0021 kWh
  Petroleum (Other Fossil) PC, SG, WO - petroleum coke
- Electricity, biomass,liquid, unspecified, at power plant: 0.001369 kWh
  Liquid Renewable Fuels (Biomass) BLQ, OBL, SLW, WDL - black liquor
- Electricity, biomass, solid, biogenic MSW, at power plant: 0.000948 kWh
  Solid Renewable Fuels (Biomass) MSB, AB, MSW, OBS, TDF, WDS – Municipal Solid Waste – Biogenic Component
- Electricity, bituminous coal, at power plant [RNA]: 0.556185 kWh
  Bituminous Coal BIT, SC, SGC, WC - Anthracite Coal, and Bituminous Coal.
- Electricity, diesel, at power plant [RNA]: 0.023233 kWh
  Petroleum (DFO, JF, KER) – Distillate Fuel Oil (includes all Diesel and No. 1, No. 2, and No. 4 Fuel Oils)
- Electricity, biomass, gas, landfill, at power plant: 0.001952 kWh
  Gaseous Renewable Fuels (Biomass) LFG, OBG - landfill gas
- Electricity, nuclear, at power plant [RNA]: 0.190671 kWh
  Nuclear Fission – NUC Nuclear (Uranium, Plutonium, Thorium)
- Electricity, natural gas, at power plant [RNA]: 0.054394 kWh
  Natural Gas
- Electricity, hydropower, at power plant, unspecified: 0.006398 kWh
  Hydroelectric WAT – Water (Conventional, Pumped Storage)
- Electricity, other gases, unspecified, at power plant: 0.005266 kWh
  Other Gases OG, BFG, PG – Other Gas (Butane, Coal Processes, Coke-Oven, Refinery, and other processes)
- Electricity, MSW, non-biogenic, at power plant: 0.000994 kWh
  Other Fuels MSN, OTH, PUR, WH – Other (Batteries, Chemicals, Coke Breeze, Hydrogen, Pitch, Sulfur, Tar Coal, and miscellaneous technologies)
- Electricity, residual fuel oil, at power plant [RNA]: 2.8e-5 kWh
  Petroleum (RFO) – Residual Fuel Oil (includes No. 5 and No. 6 Fuel Oils and Bunker C Fuel Oil)

## Sampling procedure
based on EIA electricity reports for all power plants in the US.

## Sources
- EIA
- EIA
- Statistics Canada
- Statistics Canada
- Chris Goemans, Athena Institute
- EIA
- USEPA
- EIA
- Statistics Canada
- EIA
- Statistics Canada
- EIA
- unspecified
- EIA
- USEPA
- EIA
- EIA
- Statistics Canada
- US DOE
- International Energy Agency
- EIA
