# Transport, transit bus, diesel powered, Northeast

Dataset: openLCA process, unit process
Category: 48-49: Transportation and Warehousing/4851: Urban Transit Systems
Geography: Northern America
Time period: 2009-12-31 to 2009-12-31
Allocation method: no allocation
Generated by: Nathan Hardesty
Published in: U.S. Environmental Protection Agency (EP
restrictionsDescription: All information can be accessed by everybody.
copyright: false

## General comment
This dataset represents the Northeastern U.S. (CT, DC, DE, ME, MD, MA, NH, NJ, NY, PA, RI, VT (Reference 10)) average airborne emissions for operating a diesel powered transit bus. The inventory includes all vehicle operation processes, including off-network and refueling activities.
The refinery-to-pump transportation and distribution data are calculated from Argonne National Laboratory's GREET 1.8d.1 model.
The vehicle operation data are calculated from EPA's MOVES2010a model, using the assumptions described in the corresponding detailed spreadsheet. Emissions factors in MOVES2010a are largely based on EPA's Mobile Source Observation Database, which in turn includes data from a variety of vehicle studies (References 6-8).
MOVES2010a acknowledges sources of uncertainty in the model structure, the population and acitivty data, and other model parameters. As of July 2011, the uncertainty calculation function of the model has not been activated.

## Technology
Combustion of diesel in a transit bus.

## Geography
US

## Reference product
- Transport, transit bus, diesel powered [RNA]: 1 p*km

## Inputs from technosphere
- Transport, pipeline, unspecified petroleum products [RNA]: 0.110495 t*km
- Transport, combination truck, average fuel mix [RNA]: 0.0109622 t*km
- Transport, barge, average fuel mix [RNA]: 0.010603 t*km
- Transport, ocean tanker, average fuel mix: 0.074942 t*km
- Transport, train, diesel powered [RNA]: 0.0204568 t*km
- Diesel, at refinery: 0.0340063 l; provider Petroleum refining, at refinery

## Emissions to nature
- Carbon monoxide [emission, air]: 0.000332817 kg
- Particulate matter, ≤ 2.5μm [emission, air]: 1.82936e-7 kg
  PM2.5 from tirewear.
- Particulate matter, ≤ 2.5μm [emission, air]: 4.21661e-5 kg
  PM2.5 from organic carbon, elemental carbon, and sulfate particulates.
- Particulate matter, ≤ 10μm [emission, air]: 4.34686e-5 kg
  PM10 from organic carbon, elemental carbon, and sulfate particulates.
- Hydrocarbons [emission, air]: 5.20945e-5 kg
- Nitrogen oxides [emission, air]: 0.000881855, 0.000811328 kg (2 entries)
- Ammonia [emission, air]: 1.33408e-6 kg
- Particulate matter, ≤ 10μm [emission, air]: 7.62842e-7 kg
  PM10 from tirewear.
- Nitrous oxide [emission, air]: 2.05931e-7 kg
- Particulate matter, ≤ 2.5μm [emission, air]: 7.05372e-7 kg
  PM2.5 from brakewear.
- Nitrogen dioxide [emission, air]: 7.05274e-5 kg
- Sulfur dioxide [emission, air]: 1.49694e-6 kg
- Volatile organic compounds [emission, air]: 5.37335e-5 kg
- Carbon dioxide [emission, air]: 0.0892841 kg
- Particulate matter, ≤ 10μm [emission, air]: 2.69452e-6 kg
  PM10 from brakewear.
- Methane [emission, air]: 1.59007e-6 kg

## Sources
- Assessment and Standards Division, Offic
- National Institute of Standards and Tech
- Wang, M.
- National Climatic Data Center, National
- U.S. Alternative Fuels and Advanced Vehi
- U.S. Environmental Protection Agency (EP
- Eastern Research Group
- Assessment and Standards Division, Offic
- unspecified
- EPA
