# Electricity, at eGrid, SPNO, 2008

Dataset: openLCA process, unit process
Category: 22: Utilities/2211: Electric Power Generation, Transmission and Distribution
Geography: Northern America
Time period: 2007-12-31 to 2007-12-31
Allocation method: no allocation
Generated by: Alberta Carpenter
Published in: Chris Goemans, Athena Institute
restrictionsDescription: All information can be accessed by everybody.
copyright: false

## General comment
The methodology used to put together the grid information is outlined in reference 1.

## Technology
Typical

## Geography
SPNO North electricity grid to include Kansas and western Missouri (less SRMW).

## Reference product
- Electricity, at grid [RNA]: 1 kWh

## Inputs from technosphere
- Electricity, bituminous coal, at power plant [RNA]: 0.719218, 0.0243735 kWh (2 entries)
- Electricity, other gases, unspecified, at power plant: 3.59757e-5 kWh
- Electricity, tire derived fuel, at power plant: 0.000283619 kWh
- Electricity, residual fuel oil, at power plant [RNA]: -2.19327e-5 kWh
- Electricity, nuclear, at power plant [RNA]: 0.118178 kWh
- Electricity, biomass, gas, landfill, at power plant: 0.000316738 kWh
- Electricity, biomass, solid, agriculture by-products, at power plant: 5.15169e-5 kWh
- Electricity, petroleum coke, at power plant: 0.00123092 kWh
- Electricity, at wind power plant, unspecified: 0.026291 kWh
- Electricity, natural gas, at power plant [RNA]: 0.0886796 kWh
- Electricity, hydropower, at power plant, unspecified: 0.0205177 kWh
- Electricity, diesel, at power plant [RNA]: 0.000845673 kWh

## Sampling procedure
based on EIA electricity reports for all power plants in the US.

## Sources
- EIA
- EIA
- EIA
- Chris Goemans, Athena Institute
- US DOE
- International Energy Agency
- Statistics Canada
- EIA
- Statistics Canada
- EIA
- EIA
- US DOE
- EIA
- USEPA
- Statistics Canada
- unspecified
- Statistics Canada
- EIA
- EIA
- EIA
- Statistics Canada
- USEPA
- Statistics Canada
- EIA
