# Scanner, department, i3200, i3400

Dataset: openLCA process, unit process
Category: 31-33: Manufacturing/3341: Computer and Peripheral Equipment Manufacturing
Geography: Global
Time period: 2003-06-09 to 2012-09-14
Allocation method: no allocation
Generated by: Roy Wood
Reviewer: Jay Mathewson
Published in: Wood R (2012) LC GHG Summary Report - Kodak i2900, i3400, i4200, i4600, i5200, i5200v, i5600, i5600v, and i5800 Scanners
restrictionsDescription: All information can be accessed by everybody.
copyright: false

## General comment
Cradle to Gate data for a single 16.7 kg line of scanner model for a single company. Scanner scans at 50-160 A4 images per minute. Typical use is 5,000 images per day, but can exceed 50,000 images per day. This cradle to gate data was extracted from a full cradle to end of life LCA. Internal company validation via business and peer review and internal assessment. This dataset was consistent with LCA conducted using same approach as the office scanner LCA, which was peer reviewed by Kate Winnebeck, LCACP, New York State Pollution Prevention Institute , Rochester Institute of Technology. Data is only directly representative for the scanner models i3200 and i3400. However components and manufacturing process is similar for many scanners, so extrapolation to other similar scanners may be done using judement. Component proxy data for original LCA was from Ecoinvent. Each flow represents one or more parts made with the same materials and processes, which were aggregated The scanner was manufactured in China with the subcomponents mostly from China. However the best available datasets were used as proxy data and the best data often came from different geographic locations. Some data was replaced in this cradle to gate dataset by USLCI data where appropriate data was available. Unless otherwise noted in a General Comment for individual flows, data described as dummy_ was from Ecoinvent. Waste scrap was 0.5% of input flows. Although these were included in the full LCA, they were not shown to be significant in the modeling and according to a 1% cutoff criteria, have not been included in this cradle to gate data.

## Technology
Best available technology

## Geography
Global

## Time period
start date was based on earliest date of secondary data. Start date of primary data was 2011-07-01

## Reference product
- Scanner, department, i3200, i3400 [GLO]: 1 Item(s)

## Inputs from technosphere
- Flat glass, coated, at plant: 0.18 kg; triangle minimum 0.175, mode 0.18, maximum 0.185
- Synthetic rubber, at plant: 0.114 kg; triangle minimum 0.109, mode 0.114, maximum 0.119
- Copper product manufacturing, average metal working: 0.033 kg; triangle minimum 0.032, mode 0.033, maximum 0.034
- Silver, at regional storage: 0.014 kg; triangle minimum 0.0135, mode 0.014, maximum 0.0145
  silver data was used for neodymium, because there was no neodymium data and silver was the best substitute based on price and cost of production.
- Tap water, at user: 51 kg; triangle minimum 46, mode 51, maximum 56
- Polymethyl methacrylate, beads, at plant: 0.016 kg; triangle minimum 0.0158, mode 0.016, maximum 0.0162
- Treatment, sewage, to wastewater treatment, class 1: 50 kg; triangle minimum 45, mode 50, maximum 55
- Cable, connector for computer, without plugs, at plant: 0.048 kg; triangle minimum 0.047, mode 0.048, maximum 0.049
  data available as a .065 kg part in Ecoinvent
- Tetrafluoroethylene, at plant: 0.012 kg; triangle minimum 0.011, mode 0.012, maximum 0.013
- Injection moulding: 7.79 kg; triangle minimum 7.7, mode 7.79, maximum 7.88
- Polyvinyl chloride, PVC, resin, at plant [RNA]: 0.014 kg; triangle minimum 0.013, mode 0.014, maximum 0.015
  original data - polyvinyl chloride ar regional storage, RER/U from Ecoinvent
- LCD glass, at plant: 0.31 kg; triangle minimum 0.3, mode 0.31, maximum 0.32
  About half this quantity was LCD glass and half was lens glass and other highly processed glass. LCD glass was the best available data for lens and other highly processed glass based on cost and manufacturing complexity.
- Carbon black, at plant: 0.143 kg; triangle minimum 0.14, mode 0.143, maximum 0.146
- Steel product manufacturing, average metal working: 6.4 kg; triangle minimum 6.3, mode 6.4, maximum 6.5
- Flat glass, uncoated, at plant: 0.18 kg; triangle minimum 0.175, mode 0.18, maximum 0.185
- Copper, primary, at refinery: 0.033 kg; triangle minimum 0.032, mode 0.033, maximum 0.034
- E-glass, at plant [US]: 0.02 kg; triangle minimum 0.019, mode 0.02, maximum 0.021
  original data - glass fibre, at plant, RER/U from Ecoinvent
- Printed wiring board, surface mounted, unspec., Pb free, at plant: 0.493 kg; triangle minimum 0.49, mode 0.493, maximum 0.496
- Acrylonitrile-butadiene-styrene, ABS, copolymer resin, at plant [RNA]: 6.54 kg; triangle minimum 6.53, mode 6.54, maximum 6.55
  original data - acrylonitrile-butadiene-styrene (ABS), at plant RER/U from Ecoinvent
- Polypropylene, PP, resin, at plant [RNA]: 0.342 kg; triangle minimum 0.334, mode 0.342, maximum 0.35
  original data - polypropylene granulate, at plant, RER/U from Ecoinvent
- Transport, combination truck, diesel powered [RNA]: 19 t*km; triangle minimum 10, mode 14, maximum 33
  original data - transport, lorry &gt;32t, EURO5/ RER U
- Polyethylene, linear low density, LLDPE, resin, at plant [RNA]: 0.027 kg; triangle minimum 0.0265, mode 0.027, maximum 0.0275
  original data - LDPE granulate, at plant, RER/U from Ecoinvent
- Nylon 6, at plant: 0.034 kg; triangle minimum 0.0335, mode 0.034, maximum 0.0345
- Electricity, low voltage, at grid: 9 kWh; triangle minimum 8, mode 9, maximum 10
- Packaging and information sheets, i2900 desktop scanner [GLO]: 0.296 kg; triangle minimum 0.291, mode 0.296, maximum 0.301
- Aluminum ingot, production mix, at plant [US]: 0.000952 kg; triangle minimum 0.000947, mode 0.000952, maximum 0.000957
  original data - aluminum, production mix at plant RER/U from Ecoinvent
- Cold impact extrusion, aluminium, 1 stroke: 0.952 kg; triangle minimum 0.947, mode 0.952, maximum 0.957
- Steel, low-alloyed, at plant: 6.4 kg; triangle minimum 6.3, mode 6.4, maximum 6.5
- Polycarbonate, at plant: 0.52 kg; triangle minimum 0.51, mode 0.52, maximum 0.53

## Sampling procedure
engineering specifications, variability less than 1% for this model

## Review details
proofReadingDetails="Data was reviewed to ensure in was consistent with the manufacturing process and components, was based on quality sources - primary data from design and manufacturing specifications, and secondary data was from reliable sources (largely from Ecoinvent) and data was properly documented in final report and associated appendices. Initial review was by Roy Wood, followed by an independent internal review by Jay Mathewson."

## Sources
- Wood R (2012) LC GHG Summary Report - Kodak i2900, i3400, i4200, i4600, i5200, i5200v, i5600, i5600v, and i5800 Scanners
