# Natural gas, at processing, shale, kg

Dataset: openLCA process, unit process
Category: 21: Mining, Quarrying, and Oil and Gas Extraction/2111: Oil and Gas Extraction
Geography: United States
Time period: 2016-12-31 to 2017-11-30
Allocation method: no allocation
Generated by: Franklin Associates, A Division of ERG
Owner: Franklin Associates, A Division of ERG
Reviewer: Franklin Associates, A Division of ERG
copyright: false

## General comment
Shale gas processing for fuel use, Data from GREET 2017. Natural gas is extracted from deep underground wells and is frequently co-produced with crude oil. Because of its gaseous nature, natural gas flows quite freely from wells which produce primarily natural gas, but some energy is required to pump natural gas and crude oil mixtures to the surface. An estimated 80 percent of natural gas is extracted onshore and 20 percent is extracted offshore. Atmospheric emissions from natural gas production result primarily from unflared venting, as well as fugitive CO2 emissions. Sulfur was given no coproduct allocation in this process.

## Technology
Unconventinal natural gas processing for fuel use

## Reference product
- Natural gas, at processing, shale, kg: 1 kg

## Inputs from technosphere
- Natural gas, at extraction, composite, kg: 1 kg; provider Natural gas, at extraction, production mixture, to consumer, kg
- Diesel, combusted in industrial equipment [RNA]: 0.000332 l
- Natural gas, combusted in industrial boiler [RNA]: 0.000680109 m3
- Electricity, at grid [RNA]: 38.5 kJ; provider Electricity, at Grid, US, 2010
- Transport, pipeline, natural gas [RNA]: 0.000262 t*mi

## Inputs from nature
- Water [resource, water]: 0.28754 kg

## Emissions to nature
- Particulate matter, ≤ 10μm [emission, air]: 5.89e-6 kg
  Represents PM > 2.5 and <10.
- Particulate matter, ≤ 2.5μm [emission, air]: 5.35e-6 kg
- Sulfur dioxide [emission, air]: 0.00045 kg
- Nitrogen oxides [emission, air]: 0.00013 kg
- Carbon monoxide [emission, air]: 9.692e-5 kg
- Methane [emission, air]: 0.00027 kg
- Nitrogen dioxide [emission, air]: 6.5e-7 kg
- Volatile organic compounds [emission, air]: 0.0002 kg
- Carbon dioxide [emission, air]: 0.1 kg

## Inventory method
Compatible with TRACI

## Modelling constants
For the shale gas processing unit process, inputs include energy sources, electricity and water and outputs include emissions to air. Natural gas is transported primarily by pipeline. Pipeline transportation data were calculated from the total marketed production of natural gas in the U.S. in 2017 (EIA, 2017b) and the annual mileage of natural gas transmission and gathering pipeline in the U.S. (PHMSA, 2018).

## Completeness
TREATMENT OF MISSING ENVIRONMENTAL DATA: Elementary flows are cut-off at less than 1% based on environmental relevance.
TREATMENT OF MISSING TECHNOSPHERE DATA: Intermediate flows are cut-off is at 1% based on environmental relevance.
MASS BALANCE: The mass balance was calculated by a straight comparison of inputs and outputs.

## Data selection
This process contributes to the natural gas processing production mix process based on the extraction method and its percentage share in the US natural gas production mix. The percentages are based on EIA 2014 for each of the extraction type which Franklin Associates summed up to calculate the total percentages for conventional and shale gas extraction in the US natural gas production mix.

## Data treatment
The data module also apportions environmental emissions according to the percent share of conventional and unconventional natural gas.

## Data collection
NETL LCA Unit Process Library, Natural gas extraction processes 2014.

## Sampling procedure
BOUNDARY CONDITIONS: The system boundary includes (1) natural gas extraction (2) energy inputs for the process, and (3) water inputs for the process.
DATA COLLECTION: A weighted average was calculated from the processing data for conventionally and unconventionally extracted natural gas and used to develop the composite produced natural gas process.
UNCERTAINTY ESTIMATION: All data were carefully evaluated before compiling the production-weighted average data sets used to generate results. No uncertainty analysis was carried out due to the lack of uncertainty data or probability distributions for key parameters, which are often only available as single point estimates from the producers.

## Review details
Internal review of data entry proofreading, mass balance verification and data documentation.

## Intended application
"Accounting, with system-external interactions" - The intended application is a purely descriptive accounting / documentation of the analysed system including existing interactions with other systems in the LCI model. These data are an update to a previously published dataset which is a generic unit process data.

## Project
GREET 2017

## Sources
- US EIA (2017b). Natural Gas Annual Data
- ANL (2017) GREET 2017
- PHMSA (2018)
