# Electricity, at eGrid, RFCE, 2008

Dataset: openLCA process, unit process
Category: 22: Utilities/2211: Electric Power Generation, Transmission and Distribution
Geography: Northern America
Time period: 2007-12-31 to 2007-12-31
Allocation method: no allocation
Generated by: Alberta Carpenter
Published in: Chris Goemans, Athena Institute
restrictionsDescription: All information can be accessed by everybody.
copyright: false

## General comment
The methodology used to put together the grid information is outlined in reference 1.

## Technology
Typical

## Geography
Eastern electricity grid to include New Jersey and Delaware and most of Pennsylvania and Maryland (less RFCW)

## Reference product
- Electricity, at grid [RNA]: 1 kWh

## Inputs from technosphere
- Electricity, other gases, unspecified, at power plant: 0.00127609 kWh
  Other Gases BFG - blast furnace gas
- Electricity, solar, unspecified, at power plant: 1.07414e-5 kWh
  Solar (Photovoltaic, Thermal)
- Electricity, other fuels, unspecified, at power plant: 0.000420109 kWh
  Other Fuels OTH – Other (Batteries, Chemicals, Coke Breeze, Hydrogen, Pitch, Sulfur, Tar Coal, and miscellaneous technologies)
- Electricity, other gases, unspecified, at power plant: 3.18697e-6 kWh
  Other Gases PG – Propane
- Electricity, tire derived fuel, at power plant: 0.000298644 kWh
  Solid Renewable Fuels (Biomass) TDF- tires, tire derived fuel
- Electricity, biomass, gas, landfill, at power plant: 0.00361114 kWh
  Gaseous Renewable Fuels (Biomass) LFG - landfill gas
- Electricity, bituminous coal, at power plant [RNA]: 0.00913113 kWh
  Subbituminous Coal
- Electricity, nuclear, at power plant [RNA]: 0.418764 kWh
  Nuclear Fission NUC – Nuclear (Uranium, Plutonium, Thorium)
- Electricity, hydropower, at power plant, unspecified: 0.0127783 kWh
  Hydroelectric WAT – Water (Conventional, Pumped Storage)
- Electricity, biomass, solid, biogenic MSW, at power plant: 0.00650722 kWh
  Solid Renewable Fuels (Biomass) MSB – Municipal Solid Waste – Biogenic Component
- Electricity, biomass, at power plant [RNA]: 0.00102644 kWh
  Solid Renewable Fuels (Biomass) WDS – Wood/Wood Waste Solids (Paper Pellets, Railroad Ties, Utility Poles, Wood Chips, and other wood solids)
- Electricity, biomass,liquid, unspecified, at power plant: 0.00103916 kWh
  Liquid Renewable Fuels (Biomass) BLQ - black liquor
- Electricity, bituminous coal, at power plant [RNA]: 0.342155 kWh
  Bituminous Coal BIT - Anthracite Coal, and Bituminous Coal.
- Electricity, other gases, unspecified, at power plant: 0.00287323 kWh
  Other Gases OG – Other Gas (Butane, Coal Processes, Coke-Oven, Refinery, and other processes)
- Electricity, residual fuel oil, at power plant [RNA]: 0.00245955 kWh
  Petroleum (RFO) – Residual Fuel Oil (includes No. 5 and No. 6 Fuel Oils and Bunker C Fuel Oil)
- Electricity, natural gas, at power plant [RNA]: 0.158382 kWh
  Natural Gas
- Electricity, at wind power plant, unspecified: 0.00254819 kWh
  Wind
- Electricity, MSW, non-biogenic, at power plant: 0.00511282 kWh
  Other Fuels MSN – Municipal Solid Waste – Non-biogenic components
- Electricity, diesel, at power plant [RNA]: 0.00300768 kWh
  Petroleum (DFO) – Distillate Fuel Oil (includes all Diesel and No. 1, No. 2, and No. 4 Fuel Oils)
- Electricity, petroleum coke, at power plant: 0.000785623 kWh
  Petroleum (Other Fossil) PC – Petroleum Coke
- Electricity, biomass, gas, unspecified, at power plant: 7.4482e-6 kWh
  Gaseous Renewable Fuels (Biomass) OBG – Other Biomass Gases (Digester Gas, Methane, and other biomass gases)
- Electricity, biomass,liquid, unspecified, at power plant: 3.33358e-6 kWh
  Liquid Renewable Fuels (Biomass) OBL – Other Biomass Liquid (Ethanol, Fish Oil, Liquid Acetonitrile Waste, Medical Waste, Tall Oil, Waste Alcohol, and other Biomass not specified)
- Electricity, bituminous coal, at power plant [RNA]: 0.0269808 kWh
  Bituminous Coal WC - Waste/Other Coal (Anthracite Culm, Bituminous Gob, Fine Coal, Lignite Waste, Waste Coal) .
- Electricity, diesel, at power plant [RNA]: 0.000549881 kWh
  Petroleum (DFO) KER - kerosene
- Electricity, biomass, liquid, sludge, at power plant: 9.0184e-6 kWh
  Liquid Renewable Fuels (Biomass) SLW - sludge waste
- Electricity, petroleum, waste oil, at power plant: 0.000258709 kWh
  Petroleum (Other Fossil) WO – Waste/Other Oil (including Crude Oil, Liquid Butane, Liquid Propane, Oil Waste, Re-Refined Motor Oil, Sludge Oil, Tar Oil, or other petroleum-based liquid wastes)
- Electricity, bituminous coal, at power plant [RNA]: 7.99845e-7 kWh
  Bituminous Coal SC - Coal Synfuel. Coal-based solid fuel that has been processed by a coal synfuel plant, and coal-based fuels such as briquettes, pellets, or extrusions, which are formed from fresh or recycled coal and binding materials.

## Sampling procedure
based on EIA electricity reports for all power plants in the US.

## Sources
- EIA
- EIA
- EIA
- Chris Goemans, Athena Institute
- US DOE
- International Energy Agency
- Statistics Canada
- EIA
- Statistics Canada
- EIA
- EIA
- US DOE
- EIA
- USEPA
- Statistics Canada
- unspecified
- Statistics Canada
- EIA
- EIA
- EIA
- Statistics Canada
- USEPA
- Statistics Canada
- EIA
