# Wood, particleboard, generated on-site, combusted in industrial boiler

Dataset: openLCA process, unit process
Category: 22: Utilities/2213: Water, Sewage and Other Systems
Geography: Northern America
Time period: 1994-12-31 to 1998-12-31
Allocation method: no allocation
Generated by: Maureen Puettmann
Published in: Franklin Associates
restrictionsDescription: All information can be accessed by everybody.
copyright: false

## General comment
Important note: although most of the data in the US LCI database has
undergone some sort of review, the database as a whole has not yet
undergone a formal validation process.
Please email comments to lci@nrel.gov.

## Technology
This process is a copy of the FAL "Wood into industrial boilers" for which (1) the wood input was changed to fuel wood generated at NE-NC sawmills; (2) wood weight is expressed on oven dry basis; and (3) waste flow is changed to waste treatment input.

## Geography
US

## Reference product
- Wood, particleboard, generated onsite, combusted in industrial boiler [RNA]: 1 kg
  Weight reported on an ovendry basis. Assumes the actual moisture content is 100% ovendry basis. This assumption is very uncertain.

## Inputs from technosphere
- Wood fuel, sanderdust, particleboard mill [RNA]: 0.9259 kg; provider Particleboard, average, softwood, particleboard mill
  Weight reported on an ovendry basis.
- Wood fuel, hogfuel, particleboard mill [RNA]: 0.0741 kg; provider Particleboard, average, softwood, particleboard mill
  Weight reported on an ovendry basis.
- Disposal, solid waste, unspecified, to unspecified treatment: 0.09 kg

## Emissions to nature
- Chromium [emission, air]: 4.6e-8 kg
- Potassium [emission, air]: 0.00078 kg
- Nitrogen oxides [emission, air]: 0.0015 kg
- Chlorine [emission, air]: 7.8e-6 kg
- Iron [emission, air]: 4.4e-6 kg
- Acetaldehyde [emission, air]: 3e-6 kg
- Carbon monoxide [emission, air]: 0.0136 kg
- Naphthalene [emission, air]: 2.4e-6 kg
- Arsenic [emission, air]: 8.8e-8 kg
- Nickel [emission, air]: 5.6e-7 kg
- Zinc [emission, air]: 4.4e-6 kg
- Formaldehyde [emission, air]: 6.6e-6 kg
- Manganese [emission, air]: 9e-6 kg
- Lead [emission, air]: 1.2e-6 kg
- Carbon dioxide [emission, air]: 2.1 kg
- Sodium [emission, air]: 1.8e-5 kg
- Barium [emission, air]: 4.4e-6 kg
- Organic compounds [emission, air]: 0.000166 kg
- Particulate matter, ≤ 10μm [emission, air]: 0.00017 kg
- Phenol [emission, air]: 4e-5 kg
- Sulfur oxides [emission, air]: 7.6e-5 kg
- Benzene [emission, air]: 3.6e-6 kg

## Sources
- Combustion Engineering Inc.
- U.S. DoE
- Maureen Puettmann
- Sassenrath, Charles P
- Argonne National Laboratory
- U.S. EPA
- Franklin Associates
- Kaminski, Paul
