# Electricity, at eGrid, NYUP, 2008

Dataset: openLCA process, unit process
Category: 22: Utilities/2211: Electric Power Generation, Transmission and Distribution
Geography: Northern America
Time period: 2007-12-31 to 2007-12-31
Allocation method: no allocation
Generated by: Alberta Carpenter
Published in: Chris Goemans, Athena Institute
restrictionsDescription: All information can be accessed by everybody.
copyright: false

## General comment
The methodology used to put together the grid information is outlined in reference 1.

## Technology
Typical

## Geography
Upstate NY electricity grid to include most of NY state less Long Island, Westchester County and New York City

## Reference product
- Electricity, at grid [RNA]: 1 kWh

## Inputs from technosphere
- Electricity, MSW, non-biogenic, at power plant: 0.00272089 kWh
  Other Fuels MSN – Municipal Solid Waste – Non-biogenic components
- Electricity, hydropower, at power plant, unspecified: 0.286503 kWh
  Hydroelectric WAT – Water (Conventional, Pumped Storage)
- Electricity, diesel, at power plant [RNA]: 0.000271974 kWh
  Petroleum (DFO) – Distillate Fuel Oil (includes all Diesel and No. 1, No. 2, and No. 4 Fuel Oils)
- Electricity, biomass, gas, landfill, at power plant: 0.00506217 kWh
  Gaseous Renewable Fuels (Biomass) LFG - landfill gas
- Electricity, biomass, solid, biogenic MSW, at power plant: 0.00346294 kWh
  Solid Renewable Fuels (Biomass) MSB – Municipal Solid Waste – Biogenic Component
- Electricity, diesel, at power plant [RNA]: 1.67562e-6 kWh
  Petroleum (DFO) JF - jet fuel
- Electricity, tire derived fuel, at power plant: 0.00179444 kWh
  Solid Renewable Fuels (Biomass) TDF - tires, tire derived fuel
- Electricity, petroleum coke, at power plant: 0.00173446 kWh
  Petroleum (Other Fossil) PC - petroleum coke
- Electricity, diesel, at power plant [RNA]: 2.27376e-5 kWh
  Petroleum (DFO) KER - kerosene
- Electricity, biomass,liquid, unspecified, at power plant: 0.000804049 kWh
  Liquid Renewable Fuels (Biomass) WDL – Wood Waste Liquids (Red Liquor, Sludge Wood, Spent Sulfite Liquor, and other wood based liquids
- Electricity, biomass,liquid, unspecified, at power plant: 0.00113266 kWh
  Liquid Renewable Fuels (Biomass) BLQ - black liquor
- Electricity, biomass, at power plant [RNA]: 0.00416884 kWh
  Solid Renewable Fuels (Biomass) WDS – Wood/Wood Waste Solids (Paper Pellets, Railroad Ties, Utility Poles, Wood Chips, and other wood solids)
- Electricity, residual fuel oil, at power plant [RNA]: 0.00682559 kWh
  Petroleum (RFO) – Residual Fuel Oil (includes No. 5 and No. 6 Fuel Oils and Bunker C Fuel Oil)
- Electricity, nuclear, at power plant [RNA]: 0.284012 kWh
  Nuclear Fission – Nuclear (Uranium, Plutonium, Thorium)
- Electricity, bituminous coal, at power plant [RNA]: 0.138302 kWh
  Bituminous Coal BIT - Anthracite Coal, and Bituminous Coal.
- Electricity, bituminous coal, at power plant [RNA]: 0.0723754 kWh
  Subbituminous Coal
- Electricity, natural gas, at power plant [RNA]: 0.177048 kWh
  Natural Gas
- Electricity, at wind power plant, unspecified: 0.0137565 kWh
  Wind

## Sampling procedure
based on EIA electricity reports for all power plants in the US.

## Sources
- EIA
- EIA
- EIA
- Chris Goemans, Athena Institute
- US DOE
- International Energy Agency
- Statistics Canada
- EIA
- Statistics Canada
- EIA
- EIA
- US DOE
- EIA
- USEPA
- Statistics Canada
- unspecified
- Statistics Canada
- EIA
- EIA
- EIA
- Statistics Canada
- USEPA
- Statistics Canada
- EIA
