# Office scanner

Dataset: openLCA process, unit process
Category: 31-33: Manufacturing/3341: Computer and Peripheral Equipment Manufacturing
Geography: Global
Time period: 2009-12-31 to 2100-12-30
Allocation method: no allocation
Generated by: Roy Wood
Published in: Wood R (2012) LC GHG Summary Report Kodak i2800, i2600, i2400 Scanners
restrictionsDescription: All information can be accessed by everybody.
copyright: false

## Technology
Best available technology

## Geography
North America

## Time period
2010 and after

## Reference product
- Office scanner [GLO]: 8.703 kg

## Inputs from technosphere
- Textile, woven cotton, at plant: 0.0032 kg; triangle minimum 0.00315, mode 0.0032, maximum 0.00325
- Tap water, at user: 23 kg; triangle minimum 21, mode 23, maximum 25
- Silver, at regional storage: 0.00242 kg; triangle minimum 0.00241, mode 0.00242, maximum 0.00243
- Copper, primary, at refinery: 0.0285 kg; triangle minimum 0.028, mode 0.0285, maximum 0.029
- Melamine urea formaldehyde, MF, resin, at plant [RNA]: 0.002 kg; triangle minimum 0.00195, mode 0.002, maximum 0.00205
- Acrylonitrile-butadiene-styrene, ABS, copolymer resin, at plant [RNA]: 2.088 kg; triangle minimum 2.087, mode 2.088, maximum 2.089
- Polybutadiene, butadiene rubber, BR, at plant [RNA]: 0.031 kg; triangle minimum 0.0305, mode 0.031, maximum 0.0315
- Light emitting diode, LED, at plant: 0.004 kg; triangle minimum 0.00395, mode 0.004, maximum 0.00405
- Electricity, at grid [RNA]: 4.1 kWh; triangle minimum 3.7, mode 4.1, maximum 4.5; provider Electricity, at Grid, US, 2010
- Cold rolled sheet, steel, at plant: 2.111 kg; triangle minimum 2.11, mode 2.111, maximum 2.112
- Polycarbonate, at plant: 0.549 kg; triangle minimum 0.5485, mode 0.549, maximum 0.5495
- Carbon black, at plant: 0.072 kg; triangle minimum 0.0715, mode 0.072, maximum 0.0725
- Polymethyl methacrylate, beads, at plant: 0.006 kg; triangle minimum 0.0058, mode 0.006, maximum 0.0062
- Cable, connector for computer, without plugs, at plant: 0.703 kg; triangle minimum 0.7025, mode 0.703, maximum 0.7035
  dataset available through ecoinvent.
- Polyethylene low density granulate (PE-LD), production mix, at plant: 0.0043 kg; triangle minimum 0.0042, mode 0.0043, maximum 0.0044
- Copper product manufacturing, average metal working: 0.0285 kg; triangle minimum 0.0283, mode 0.0285, maximum 0.0287
- Transport, combination truck, long-haul, diesel powered [RNA]: 8.4 t*km; triangle minimum 4.2, mode 6.7, maximum 14.3
- Nylon 6, at plant: 0.073 kg; triangle minimum 0.0725, mode 0.073, maximum 0.0735
- Silicon, multi-Si, casted, at plant: 0.0076 kg; triangle minimum 0.00755, mode 0.0076, maximum 0.00765
- Scanner, packaging and information sheets [GLO]: 1.88 kg; triangle minimum 1.87, mode 1.88, maximum 1.89
- Steel product manufacturing, average metal working: 2.111 kg; triangle minimum 2.1105, mode 2.1075, maximum 2.115
- LCD module, at plant: 0.0121 kg; triangle minimum 0.01205, mode 0.0121, maximum 0.01215
- Power adapter, for laptop, at plant: 0.228 kg; triangle minimum 0.2275, mode 0.228, maximum 0.2285
  dataset available through ecoinvent.
- Polystyrene, high impact, HIPS, resin, at plant [RNA]: 0.0015 kg; triangle minimum 0.00146, mode 0.0015, maximum 0.00154
- Printed wiring board, power supply unit desktop PC, Pb free, at plant: 0.139 kg; triangle minimum 0.1385, mode 0.139, maximum 0.1395
- Flat glass, coated, at plant: 0.107 kg; triangle minimum 0.1065, mode 0.107, maximum 0.1075
- Flat glass, uncoated, at plant: 0.087 kg; triangle minimum 0.0865, mode 0.087, maximum 0.0875
- LCD glass, at plant: 0.017 kg; triangle minimum 0.0165, mode 0.017, maximum 0.0175
- Injection moulding: 2.9 kg; triangle minimum 2.895, mode 2.9, maximum 2.905
- Glass fibre, at plant: 0.138 kg; triangle minimum 0.1375, mode 0.138, maximum 0.1385
- Paper, woodcontaining, LWC, at plant: 0.035 kg; triangle minimum 0.034, mode 0.035, maximum 0.036

## Sources
- Wood R (2012) LC GHG Summary Report Kodak i2800, i2600, i2400 Scanners
