# Corn grain, harvested and stored

Dataset: openLCA process, unit process
Category: 11: Agriculture, Forestry, Fishing and Hunting/1151: Support Activities for Crop Production
Geography: Northern America
Time period: 2009-12-31 to 2099-12-31
Allocation method: no allocation
Generated by: Daniel Inman
Published in: Hsu, D.
restrictionsDescription: All information can be accessed by everybody.
copyright: false

## Technology
modern

## Geography
North America

## Time period
2010

## Reference product
- Corn grain, harvested and stored [RNA]: 8790 kg

## Inputs from technosphere
- Transport, tractor and trailer: 16.4 t*km
  Shipping by wagon. Yu 2008
- Transport, single unit truck, diesel powered [RNA]: 14.9 t*km
  Shipping by single or tandem axle truck. Yu 2008
- Dried roughage store, non ventilated: 1.2035e-6 m3
  Scaled from corn stover.
- Corn, decomposition [RNA]: 506 kg; provider Corn, decomposition, 15.5% moisture
- Fodder loading, by self-loading trailer: 28.317 m3
  Scale value used with corn stover
- Conveyor belt, at plant: 3.4747e-5 m
- Transport, combination truck, diesel powered [RNA]: 233 t*km
  Shipping by semi. Yu 2008
- Corn, production [RNA]: 9290 kg; provider Corn, production, average, US, 2022
  Mean grain yield of corn in the US, kg per ha. NASS 2007. Accounting for both rain fed and irrigated. The estimated genetic yield potential of corn is 25Mgha (Tollenaar, 1983; Tollenaar and Lee 2002; Johnson et al., 2006)

## Sources
- T.H. Yu
- J. Johnson
- M. Tollenaar
- M. Tollenaar
- Hsu, D.
