# Electricity, at Grid, US, 2010

Dataset: openLCA process, unit process
Category: 22: Utilities/2211: Electric Power Generation, Transmission and Distribution
Geography: Northern America
Time period: 2009-12-31 to 2009-12-31
Allocation method: no allocation
Generated by: Samantha Wascavage
Published in: Chris Goemans, Athena Institute
restrictionsDescription: All information can be accessed by everybody.
copyright: false

## General comment
The methodology used to put together the grid information is outlined in reference 1.

## Technology
Typical

## Geography
US

## Reference product
- Electricity, at grid [RNA]: 1 kWh

## Inputs from technosphere
- Electricity, natural gas, at power plant [RNA]: 0.244591 kWh
  NG – Natural Gas
- Electricity, biomass, gas, landfill, at power plant: 0.001802 kWh
  LFG, OBG – Landfill Gas
- Electricity, other fuels, unspecified, at power plant: 0.002784 kWh
  OTH, MSN, PUR, WH – Other (Batteries, Chemicals, Coke Breeze, Hydrogen, Pitch, Sulfur, Tar Coal, and miscellaneous technologies)
- Electricity, hydropower, at power plant, unspecified: 0.063383 kWh
  WAT – Water (Conventional, Pumped Storage)
- Electricity, petroleum coke, at power plant: 0.007414 kWh
  PC, SG, WO – Petroleum Coke
- Electricity, biomass,liquid, unspecified, at power plant: 0.004257 kWh
  BLQ, OBL, SLW, WDL – Black Liquor
- Electricity, residual fuel oil, at power plant [RNA]: 0.003532 kWh
  RFO – Residual Fuel Oil (includes No. 5 and No. 6 Fuel Oils and Bunker C Fuel Oil)
- Electricity, geothermal, unspecified: 0.003677 kWh
  GEO – Geothermal
- Electricity, biomass, solid, agriculture by-products, at power plant: 0.007143 kWh
  AB, MSB, MSW, OBS, TDF, WDS – Agriculture Crop By-products / Straw / Energy Crops
- Electricity, other gases, unspecified, at power plant: 0.002789 kWh
  OG, BFG, PG – Other Gas (Butane, Coal Processes, Coke-Oven, Refinery, and other processes)
- Electricity, lignite coal, at power plant [RNA]: 0.019001 kWh
  LIG – Lignite Coal
- Electricity, solar, unspecified, at power plant: 0.000215 kWh
  SUN – Solar (Photovoltaic, Thermal)
- Electricity, bituminous coal, at power plant [RNA]: 0.184163 kWh
  SUB – Subbituminous Coal
- Electricity, at wind power plant, unspecified: 0.017323 kWh
  WND – Wind
- Electricity, bituminous coal, at power plant [RNA]: 0.227292 kWh
  BIT, SC, SGC, WC - Anthracite Coal, and Bituminous Coal.
- Electricity, diesel, at power plant [RNA]: 0.012448 kWh
  DFO, JF, KER – Distillate Fuel Oil (includes all Diesel and No. 1, No. 2, and No. 4 Fuel Oils)
- Electricity, nuclear, at power plant [RNA]: 0.198186 kWh
  NUC – Nuclear (Uranium, Plutonium, Thorium)

## Sampling procedure
based on EIA electricity reports for all power plants in the US.

## Sources
- NERC
- EIA
- EIA
- Statistics Canada
- Statistics Canada
- Chris Goemans, Athena Institute
- EIA
- USEPA
- EIA
- Statistics Canada
- EIA
- Statistics Canada
- EIA
- EIA
- USEPA
- EIA
- EIA
- Statistics Canada
- US DOE
- International Energy Agency
- EIA
