# Natural gas, at processing, conventional, kg

Dataset: openLCA process, unit process
Category: 21: Mining, Quarrying, and Oil and Gas Extraction/2111: Oil and Gas Extraction
Geography: United States
Time period: 2016-12-31 to 2017-11-30
Allocation method: no allocation
Data quality: US EPA - Process Pedigree Matrix (4;1)
Generated by: Franklin Associates, A Division of ERG
Owner: Franklin Associates, A Division of ERG
Reviewer: Franklin Associates, A Division of ERG
restrictionsDescription: These U.S. LCI Database Project data ("Data") are provided by the National Renewable Energy Laboratory ("NREL"), operated by the Alliance for Sustainable Energy, LLC ("Alliance") for the US Department of Energy ("DOE") under Contract No. DE-AC36-08GO28308. The United States Government (the "Government") retains and the user acknowledges that the Government retains a non-exclusive, paid-up, irrevocable, worldwide license to publish or reproduce the published form of these data, or allow others to do so, for Government purposes.
Access to and use of these Data shall impose the following obligations on the user, as set forth in this Agreement. The user is granted the right, without any fee or cost, to use, copy, modify, alter, enhance and distribute these Data for any purpose whatsoever, provided that this entire notice appears in all copies of the Data. Any modification, alteration or enhancement of these data shall be identified and documented by the user. Further, the user agrees to credit the DOE/NREL/Alliance in any publication that results from the use of these Data. The names DOE/NREL/Alliance, however, may not be used in any advertising or publicity to endorse or promote any products or commercial entities unless specific written permission is obtained from DOE/NREL/Alliance. The user also understands that DOE/NREL/Alliance is not obligated to provide the user with any support, consulting, training or assistance of any kind with regard to the use of these Data or to provide the user with any updates, revisions or new versions of these Data.
YOU AGREE TO INDEMNIFY THE GOVERNMENT AND DOE/NREL/ALLIANCE, AND ITS SUBSIDIARIES, AFFILIATES, OFFICERS, AGENTS, AND EMPLOYEES AGAINST ANY CLAIM OR DEMAND, INCLUDING REASONABLE ATTORNEYS' FEES, RELATED TO YOUR USE OF THESE DATA. THESE DATA ARE PROVIDED BY DOE/NREL/ALLIANCE "AS IS" AND ANY EXPRESS OR IMPLIED WARRANTIES, INCLUDING BUT NOT LIMITED TO, THE IMPLIED WARRANTIES OF MERCHANTABILITY AND FITNESS FOR A PARTICULAR PURPOSE ARE DISCLAIMED. IN NO EVENT SHALL THE GOVERNMENT OR DOE/NREL/ALLIANCE BE LIABLE FOR ANY SPECIAL, INDIRECT OR CONSEQUENTIAL DAMAGES OR ANY DAMAGES WHATSOEVER, INCLUDING BUT NOT LIMITED TO CLAIMS ASSOCIATED WITH THE LOSS OF DATA OR PROFITS, WHICH MAY RESULT FROM AN ACTION IN CONTRACT, NEGLIGENCE OR OTHER TORTIOUS CLAIM THAT ARISES OUT OF OR IN CONNECTION WITH THE ACCESS, USE OR PERFORMANCE OF THESE DATA.
copyright: false

## General comment
Conventional natural gas processing for fuel use, Data from GREET 2017. Once raw natural gas is extracted, it is processed to yield a marketable product. First, the heavier hydrocarbons such as ethane, butane and propane are removed and marketed as liquefied petroleum gas (LPG). Then the water vapor, carbon dioxide, and nitrogen are removed to increase the quality and heating value of the natural gas. If the natural gas has a high hydrogen sulfide content, it is considered “sour.” Before it is used, hydrogen sulfide is removed by adsorption in an amine solution—a process known as “sweetening.” Atmospheric emissions result from the flaring of hydrogen sulfide (H2S), the regeneration of glycol solutions, and fugitive emissions of methane. Glycol solutions are used to dehydrate natural gas, and the regeneration of these solutions result in the release of BTEX (benzene, toluene, ethylbenzene, and xylene) as well as a variety of less toxic organics. Methane emissions result from fugitive releases as well as venting. Negligible particulate emissions are produced from natural gas plants, and the relatively low processing temperatures (<1,200 degrees Fahrenheit) prevent the formation of nitrogen oxides (NOx). Energy data for natural gas processing were calculated from fuel consumption data for the natural gas liquids extraction industry. Processed natural gas is transported primarily by pipeline, but a small percentage is compressed and transported by insulated railcars and tankers. Transportation data were calculated from the net annual quantities of natural gas imported and exported by each state. The data for this process are based on publicly available sources and represent production technologies used in the United States.

## Technology
Conventional natural gas processing. Represents natural gas sweetening processes. Sulfur was given no coproduct allocation in this process. The amount of H2S in the sour natural gas varies widely depending on where it is extracted.

## Geography
United States

## Time period
GREET 2017

## Reference product
- Natural gas, at processing, conventional, kg: 1 kg

## Inputs from technosphere
- Natural gas, combusted in industrial boiler [RNA]: 0.000680109 m3
- Natural gas, at extraction, composite, kg: 1 kg; provider Natural gas, at extraction, production mixture, to consumer, kg
- Electricity, at grid [RNA]: 38.48 kJ; provider Electricity, at Grid, US, 2010
- Diesel, combusted in industrial equipment [RNA]: 0.000332 l
- Transport, pipeline, natural gas [RNA]: 0.000262 t*mi

## Inputs from nature
- Water [resource, water]: 0.28754 kg

## Emissions to nature
- Particulate matter, ≤ 2.5μm [emission, air]: 4.85e-6 kg
- Nitrogen dioxide [emission, air]: 5.1e-7 kg
- Volatile organic compounds [emission, air]: 0.0002 kg
- Carbon monoxide [emission, air]: 9.342e-5 kg
- Methane [emission, air]: 0.00027 kg
- Carbon dioxide [emission, air]: 0.09468 kg
- Sulfur dioxide [emission, air]: 0.00045 kg
- Nitrogen oxides [emission, air]: 0.00012 kg
- Particulate matter, ≤ 10μm [emission, air]: 5.39e-6 kg
  Represents PM > 2.5 and <10.

## Inventory method
Compatible with TRACI

## Modelling constants
For the conventional natural gas processing unit process, the inputs include energy and water and outputs include emissions to air. Natural gas is transported primarily by pipeline. Pipeline transportation data were calculated from the total marketed production of natural gas in the U.S. in 2017 (EIA, 2017b) and the annual mileage of natural gas transmission and gathering pipeline in the U.S. (PHMSA, 2018).

## Completeness
TREATMENT OF MISSING ENVIRONMENTAL DATA: Elementary flows are cut-off at less than 1% based on environmental relevance.
TREATMENT OF MISSING TECHNOSPHERE DATA: Intermediate flows are cut-off is at 1% based on environmental relevance.
MASS BALANCE: The mass balance was calculated by a straight comparison of inputs and outputs

## Data selection
This process contributes to the natural gas processing production mix process based on the extraction method and its percentage share in the US natural gas production mix. The percentages are based on EIA 2014 for each of the extraction type which Franklin Associates summed up to calculate the total percentages for conventional and shale gas extraction in the US natural gas production mix.

## Data treatment
The data module also apportions environmental emissions according to the percent share of conventional and unconventional natural gas.

## Sampling procedure
BOUNDARY CONDITIONS: The system boundary includes (1) natural gas extraction (2) energy inputs for the process, and (3) water inputs for the process.
DATA COLLECTION: A weighted average was calculated from the processing data for conventionally and unconventionally extracted natural gas and used to develop the composite produced natural gas process.
UNCERTAINTY ESTIMATION: All data were carefully evaluated before compiling the production-weighted average data sets used to generate results. No uncertainty analysis was carried out due to the lack of uncertainty data or probability distributions for key parameters, which are often only available as single point estimates from the producers.

## Review details
Internal review of data entry proofreading, mass balance verification and data documentation.

## Intended application
"Accounting, with system-external interactions" - The intended application is a purely descriptive accounting / documentation of the analysed system including existing interactions with other systems in the LCI model. These data are an update to a previously published dataset which is a generic unit process data.

## Sources
- US EIA (2017b). Natural Gas Annual Data
- ANL (2017) GREET 2017
- PHMSA (2018)
