# Ethanol, denatured, corn dry mill

Dataset: openLCA process, unit process
Category: 31-33: Manufacturing/3251: Basic Chemical Manufacturing
Geography: Northern America
Time period: 2007-12-31 to 2099-12-31
Allocation method: no allocation
Generated by: Daniel Inman
Published in: Hsu, D.
restrictionsDescription: All information can be accessed by everybody.
copyright: false

## Technology
modern

## Geography
North America

## Time period
2008

## Reference product
- Ethanol, denatured, corn dry mill [RNA]: 14900 kg

## By-products
- Distillers dried grains with solubles [RNA]: 15000 kg

## Inputs from technosphere
- Soy meal, at plant [RNA]: 4550 kg; provider Soybean oil, crude, degummed, at plant
  no CO2 sequestration. Proxy: Soybean meal, at oil mill/US U
- Disposal, inert waste, 5% water, to inert material landfill: 138 kg
  tramp metal and rocks
- Heat, at cogen with ignition biogas engine, allocation exergy: 12457 MJ
  Integrated Biogas Energy System. From Mueller (2007).
- Electricity, at grid [RNA]: 39.7 kWh; provider Electricity, at Grid, US, 2010
  Integrated Biogas Energy System. From Mueller (2007).
- Corn grain, harvested and stored [RNA]: 14200 kg
  no CO2 sequestration
- Enzyme, Alpha-amylase, Novozyme Liquozyme [RER]: 32 kg
- Sulphuric acid, liquid, at plant: 92 kg
- Treatment,maize starch production effluent,to wastewater treatment,class2: 0.1 m3
  wastewater treatment
- Corn wet milling, operations, AP-42 [RNA]: 14.89 kg
- Natural gas, combusted in industrial boiler [RNA]: 219 m3
  Integrated Biogas Energy System. Natural gas makes up balance of energy. From Mueller (2007). Multiplied by efficiency of 0.9 used in Ecoinvent.
- Yeast paste, from whey, at fermentation: 60 kg
  Assumed for yeast
- Corn grain, at conversion plant [RNA]: 46.4 kg; provider Corn grain, at conversion plant, 2022
- Gasoline, at refinery: 266 l; provider Petroleum refining, at refinery
  About a 0.6% impurity content in product stream (water, CO2, alcohols)
- Energy, output: 299000 MJ
  from DDGS
- Ethanol fermentation plant: 7.19e-6 Item(s)
  plant lifetime is 20 years. only need 1 hr. 90000 Mtons of ethanol is about 31 Mgal/yr in the econinvent process. Assume equipment scales by a power law.
- Wood waste, unspecified, combusted in industrial boiler [RNA]: 860 kg
  Biomass CHP. From Mueller (2007). Multiplied by efficiency of 0.85 used in Ecoinvent.
- Enzyme, Glucoamylase, Novozyme Spirizyme [RER]: 47 kg
- Nitrogen fertilizer, production mix, at plant [RNA]: 173 kg
  Proxy: Urea, as N, at regional storehouse/RER with US electricity U
- Sodium hydroxide, production mix, at plant [US]: 231 kg; provider Chlorine, production mix, at plant
  Assumed for used caustic from CIP. proxy: sodium hydroxide, 50% in H2O, production mix, at plant
- Quicklime, at plant [RNA]: 55 kg
  proxy: lime, hydrated, packed, at plant
- Corn wet mill, gluten drying, AP-42 [RNA]: 7.36 kg
  Assumed emissions for DDGS dryer. calculated based on regression fit from several Aspen runs.
- Lignite coal, combusted in industrial boiler [RNA]: 416 kg
  Coal CHP. From Mueller (2007). Multiplied by efficiency of 0.8 used in Ecoinvent.

## Inputs from nature
- Water [resource, water, subterranean]: 19600 kg
  process/makeup water. calculated based on regression fit from several Aspen runs.
- Water [resource, water, subterranean]: 1830 kg
  steam losses. calculated based on regression fit from several Aspen runs.
- Water [resource, water, subterranean]: 62300 kg
  cooling tower water losses. calculated based on regression fit from several Aspen runs.

## Emissions to nature
- Water [emission, air]: 62300 kg
  cooling tower water lost to air. calculated based on regression fit from several Aspen runs.
- Ethanol [emission, air]: 0.534 kg
  calculated based on regression fit from several Aspen runs.
- Methane [emission, air]: -50.6 kg
  Reduced CH4 emissions from animals because of use of DDGS feed
- Carbon dioxide [emission, air]: 22000 kg
  calculated by difference for biogenic carbon. contribution from DDGS = CO2 in corn - CO2 out in conversion plan - CO2 in fuel

## Allocation factors
- causal, Ethanol, denatured, corn dry mill, for Sulphuric acid, liquid, at plant: 1
- causal, Distillers dried grains with solubles, for Corn grain, harvested and stored: 0
- causal, Ethanol, denatured, corn dry mill, for Gasoline, at refinery: 1
- causal, Distillers dried grains with solubles, for Treatment,maize starch production effluent,to wastewater treatment,class2: 0
- causal, Ethanol, denatured, corn dry mill, for Water: 1
- causal, Distillers dried grains with solubles, for Carbon dioxide: 0
- causal, Distillers dried grains with solubles, for Enzyme, Glucoamylase, Novozyme Spirizyme: 0
- causal, Distillers dried grains with solubles, for Disposal, inert waste, 5% water, to inert material landfill: 0
- causal, Ethanol, denatured, corn dry mill, for Corn grain, at conversion plant: 1
- causal, Distillers dried grains with solubles, for Gasoline, at refinery: 0
- economic, Ethanol, denatured, corn dry mill: 1
- causal, Distillers dried grains with solubles, for Corn wet milling, operations, AP-42: 0
- causal, Distillers dried grains with solubles, for Water: 0
- causal, Ethanol, denatured, corn dry mill, for Water: 0
- causal, Ethanol, denatured, corn dry mill, for Nitrogen fertilizer, production mix, at plant: 1
- causal, Distillers dried grains with solubles, for Corn grain, at conversion plant: 0
- causal, Ethanol, denatured, corn dry mill, for Ethanol fermentation plant: 1
- causal, Ethanol, denatured, corn dry mill, for Heat, at cogen with ignition biogas engine, allocation exergy: 1
- causal, Ethanol, denatured, corn dry mill, for Corn grain, harvested and stored: 1
- causal, Distillers dried grains with solubles, for Ethanol fermentation plant: 0
- causal, Ethanol, denatured, corn dry mill, for Soy meal, at plant: 1
- causal, Ethanol, denatured, corn dry mill, for Enzyme, Glucoamylase, Novozyme Spirizyme: 1
- causal, Distillers dried grains with solubles, for Energy, output: 0
- causal, Ethanol, denatured, corn dry mill, for Electricity, at grid: 1
- causal, Distillers dried grains with solubles, for Ethanol: 0
- causal, Distillers dried grains with solubles, for Wood waste, unspecified, combusted in industrial boiler: 0
- causal, Ethanol, denatured, corn dry mill, for Lignite coal, combusted in industrial boiler: 1
- physical, Ethanol, denatured, corn dry mill: 1
- physical, Distillers dried grains with solubles: 0
- economic, Distillers dried grains with solubles: 0
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
## Sources
- Andrew McAloon
- Hsu, D.
