# Sawn lumber, hardwood, rough, kiln dried, at kiln, NE-NC

Dataset: openLCA process, unit process
Category: 31-33: Manufacturing/3211: Sawmills and Wood Preservation
Geography: United States
Time period: 2004-12-31 to 2005-12-31
Allocation method: no allocation
Generated by: Maureen Puetmann
Published in: Richard D. Bergman
restrictionsDescription: All information can be accessed by everybody.
copyright: false

## General comment
Important note: although most of the data in the US LCI database has
undergone some sort of review, the database as a whole has not yet
undergone a formal validation process.
Please email comments to lci@nrel.gov.

## Technology
Average technology.

## Geography
NE/NC = Northeast (NE) and Northcentral (NC) United States. The 20 states are Connecticut, Delaware, Illinois, Indiana, Iowa, Maine, Maryland, Massachusetts, Michigan, Minnesota, Missouri, New Hampshire, New Jersey, New York, Ohio, Pennsylvania, Rhode Island, Vermont, West Virginia, Wisconsin.

## Reference product
- Sawn lumber; hardwood; rough; kiln dried; at kiln [US]: 1 m3
  Moisture content (ovendry basis) =9.6%

## Inputs from technosphere
- Sawn lumber; hardwood; rough; green; at sawmill [US]: 572 kg; provider Sawn lumber, hardwood, rough, green, at sawmill, NE-NC
  Weight reported on an ovendry basis. Moisture content (ovendry basis) = 87%
- Electricity, at grid [RNA]: 32.1 kWh; provider Electricity, Eastern US, 2014
  Represents 25% of total mill consumption of grid electricity.
- Heat; onsite boiler; hardwood mill; average [US]: 3920 MJ; provider Heat, onsite boiler, hardwood mill average, NE-NC
  Includes energy used for plant heating, walnut steaming and cogeneration.
- Natural gas, combusted in industrial equipment, 1.357 m3/kg, 52.13 MJ/kg [RNA]: 0.0405 l; provider Natural gas, combusted in industrial equipment
  Proxy for propane. Propane used for on-site transportation. Represents 20% of mill use of propane for transport.
- Diesel, combusted in industrial equipment [RNA]: 1 l
  Diesel used for on-site transportation. Represents 20% of mill use of diesel for transport.
- Electricity; onsite boiler; hardwood mill; average [US]: 0.551 kWh; provider Heat, onsite boiler, hardwood mill average, NE-NC
  Represents 25% of total mill consumption of electricity generated onsite.
- Gasoline, combusted in equipment [RNA]: 0.087 l
  Gasoline used for on-site transportation. Represents 20% of mill use of gasoline for transport.

## Emissions to nature
- Volatile organic compounds [emission, air, troposphere, rural]: 1.37 kg
  Based on six major hardwood species found in eastern US (red oak, black cherry, ash, yellow poplar, hard maple, and black walnut).

## Sampling procedure
Questionnaires from 20 mills (17 companies) from the 20 states of Forest Service (FS) Northeastern (NE) Region. Hardwood sawmills were members of the Hardwood Manufacturer Association (HMA).

## Sources
- Forest Products Laboratory
- Richard D. Bergman
- Forest Products Laboratory
- Maureen Puettmann
- unspecified
- unspecified
- NHLA
