# Fuels, burned at coated freesheet, average production, at mill

Dataset: openLCA process, unit process
Category: 31-33: Manufacturing/3221: Pulp, Paper, and Paperboard Mills
Geography: Northern America
Time period: 2005-12-31 to 2005-12-31
Allocation method: no allocation
Generated by: Caroline Gaudreault
Reviewer: Martha Stevenson
Published in: AF&PA
restrictionsDescription: All information can be accessed by everybody.
copyright: false

## General comment
Coated Freesheet, average North American production, at mill. All flows are production-weighted means. Data were developed for a full LCA that was critically reviewed. Reviewers were: • Martha Stevenson, Chairperson – Private Consultant to the public interest with ten years of experience in sustainability, environmental management, packaging and materials recovery; led the development of the Design Guidelines for Sustainable Packaging and the COMPASS software used to compare the environmental impacts of package designs; • Pascal Lesage – Life cycle assessment consultant, Researcher at École Polytechnique de Montréal [at the Inter-University Research Centre for the Life Cycle of Products, Processes and Services (CIRAIG) in Montreal]; and • Dale Phenicie, Environmental Affairs Consulting – Consultant with 35 years of experience in environmental protection and process consulting for the forest products industry. Has served on several U.S. EPA Task Forces dealing with water quality issues and authored several AF&PA Environmental, Health and Safety/Sustainability reports.

## Technology
current technology mix for coated freesheet

## Time period
Primary data collected from participating companies and associations for their operational activities are representative for 2006 and 2007.

## Reference product
- Fuels, burned at coated freesheet, average production, at mill [RNA]: 15145 MJ

## Inputs from technosphere
- Natural gas, combusted in industrial boiler, at pulp and paper mill (EXCL.) [RNA]: 60.48 m3
- LPG, combusted in industrial boiler, at pulp and paper mill (EXCL.) [RNA]: 0.34796 l
- Hog fuel, pur., combusted in industrial boiler, at pulp and paper mill (EXCL.) [RNA]: 139.39 kg
  Purchased hogged fuel. Typically from wood products manufacturing.
- Gasoline, combusted in equipment, at pulp and paper mill (EXCL.) [RNA]: 0.018174 l
  Gasoline and kerosene, assumed to be gasoline.
- RFO, combusted in industrial boiler, at pulp and paper mill (EXCL.) [RNA]: 39.531 l
  All combusted on site. Actually received at supplier, not refinery.
- Diesel, combusted in industrial boiler, at pulp and paper mill (EXCL.) [RNA]: 0.99561 l
  Proxy for light fuel oil.
- Hog fuel, self-gen., combusted in ind. boiler, at pulp and paper mill (EXCL.) [RNA]: 120.96 kg
  Combustion of self-generated hogged fuel from pulpwood. Wood inputs are accounted for in the process named Coated freesheet, average production, at mill
- TDF, combusted in industrial boiler, at pulp and paper mill (EXCL.) [RNA]: 5.3691 kg
  All combusted. Not present in any database.
- Bituminous coal, combusted in industrial boiler, at pulp and paper mill (EXCL.) [RNA]: 185.44 kg
- Diesel, combusted in industrial boiler, at pulp and paper mill (EXCL.) [RNA]: 0.087824 l
  Other fossil fuels assumed to be diesel.

## Emissions to nature
- Acetaldehyde [emission, air]: 0.00537 kg
  From black liquor recovery, non-recyclable paper combustion and wastewater residuals combustion
- Benzo[ghi]perylene [emission, air]: 1.2389e-6 kg
  (same comment as for Acetaldehyde)
- Phenol [emission, air]: 0.004573 kg
  (same comment as for Acetaldehyde)
- Methane [emission, air]: 0.023177 kg
  (same comment as for Acetaldehyde)
- Barium [emission, air]: 0.00020611 kg
  (same comment as for Acetaldehyde)
- Chloroform [emission, air]: 1.072e-5 kg
  (same comment as for Acetaldehyde)
- Cadmium [emission, air]: 2.9461e-5 kg
  (same comment as for Acetaldehyde)
- Methylene chloride [emission, air]: 8.4253e-5 kg
  (same comment as for Acetaldehyde)
- Carbon disulfide [emission, air]: 0.00020961 kg
  (same comment as for Acetaldehyde)
- Benzene [emission, air]: 0.00028908 kg
  (same comment as for Acetaldehyde)
- Trichloroethylene [emission, air]: 9.5933e-6 kg
  (same comment as for Acetaldehyde)
- Formaldehyde [emission, air]: 0.0025055 kg
  (same comment as for Acetaldehyde)
- Chromium [emission, air]: 1.5332e-5 kg
  (same comment as for Acetaldehyde)
- Mercury [emission, air]: 1.1016e-6 kg
  (same comment as for Acetaldehyde)
- Arsenic [emission, air]: 1.1294e-6 kg
  (same comment as for Acetaldehyde)
- Methyl isobutyl ketone [emission, air]: 0.00016754 kg
  (same comment as for Acetaldehyde)
- Styrene [emission, air]: 8.5146e-5 kg
  (same comment as for Acetaldehyde)
- Cresol [emission, air]: 0.0013558 kg
  (same comment as for Acetaldehyde)
- Sulfur dioxide [emission, air]: 6.9726 kg
  From all combustion processes at pulp and paper mill.
- Carbon dioxide [emission, air]: 818.28 kg
  (same comment as for Acetaldehyde)
- Antimony [emission, air]: 3.1887e-5 kg
  (same comment as for Acetaldehyde)
- Biphenyl [emission, air]: 5.747e-5 kg
  (same comment as for Acetaldehyde)
- Polycyclic organic matter [emission, air]: 0.00010244 kg
  (same comment as for Acetaldehyde)
- Beryllium [emission, air]: 0.00055629 kg
  (same comment as for Acetaldehyde)
- Sulfuric acid [emission, air]: 0.0093031 kg
  (same comment as for Acetaldehyde)
- Vanadium [emission, air]: 5.6405e-7 kg
  (same comment as for Acetaldehyde)
- Aldehydes, C3 [emission, air]: 0.0020715 kg
  (same comment as for Acetaldehyde)
- Methanol [emission, air]: 0.048917 kg
  (same comment as for Acetaldehyde)
- Chloromethane [emission, air]: 0.008161 kg
  (same comment as for Acetaldehyde)
- Zinc [emission, air]: 5.1399e-5 kg
  (same comment as for Acetaldehyde)
- Cumene [emission, air]: 0.00029919 kg
  (same comment as for Acetaldehyde)
- Tetrachloroethylene [emission, air]: 1.7622e-6 kg
  (same comment as for Acetaldehyde)
- 1,1,2-Trichloroethane [emission, air]: 1.3684e-5 kg
  (same comment as for Acetaldehyde)
- Hydrofluoric acid [emission, air]: 0.00041277 kg
  (same comment as for Acetaldehyde)
- Hexane [emission, air]: 0.00017537 kg
  (same comment as for Acetaldehyde)
- 1,2,4-Trichlorobenzene [emission, air]: 5.2153e-5 kg
  (same comment as for Acetaldehyde)
- Copper [emission, air]: 1.8534e-5 kg
  (same comment as for Acetaldehyde)
- Carbon tetrachloride [emission, air]: 1.6458e-5 kg
  (same comment as for Acetaldehyde)
- Hydrogen sulfide [emission, air]: 0.067546 kg
  Total reduced sulfur assumed to be hydrogen sulfide. From all combustion processes at pulp and paper mill.
- Toluene [emission, air]: 0.0002337 kg
  (same comment as for Acetaldehyde)
- Lead [emission, air]: 4.7483e-6 kg
  (same comment as for Acetaldehyde)
- Nickel [emission, air]: 8.8687e-6 kg
  (same comment as for Acetaldehyde)
- Acrolein [emission, air]: 0.00011814 kg
  (same comment as for Acetaldehyde)
- 2,3,7,8-Tetrachlorodibenzo-p-dioxin [emission, air]: 1.4921e-13 kg
  (same comment as for Acetaldehyde)
- Selenium [emission, air]: 0.00062871 kg
  (same comment as for Acetaldehyde)
- Naphthalene [emission, air]: 5.5133e-5 kg
  (same comment as for Acetaldehyde)
- 1,1,1-Trichloroethane [emission, air]: 1.8032e-5 kg
  (same comment as for Acetaldehyde)
- Manganese [emission, air]: 9.9572e-5 kg
  (same comment as for Acetaldehyde)
- Trisodium phosphate [emission, air]: 0.031139 kg
  (same comment as for Acetaldehyde)
- Xylene [emission, air]: 0.00034425 kg
  (same comment as for Acetaldehyde)
- Nitrous oxide [emission, air]: 0.018017 kg
  (same comment as for Acetaldehyde)
- Hexachlorobenzene [emission, air]: 3.1301e-10 kg
  (same comment as for Acetaldehyde)
- Carbon monoxide [emission, air]: 0.084726 kg
  (same comment as for Acetaldehyde)
- Silver [emission, air]: 3.9721e-5 kg
  (same comment as for Acetaldehyde)
- Hydrochloric acid [emission, air]: 0.027178 kg
  (same comment as for Acetaldehyde)
- Nitrogen dioxide [emission, air]: 2.769 kg
  From all combustion processes at pulp and paper mill.

## Sampling procedure
The survey included results from 15 mills representing 5 million short tons per year (TPY), nearly 76% of 2006/2007 North American production volume.

## Sources
- AF&PA
