# Electricity, at Grid, SERC, 2010

Dataset: openLCA process, unit process
Category: 22: Utilities/2211: Electric Power Generation, Transmission and Distribution
Geography: Northern America
Time period: 2009-12-31 to 2009-12-31
Allocation method: no allocation
Generated by: Samantha Wascavage
Published in: Chris Goemans, Athena Institute
restrictionsDescription: All information can be accessed by everybody.
copyright: false

## General comment
The methodology used to put together the grid information is outlined in reference 1.

## Technology
Typical

## Geography
Alabama, Georgia, Mississippi, North Carolina, South Carolina and parts of Arkansas, Florida, Illinois, Iowa, Kentucky, Louisiana, Missouri, Tennessee, Texas and Virginia.

## Reference product
- Electricity, at grid [RNA]: 1 kWh

## Inputs from technosphere
- Electricity, other fuels, unspecified, at power plant: 0.001542 kWh
  OTH, MSN, PUR, WH – Other (Batteries, Chemicals, Coke Breeze, Hydrogen, Pitch, Sulfur, Tar Coal, and miscellaneous technologies)
- Electricity, biomass, solid, agriculture by-products, at power plant: 0.00564 kWh
  AB, MSB, MSW, OBS, TDF, WDS – Agriculture Crop By-products / Straw / Energy Crops
- Electricity, biomass,liquid, unspecified, at power plant: 0.009346 kWh
  BLQ, OBL, SLW, WDL – Black Liquor
- Electricity, biomass, gas, landfill, at power plant: 0.000636 kWh
  LFG, OBG – Landfill Gas
- Electricity, nuclear, at power plant [RNA]: 0.248459 kWh
  NUC – Nuclear (Uranium, Plutonium, Thorium)
- Electricity, natural gas, at power plant [RNA]: 0.189805 kWh
  NG – Natural Gas
- Electricity, diesel, at power plant [RNA]: 0.004524 kWh
  DFO, JF, KER – Distillate Fuel Oil (includes all Diesel and No. 1, No. 2, and No. 4 Fuel Oils)
- Electricity, residual fuel oil, at power plant [RNA]: 0.000951 kWh
  RFO – Residual Fuel Oil (includes No. 5 and No. 6 Fuel Oils and Bunker C Fuel Oil)
- Electricity, bituminous coal, at power plant [RNA]: 0.148025 kWh
  SUB – Subbituminous Coal
- Electricity, lignite coal, at power plant [RNA]: 0.003065 kWh
  LIG – Lignite Coal
- Electricity, hydropower, at power plant, unspecified: 0.029761 kWh
  WAT – Water (Conventional, Pumped Storage)
- Electricity, bituminous coal, at power plant [RNA]: 0.332508 kWh
  BIT, SC, SGC, WC - Anthracite Coal, and Bituminous Coal.
- Electricity, petroleum coke, at power plant: 0.003897 kWh
  PC, SG, WO – Petroleum Coke
- Electricity, other gases, unspecified, at power plant: 0.002148 kWh
  OG, BFG, PG – Other Gas (Butane, Coal Processes, Coke-Oven, Refinery, and other processes)
- Electricity, at wind power plant, unspecified: 0.000661 kWh
  WND – Wind

## Sampling procedure
based on EIA electricity reports for all power plants in the US.

## Sources
- EIA
- EIA
- Statistics Canada
- Statistics Canada
- Chris Goemans, Athena Institute
- EIA
- USEPA
- EIA
- Statistics Canada
- EIA
- Statistics Canada
- EIA
- unspecified
- EIA
- USEPA
- EIA
- EIA
- Statistics Canada
- US DOE
- International Energy Agency
- EIA
