# Skidding, aerial cable yarder, medium

Dataset: openLCA process, unit process
Category: 11: Agriculture, Forestry, Fishing and Hunting/1133: Logging
Geography: United States
Time period: 1988-12-31 to 1995-12-31
Allocation method: no allocation
Generated by: Maureen Puetmann
Published in: Leonard R. Johnson
restrictionsDescription: All information can be accessed by everybody.
copyright: false

## General comment
Important note: although most of the data in the US LCI database has undergone some sort of review, the database as a whole has not yet undergone a formal validation process. Please email comments to lci@nrel.gov.

## Technology
Average technology. Some data extrapolated from similar processes.

## Geography
US Inland West including Montana, Idaho, and eastern Washington

## Reference product
- Skidding; aerial cable yarder; medium [US]: 1 d
  Cable and aerial yarding equipment

## Inputs from technosphere
- Diesel, combusted in industrial equipment [RNA]: 32.22 l
- Lubricants, unspecified, at plant: 0.515968 kg
  Proxy for hydraulic fluids

## Sampling procedure
Fuel consumption data for the selected harvesting systems is generally based on the horsepower of the machines used within those systems. The fuel consumption calculations show consistency across the range of equipment used and should have a fairly high degree of reliability. Lubricant consumption was calculated as a percent of fuel consumption. This assumption generalizes the consumption rate and fails to distinguish between individual equipment characteristics.

## Sources
- Maureen Puettmann
- Leonard R. Johnson
