# Unsaturated polyester, UPR, resin, at plant

Dataset: openLCA process, unit process
Category: 31-33: Manufacturing/3252: Resin, Synthetic Rubber, and Artificial and Synthetic Fibers and Filaments Manufacturing
Geography: United States
Time period: 2010-12-31 to 2011-12-31
Allocation method: no allocation
Generated by: Franklin Associates
Published in: American Composites Manufacturers Assn.
restrictionsDescription: All information can be accessed by everybody.
copyright: false

## General comment
An average of 0.0014 kg of resin scrap is produced for every kilogram of unsaturated polyester resin produced; this scrap is sold for recycling. Possible differences in the mass balance stem from small amounts of inputs which are not included in the analysis, solid wastes shown as outputs that are not shown as inputs, as well as possibly some emissions from burning the overhead losses within the plant. Complete inventory data and metadata are shown in full in the final report, Life Cycle Inventory of Polymer Composites. The report is not publicly available. This report has been extensively reviewed within Franklin Associates by Rebe Feraldi, Anne Marie Molen, and Melissa Huff and has undergone partial critical review by ACMA members. Important note: although most of the data in the US LCI database has undergone some sort of review, the database as a whole has not yet undergone a formal validation process. Please email comments to lci@nrel.gov.

## Technology
Production of unsaturated polyester resin by a polycondensation of dicarboxylic acids and glycol monomers. When the reaction is complete, the resulting fluid polyester is cooled and blended with a vinylic reactive monomer. Styrene is the most common reactive diluent used in UPR production. Water is a by-product of the esterification reaction and is continuously removed during the esterification step to drive the reaction to completion. This water is sent to a thermal oxidizer to eliminate the hydrocarbons. The waste heat generated from the thermal oxidation process is sometimes utilized to produce steam energy for re-use within the UPR production facility. In some manufacturing sites, the oxidized vapor is released directly to the air without capture and re-use of the waste heat. The final UPR product is shipped to composite fabricators via drum, tote, or bulk tankers where it is combined with other materials, such as fibers and fillers, and processed into a finished or semi-finished part.

## Geography
US

## Reference product
- Unsaturated polyester, UPR, scrap resin, at plant [US]: 0.0014 kg

## Inputs from technosphere
All rows: lognormal geomSd 1
- Polyethylene terephthalate, PET, virgin resin, at plant, kg: 0.015 kg
- Propylene Glycol, liquid, at plant: 0.015, 0.081 kg (2 entries)
- Ethylene glycol, at plant, kg: 0.1, 0.02 kg (2 entries); provider Ethylene glycol, materials production, organic compound, at plant, kg
- Transport, train, diesel powered [RNA]: 2.154 t*km
- Ethylene, at plant, kg: 0.09 kg; provider Ethylene, materials production, organic compound, at plant, kg
- Ethylbenzene styrene, EB, at plant [RNA]: 0.33 kg
- Electricity, at grid [RNA]: 0.19226 kWh; provider Electricity, at Grid, US, 2010
- Transport, combination truck, diesel powered [RNA]: 0.24489 t*km
- Tetrabromophthalic acid, at plant: 0.0071 kg
- Purified terephthalic acid, at plant: 0.013, 0.029 kg (2 entries)
- Petroleum coke, at refinery [RNA]: 1.9912e-5 kg; provider Petroleum refining, at refinery
- Natural gas, combusted in industrial boiler [RNA]: 0.11543 m3
- Disposal, solid waste, unspecified, to sanitary landfill: 0.0016 kg
- Disposal, solid waste, unspecified, to municipal incineration: 0.0013 kg
- Disposal, solid waste, unspecified, to waste-to-energy: 0.0019 kg
- Neo pentyl glycol, at plant: 0.014 kg
- Maleic anhydride, at plant: 0.18 kg
- Diesel, combusted in industrial equipment [RNA]: 0.00022657 l
- Phthalic anhydride, at plant: 0.074 kg

## Inputs from nature
- Water [resource, water]: 0.567 kg; lognormal geomSd 1

## Emissions to nature
All rows: lognormal geomSd 1
- Lead [emission, water]: 4.5e-8 kg
- N,N-Dimethylaniline [emission, air]: 1.5e-8 kg
- Styrene [emission, air]: 0.00013 kg
- Xylene [emission, air]: 9.7e-7 kg
- 1-Butanol [emission, air]: 2e-7 kg
- Cyanide [emission, water]: 3.8e-9 kg
- Zinc [emission, water]: 3.1e-8 kg
- Aluminum(III) [emission, water]: 1.4e-7 kg
- Particulate matter [emission, air]: 0.00013 kg
- Sulfur oxides [emission, air]: 1.9e-7 kg
- Methane [emission, air]: 7.1e-7 kg
- Suspended solids, inorganic [emission, water]: 0.00059 kg
- Carbon dioxide [emission, air]: 0.037 kg
- Ethylene glycol [emission, air]: 7.5e-6 kg
- Phthalic acid [emission, air]: 1.3e-5 kg
- Particulate matter, > 2.5μm and ≤ 10μm [emission, air]: 4.3e-6 kg
- Hydrocarbons [emission, air]: 2.8e-5, 4.2e-5 kg (2 entries)
- Maleic anhydride [emission, air]: 9.2e-6 kg
- Volatile organic compounds [emission, air]: 2.3e-5 kg
- Total dissolved solids [emission, water]: 5.4e-5 kg
- Methyl methacrylate [emission, air]: 2.4e-5 kg
- Dicyclopentadiene [emission, air]: 3.9e-6 kg
- Nickel [emission, water]: 1.9e-9 kg
- Particulate matter, ≤ 2.5μm [emission, air]: 7.8e-6 kg
- Nitrogen oxides [emission, air]: 3.1e-5 kg
- Energy, heat [emission, air]: 0.29157 MJ
- Biological Oxygen Demand [emission, water]: 0.0011 kg
- Chemical Oxygen Demand [emission, water]: 0.0011 kg
- Vinyltoluene [emission, air]: 1.2e-6 kg
- Oils, unspecified [emission, water]: 1e-5 kg
- Carbon monoxide [emission, air]: 0.00027 kg

## Sampling procedure
Data are from primary sources. The unsaturated polyester producers who provided data for this module verified that the characteristics of their plants are representative of US UPR production facilities. Data was collected from 100% of the companies producing UPR in the US.

## Sources
- American Composites Manufacturers Assn.
