# Soybean grains, at field

Dataset: openLCA process, unit process
Category: 11: Agriculture, Forestry, Fishing and Hunting/1111: Oilseed and Grain Farming
Geography: Northern America
Time period: 2003-12-31 to 2006-12-31
Allocation method: no allocation
Generated by: Anne Landfield Greig
Published in: Omni Tech International
restrictionsDescription: All information can be accessed by everybody.
copyright: false

## General comment
1. Carbon Sequestration should be accounted for after the product is built in its LCA model, and should be included depending on the use of end of life fate of that product. For example, a soy-based resin may retain the sequestered carbon indefinitely, while a soy-based biodiesel releases the sequestered carbon at use phase. Biomass carbon contents are as follows: Crude soy oil: 77% C --> 2.823 kg CO2/kg crude soy oil; Soy meal: 48% C --> 1.76 kg CO2/kg meal; Refined soy oil: 80.6% C --> 2.955 kg CO2/kg refined soy oil; Biodiesel: 77% C --> 2.823 kg CO2/kg biodiesel. 2. The study (Main Data Source) underwent external peer review prior to this submission to the US LCI database.

## Technology
US average

## Geography
USA

## Reference product
- Soybean grains, at field [RNA]: 1000 kg
  The average yield of soybeans for the years 2004 through 2007 was 1120 kg/acre. See yield basis sheet

## By-products
- Soybean residues, at field [RNA]: 2100 kg
  2.1 * soybean production. Source 11

## Inputs from technosphere
- Transport, train, diesel powered [RNA]: 20.85 t*km
- Diesel, combusted in industrial equipment [RNA]: 14.3 l
- Quicklime, at plant [RNA]: 94.3 kg
- Transport, single unit truck, diesel powered [RNA]: 0.022 t*km
- Phosphorous Fertilizer (TSP as P2O5), at plant: 5 kg
  See fertilizer application rate sheet
- Electricity, at grid [RNA]: 25 kWh; provider Electricity, at Grid, US, 2010
- Potash Fertilizer (K2O), at plant: 9.3 kg
  See fertilizer application rate sheet
- Nitrogen fertilizer, production mix, at plant [RNA]: 1.6 kg
  See fertilizer application rate sheet
- Natural gas, combusted in industrial boiler [RNA]: 1.2598 m3
- Gasoline, combusted in equipment [RNA]: 4.5 l
- Agrochemicals, at plant: 0.52 kg
  See pesticide use summary sheet.
- Liquefied petroleum gas, combusted in industrial boiler [RNA]: 1.28305 l

## Inputs from nature
- Water [resource, water, subterranean]: 3.4725e7 kg
  See Irrigation Basis sheet
- Land use [resource, ground, human-dominated, agricultural]: 813, 2278, 956 m2*a (3 entries)
- Water [resource, water, fresh water body, river]: 1.5855e7 kg
  See Irrigation Basis sheet

## Emissions to nature
- Metribuzin [emission, water]: 2.77531e-5 kg
  See pesticide use summary sheet
- 2,4-D [emission, air, troposphere, rural]: 0.00484606 kg
  See pesticide use summary sheet
- Chlorpyrifos [emission, air, troposphere, rural]: 0.00235604 kg
  See pesticide use summary sheet
- Thifensulfuron [emission, air, troposphere, rural]: 7.10191e-6 kg
  See pesticide use summary sheet
- Thiodicarb [emission, air, troposphere, rural]: 2.53149e-5 kg
  See pesticide use summary sheet
- Flumiclorac-pentyl [emission, air, troposphere, rural]: 2.07855e-5 kg
  See pesticide use summary sheet
- Carbaryl [emission, water]: 2.53149e-6 kg
  See pesticide use summary sheet
- Chlorpyrifos [emission, water]: 0.000100973 kg
  See pesticide use summary sheet
- Zeta-Cypermethrin [emission, air, troposphere, rural]: 2.99206e-5 kg
  See pesticide use summary sheet
- Paraquat [emission, water]: 1.78556e-5 kg
  See pesticide use summary sheet
- Imazamox [emission, water]: 1.33284e-6 kg
  See pesticide use summary sheet
- Flumiclorac-pentyl [emission, water]: 8.90808e-7 kg
  See pesticide use summary sheet
- Carfentrazone-ethyl [emission, air, troposphere, rural]: 6.491e-6 kg
  See pesticide use summary sheet
- Diflubenzuron [emission, water]: 2.78186e-7 kg
  See pesticide use summary sheet
- Chlorimuron-ethyl [emission, air, troposphere, rural]: 0.000118117 kg
  See pesticide use summary sheet
- Permethrin [emission, air, troposphere, rural]: 6.52202e-5 kg
  See pesticide use summary sheet
- Carfentrazone-ethyl [emission, water]: 2.78186e-7 kg
  See pesticide use summary sheet
- Imazethapyr [emission, water]: 8.79537e-6 kg
  See pesticide use summary sheet
- Sethoxydim [emission, water]: 2.23326e-6 kg
  See pesticide use summary sheet
- Cloransulam-methyl [emission, water]: 2.63601e-6 kg
  See pesticide use summary sheet
- Imazaquin [emission, air, troposphere, rural]: 9.91548e-5 kg
  See pesticide use summary sheet
- Clethodim [emission, water]: 1.49725e-5 kg
  See pesticide use summary sheet
- Flumioxazin [emission, air, troposphere, rural]: 0.000210323 kg
  See pesticide use summary sheet
- Azoxystrobin [emission, water]: 6.05156e-6 kg
  See pesticide use summary sheet
- Sethoxydim [emission, air, troposphere, rural]: 5.21093e-5 kg
  See pesticide use summary sheet
- Acephate [emission, air, troposphere, rural]: 0.000515061 kg
  See pesticide use summary sheet
- Cyfluthrin [emission, air, troposphere, rural]: 1.23329e-5 kg
  See pesticide use summary sheet
- Nitrogen oxides [emission, air, troposphere, rural]: 0.261509 kg
  See Nitrous Oxide Basis Sheet. Source 8
- Fenoxaprop [emission, water]: 4.13658e-6 kg
  See pesticide use summary sheet
- Pyraclostrobin [emission, air, troposphere, rural]: 0.00018045 kg
  See pesticide use summary sheet
- Methyl parathion [emission, water]: 3.42659e-6 kg
  See pesticide use summary sheet
- Bentazon [emission, water]: 9.27053e-6 kg
  See pesticide use summary sheet
- Carbaryl [emission, air, troposphere, rural]: 5.90681e-5 kg
  See pesticide use summary sheet
- Cloransulam-methyl [emission, air, troposphere, rural]: 6.1507e-5 kg
  See pesticide use summary sheet
- Ammonia [emission, air, troposphere, rural]: 0.0966447 kg
  See Nitrous Oxide Basis Sheet
- Sulfentrazone [emission, air, troposphere, rural]: 0.000498313 kg
  See pesticide use summary sheet
- Thifensulfuron [emission, water]: 3.04368e-7 kg
  See pesticide use summary sheet
- Phosphorus compounds [emission, water]: 0.0282525 kg
  P runoff as fract of P fert applied * P fert applied. Sources 9 & 10.
- Metribuzin [emission, air, troposphere, rural]: 0.000647572 kg
  See pesticide use summary sheet
- Thiodicarb [emission, water]: 1.08492e-6 kg
  See pesticide use summary sheet
- Methyl parathion [emission, air, troposphere, rural]: 7.99538e-5 kg
  See pesticide use summary sheet
- Flumetsulam [emission, water]: 5.2078e-7 kg
  See pesticide use summary sheet
- Trifluralin [emission, water]: 0.000185604 kg
  See pesticide use summary sheet
- Alachlor [emission, air, troposphere, rural]: 0.00050038 kg
  See pesticide use summary sheet
- Particulate matter [emission, air, troposphere, rural]: 0.0012 kg
  No change from 2003 USDA Soy Ag LCI
- Metolachlor [emission, water]: 6.99242e-5 kg
  See pesticide use summary sheet
- Acifluorfen [emission, water]: 3.03059e-6 kg
  See pesticide use summary sheet
- Flumioxazin [emission, water]: 9.01383e-6 kg
  See pesticide use summary sheet
- Imazethapyr [emission, air, troposphere, rural]: 0.000205225 kg
  See pesticide use summary sheet
- Imazaquin [emission, water]: 4.24949e-6 kg
  See pesticide use summary sheet
- Sulfentrazone [emission, water]: 2.13563e-5 kg
  See pesticide use summary sheet
- Hydrocarbons [emission, air, troposphere, rural]: 0.200699 kg
  See pesticide use summary sheet
- Clethodim [emission, air, troposphere, rural]: 0.000349359 kg
  See pesticide use summary sheet
- Quizalofop-ethyl [emission, air, troposphere, rural]: 2.42076e-5 kg
  See pesticide use summary sheet
- Cyfluthrin [emission, water]: 5.28553e-7 kg
  See pesticide use summary sheet
- Fluazifop-P-butyl [emission, water]: 5.9366e-6 kg
  See pesticide use summary sheet
- Flufenacet [emission, air, troposphere, rural]: 5.1928e-5 kg
  See pesticide use summary sheet
- Trifluralin [emission, air, troposphere, rural]: 0.00717669 kg
  See pesticide use summary sheet
- Diflubenzuron [emission, air, troposphere, rural]: 6.491e-6 kg
  See pesticide use summary sheet
- Pendimethalin [emission, water]: 0.00018812 kg
  See pesticide use summary sheet
- Esfenvalerate [emission, water]: 3.16047e-6 kg
  See pesticide use summary sheet
- Fenoxaprop [emission, air, troposphere, rural]: 9.65202e-5 kg
  See pesticide use summary sheet
- Propiconazole [emission, air, troposphere, rural]: 7.65938e-5 kg
  See pesticide use summary sheet
- Fomesafen [emission, water]: 3.35081e-5 kg
  See pesticide use summary sheet
- Atrazine [emission, air, troposphere, rural]: 0.000395789 kg
  See pesticide use summary sheet
- Imazamox [emission, air, troposphere, rural]: 3.10995e-5 kg
  See pesticide use summary sheet
- Tribenuron-methyl [emission, water]: 1.7223e-7 kg
  DELETE LINE ITEM - NO USE RECORDED
- Gamma-cyhalothrin [emission, air, troposphere, rural]: 0.000141542 kg
  See pesticide use summary sheet
- Dicamba [emission, water]: 1.69693e-6 kg
  See pesticide use summary sheet
- Trifloxystrobin [emission, air, troposphere, rural]: 4.5437e-6 kg
  See pesticide use summary sheet
- Nitrous oxide [emission, air, troposphere, rural]: 0.349772 kg
  See Nitrous Oxide Basis Sheet. Source 8
- Acetamide [emission, water]: 3.28054e-6 kg
  See pesticide use summary sheet
- Pendimethalin [emission, air, troposphere, rural]: 0.00438947 kg
  See pesticide use summary sheet
- Gamma-cyhalothrin [emission, water]: 6.06608e-6 kg
  See pesticide use summary sheet
- Chlorimuron-ethyl [emission, water]: 5.06216e-6 kg
  See pesticide use summary sheet
- Flumetsulam [emission, air, troposphere, rural]: 1.21515e-5 kg
  See pesticide use summary sheet
- Acetamide [emission, air, troposphere, rural]: 0.000126848 kg
  See pesticide use summary sheet
- Flufenacet [emission, water]: 2.22548e-6 kg
  See pesticide use summary sheet
- Acephate [emission, water]: 2.2074e-5 kg
  See pesticide use summary sheet
- Acifluorfen [emission, air, troposphere, rural]: 7.07137e-5 kg
  See pesticide use summary sheet
- Paraquat [emission, air, troposphere, rural]: 0.000416631 kg
  See pesticide use summary sheet
- Trifloxystrobin [emission, water]: 1.9473e-7 kg
  See pesticide use summary sheet
- Quizalofop-ethyl [emission, water]: 1.03747e-6 kg
  See pesticide use summary sheet
- Azoxystrobin [emission, air, troposphere, rural]: 0.000233994 kg
  See pesticide use summary sheet
- Suspended solids, inorganic [emission, water]: 2812.26 kg
  No change from 2003 USDA Soy Ag LCI
- Fomesafen [emission, air, troposphere, rural]: 0.000781855 kg
  See pesticide use summary sheet
- Propiconazole [emission, water]: 3.28259e-6 kg
  See pesticide use summary sheet
- Pyraclostrobin [emission, water]: 7.73356e-6 kg
  See pesticide use summary sheet
- Esfenvalerate [emission, air, troposphere, rural]: 7.37444e-5 kg
  See pesticide use summary sheet
- Dicamba [emission, air, troposphere, rural]: 3.95951e-5 kg
  See pesticide use summary sheet
- Glyphosate [emission, water]: 0.00669752 kg
  See pesticide use summary sheet
- Bentazon [emission, air, troposphere, rural]: 0.000216312 kg
  See pesticide use summary sheet
- Lactofen [emission, air, troposphere, rural]: 9.98516e-5 kg
  See pesticide use summary sheet
- Atrazine [emission, water]: 1.69624e-5 kg
  See pesticide use summary sheet
- Glyphosate [emission, air, troposphere, rural]: 0.156275 kg
  See pesticide use summary sheet
- Nitrogen [emission, water]: 0.197607 kg
  N runoff as fact of N fert applied*N fert applied. Sources 9 & 10.
- Lactofen [emission, water]: 4.27935e-6 kg
  See pesticide use summary sheet
- Zeta-Cypermethrin [emission, water]: 1.28231e-6 kg
  See pesticide use summary sheet
- Fluazifop-P-butyl [emission, air, troposphere, rural]: 0.000138521 kg
  See pesticide use summary sheet
- 2,4-D [emission, water]: 0.000207688 kg
  See pesticide use summary sheet
- Metolachlor [emission, air, troposphere, rural]: 0.00163156 kg
  See pesticide use summary sheet
- Alachlor [emission, water]: 2.14448e-5 kg
  See pesticide use summary sheet
- Permethrin [emission, water]: 2.79515e-6 kg
  See pesticide use summary sheet

## Allocation factors
- causal, Soybean residues, at field, for Propiconazole: 0
- causal, Soybean residues, at field, for Quizalofop-ethyl: 0
- causal, Soybean grains, at field, for Alachlor: 1
- causal, Soybean grains, at field, for Carfentrazone-ethyl: 1
- causal, Soybean grains, at field, for Alachlor: 1
- causal, Soybean residues, at field, for Pyraclostrobin: 0
- causal, Soybean residues, at field, for Pendimethalin: 0
- causal, Soybean residues, at field, for Azoxystrobin: 0
- causal, Soybean residues, at field, for Liquefied petroleum gas, combusted in industrial boiler: 0
- causal, Soybean residues, at field, for Glyphosate: 0
- causal, Soybean residues, at field, for Acephate: 0
- causal, Soybean grains, at field, for Land use: 1
- causal, Soybean grains, at field, for Diflubenzuron: 1
- causal, Soybean residues, at field, for Atrazine: 0
- causal, Soybean residues, at field, for Natural gas, combusted in industrial boiler: 0
- causal, Soybean residues, at field, for Imazaquin: 0
- causal, Soybean grains, at field, for Nitrogen: 1
- causal, Soybean residues, at field, for Propiconazole: 0
- causal, Soybean grains, at field, for 2,4-D: 1
- causal, Soybean grains, at field, for Agrochemicals, at plant: 1
- causal, Soybean grains, at field, for Acephate: 1
- causal, Soybean residues, at field, for Zeta-Cypermethrin: 0
- causal, Soybean grains, at field, for Pyraclostrobin: 1
- causal, Soybean grains, at field, for Zeta-Cypermethrin: 1
- causal, Soybean residues, at field, for Quizalofop-ethyl: 0
- causal, Soybean grains, at field, for Atrazine: 1
- causal, Soybean residues, at field, for Nitrogen: 0
- causal, Soybean grains, at field, for Pyraclostrobin: 1
- causal, Soybean residues, at field, for Water: 0
- causal, Soybean residues, at field, for Imazamox: 0
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
## Sources
- Pesticide Action Network (PAN)
- Omni Tech International
- United States Department of Agriculture
- Sheehan, J.
- USGS for NOAA
- USDA/ERS
- United States Department of Agriculture
- United States Department of Agriculture
- Environmental Protection Agency (EPA)
- United States Department of Agriculture
- United States Department of Agriculture
