# Electricity, at Grid, WECC, 2010

Dataset: openLCA process, unit process
Category: 22: Utilities/2211: Electric Power Generation, Transmission and Distribution
Geography: Northern America
Time period: 2009-12-31 to 2009-12-31
Allocation method: no allocation
Generated by: Samantha Wascavage
Published in: Chris Goemans, Athena Institute
restrictionsDescription: All information can be accessed by everybody.
copyright: false

## General comment
The methodology used to put together the grid information is outlined in reference 1.

## Technology
Typical

## Geography
Washington, Idaho, Montana, Portland, British Columbia, Alberta, California, Utah, Nevada, Arizona, New Mexico, Colorado, and Wyoming and parts of Nebraska, Texas and Mexico.

## Reference product
- Electricity, at grid [RNA]: 1 kWh

## Inputs from technosphere
- Electricity, natural gas, at power plant [RNA]: 0.321335 kWh
  NG - Natural Gas
- Electricity, nuclear, at power plant [RNA]: 0.076112 kWh
  NUC - Nuclear Fission (Uranium, Plutonium, Thorium)
- Electricity, solar, unspecified, at power plant: 0.000816 kWh
  SUN - Solar
- Electricity, other fuels, unspecified, at power plant: 0.001087 kWh
  OTH, MSN, PUR, WH - Specify in Comments Section
- Electricity, petroleum coke, at power plant: 0.019297 kWh
  PC, SG, WO - Petroleum Coke
- Electricity, geothermal, unspecified: 0.019567 kWh
  GEO - Geothermal
- Electricity, at wind power plant, unspecified: 0.019539 kWh
  Wind
- Electricity, biomass,liquid, unspecified, at power plant: 0.000822 kWh
  BLQ, OBL, SLW, WDL - Black Liquor
- Electricity, biomass, gas, landfill, at power plant: 0.001938 kWh
  LFG, OBG - Landfill Gas
- Electricity, other gases, unspecified, at power plant: 0.002114 kWh
  OG, BFG, PG - Other Gas
- Electricity, diesel, at power plant [RNA]: 0.042257 kWh
  DFO, JF, KER - Distillate Fuel Oil (Diesel, No. 1, No. 2, and No. 4 Fuel Oils)
- Electricity, biomass, solid, agriculture by-products, at power plant: 0.008836 kWh
  AB, MSB, MSW, OBS, TDF, WDS - Agricultural Crop Byproducts/Straw/Energy Crops
- Electricity, hydropower, at power plant, unspecified: 0.22433 kWh
  WAT - Water at a Conventional Hydroelectric Turbine
- Electricity, bituminous coal, at power plant [RNA]: 0.152975 kWh
  SUB - Subbituminous Coal
- Electricity, bituminous coal, at power plant [RNA]: 0.099192 kWh
  BIT, SC, SGC, WC - Anthracite Coal and Bituminous Coal

## Sampling procedure
based on EIA electricity reports for all power plants in the US.

## Sources
- EIA
- EIA
- Statistics Canada
- Statistics Canada
- Chris Goemans, Athena Institute
- EIA
- USEPA
- EIA
- Statistics Canada
- EIA
- Statistics Canada
- EIA
- unspecified
- EIA
- USEPA
- EIA
- EIA
- Statistics Canada
- US DOE
- International Energy Agency
- EIA
