# Electricity, at Grid, US, 2008

Dataset: openLCA process, unit process
Category: 22: Utilities/2211: Electric Power Generation, Transmission and Distribution
Geography: Northern America
Time period: 2007-12-31 to 2007-12-31
Allocation method: no allocation
Generated by: Alberta Carpenter
Published in: Chris Goemans, Athena Institute
restrictionsDescription: All information can be accessed by everybody.
copyright: false

## General comment
The methodology used to put together the grid information is outlined in reference 1.

## Technology
Typical

## Geography
US

## Reference product
- Electricity, at grid [RNA]: 1 kWh

## Inputs from technosphere
- Electricity, other fuels, unspecified, at power plant: 0.000471098 kWh
  WH – Waste heat not directly attributed to a fuel source. Note that WH should only be reported where the fuel source for the waste heat is undetermined, and for combined cycle steam turbines that are not supplementary fired
- Electricity, residual fuel oil, at power plant [RNA]: 0.00567779 kWh
  RFO – Residual Fuel Oil (includes No. 5 and No. 6 Fuel Oils and Bunker C Fuel Oil)
- Electricity, lignite coal, at power plant [RNA]: 0.0195691 kWh
  LIG – Lignite Coal
- Electricity, other gases, unspecified, at power plant: 3.48348e-6 kWh
  PG – Propane
- Electricity, biomass, at power plant [RNA]: 0.00482988 kWh
  WDS – Wood/Wood Waste Solids (Paper Pellets, Railroad Ties, Utility Poles, Wood Chips, and other wood solids)
- Electricity, other gases, unspecified, at power plant: 0.000764509 kWh
  BFG – Blast Furnace Gas
- Electricity, bituminous coal, at power plant [RNA]: 0.205082 kWh
  SUB – Subbituminous Coal
- Electricity, natural gas, at power plant [RNA]: 0.214348 kWh
  NG – Natural Gas
- Electricity, solar, unspecified, at power plant: 0.000209816 kWh
  SUN – Solar (Photovoltaic, Thermal)
- Electricity, biomass, solid, biogenic MSW, at power plant: 0.00196554 kWh
  MSB – Municipal Solid Waste – Biogenic Component
- Electricity, biomass,liquid, unspecified, at power plant: 1.77457e-5 kWh
  WDL – Wood Waste Liquids (Red Liquor, Sludge Wood, Spent Sulfite Liquor, and other wood based liquids
- Electricity, hydropower, at power plant, unspecified: 0.060335 kWh
  WAT – Water (Conventional, Pumped Storage)
- Electricity, biomass,liquid, unspecified, at power plant: 0.00420708 kWh
  BLQ – Black Liquor
- Electricity, diesel, at power plant [RNA]: 0.000109206 kWh
  JF – Jet Fuel
- Electricity, geothermal, unspecified: 0.00362951 kWh
  GEO – Geothermal
- Electricity, other fuels, unspecified, at power plant: 0.000188953 kWh
  PUR – Purchased Steam
- Electricity, biomass, solid, agriculture by-products, at power plant: 0.00018866 kWh
  AB – Agriculture Crop By-products / Straw / Energy Crops
- Electricity, bituminous coal, at power plant [RNA]: 0.253998 kWh
  BIT - Anthracite Coal, and Bituminous Coal.
- Electricity, other fuels, unspecified, at power plant: 0.000338495 kWh
  OTH – Other (Batteries, Chemicals, Coke Breeze, Hydrogen, Pitch, Sulfur, Tar Coal, and miscellaneous technologies)
- Electricity, nuclear, at power plant [RNA]: 0.195711 kWh
  NUC – Nuclear (Uranium, Plutonium, Thorium)
- Electricity, at wind power plant, unspecified: 0.0134396 kWh
  WND – Wind
- Electricity, MSW, non-biogenic, at power plant: 0.00154435 kWh
  MSN – Municipal Solid Waste – Non-biogenic components
- Electricity, bituminous coal, at power plant [RNA]: 0.000103876 kWh
  SC - Coal Synfuel. Coal-based solid fuel that has been processed by a coal synfuel plant, and coal-based fuels such as briquettes, pellets, or extrusions, which are formed from fresh or recycled coal and binding materials.
- Electricity, biomass,liquid, unspecified, at power plant: 2.83951e-6 kWh
  OBL – Other Biomass Liquid (Ethanol, Fish Oil, Liquid Acetonitrile Waste, Medical Waste, Tall Oil, Waste Alcohol, and other Biomass not specified)
- Electricity, petroleum, waste oil, at power plant: 0.000221756 kWh
  WO – Waste/Other Oil (including Crude Oil, Liquid Butane, Liquid Propane, Oil Waste, Re-Refined Motor Oil, Sludge Oil, Tar Oil, or other petroleum-based liquid wastes)
- Electricity, tire derived fuel, at power plant: 0.000295458 kWh
  TDF – Tired (tire derived fuel)
- Electricity, petroleum coke, at power plant: 0.0034775 kWh
  PC – Petroleum Coke
- Electricity, other gases, unspecified, at power plant: 0.0020739 kWh
  OG – Other Gas (Butane, Coal Processes, Coke-Oven, Refinery, and other processes)
- Electricity, diesel, at power plant [RNA]: 7.99602e-5 kWh
  KER – Kerosene
- Electricity, diesel, at power plant [RNA]: 0.00165939 kWh
  DFO – Distillate Fuel Oil (includes all Diesel and No. 1, No. 2, and No. 4 Fuel Oils)
- Electricity, biomass, gas, unspecified, at power plant: 0.00015246 kWh
  OBG – Other Biomass Gases (Digester Gas, Methane, and other biomass gases)
- Electricity, biomass, gas, landfill, at power plant: 0.00173723 kWh
  LFG – Landfill Gas
- Electricity, biomass,solid, unspecified, at power plant: 0.000213353 kWh
  OBS – Other Biomass Solid (Animal Manure and Waste, Solid By-products, and other solid biomass not specified)
- Electricity, biomass, liquid, sludge, at power plant: 4.48682e-5 kWh
  SLW – Sludge Waste
- Electricity, bituminous coal, at power plant [RNA]: 0.00330936 kWh
  WC - Waste/Other Coal (Anthracite Culm, Bituminous Gob, Fine Coal, Lignite Waste, Waste Coal) .

## Sampling procedure
based on EIA electricity reports for all power plants in the US.

## Sources
- EIA
- EIA
- EIA
- Chris Goemans, Athena Institute
- US DOE
- International Energy Agency
- Statistics Canada
- EIA
- Statistics Canada
- EIA
- EIA
- US DOE
- EIA
- USEPA
- Statistics Canada
- Statistics Canada
- EIA
- EIA
- EIA
- Statistics Canada
- NERC
- USEPA
- Statistics Canada
- EIA
