# Spring wheat straw, carted, 2022

Dataset: openLCA process, unit process
Category: 11: Agriculture, Forestry, Fishing and Hunting/1151: Support Activities for Crop Production
Geography: Northern America
Time period: 2021-12-31 to 2021-12-31
Allocation method: no allocation
Generated by: Daniel Inman
Published in: Hsu, D.
restrictionsDescription: All information can be accessed by everybody.
copyright: false

## Geography
North America

## Time period
2008

## Reference product
- Spring wheat straw, carted [RNA]: 0.476 kg

## Inputs from technosphere
- Spring wheat straw, production, average, US, 2022: 357 kg
- Transport, tractor and trailer: 0.38835 t*km
  1.12 is for conversion to short ton
- Baling: 0.397 m2
  hectares of corn stover calculated based on mass ratio, then scaled by the amount of stover (0.46) per mass of corn grain. Impact of baling is slightly overstated because it involves tractor--INL design report has baler behind the harvester.
- Transport, combination truck, diesel powered [RNA]: 7.8546 t*km
  1.12 is for conversion to short ton

## Sources
- Hess, J.
- Hsu, D.
