# Corrugated product, 100% recycled, at mill

Dataset: openLCA process, unit process
Category: 31-33: Manufacturing/3222: Converted Paper Product Manufacturing
Geography: United States
Time period: 2013-12-31 to 2014-12-30
Allocation method: no allocation
Data quality: US EPA - Process Pedigree Matrix (2;1)
Generated by: Caroline Gaudreault
Owner: Corrugated Packaging Alliance (CPA)
Reviewer: Dr. Lindita Bushi
Published in: NCASI (2017) LCA Average Corrugated Product
restrictionsDescription: These U.S. LCI Database Project data ("Data") are provided by the National Renewable Energy Laboratory ("NREL"), operated by the Alliance for Sustainable Energy, LLC ("Alliance") for the US Department of Energy ("DOE") under Contract No. DE-AC36-08GO28308. The United States Government (the "Government") retains and the user acknowledges that the Government retains a non-exclusive, paid-up, irrevocable, worldwide license to publish or reproduce the published form of these data, or allow others to do so, for Government purposes.
Access to and use of these Data shall impose the following obligations on the user, as set forth in this Agreement. The user is granted the right, without any fee or cost, to use, copy, modify, alter, enhance and distribute these Data for any purpose whatsoever, provided that this entire notice appears in all copies of the Data. Any modification, alteration or enhancement of these data shall be identified and documented by the user. Further, the user agrees to credit the DOE/NREL/Alliance in any publication that results from the use of these Data. The names DOE/NREL/Alliance, however, may not be used in any advertising or publicity to endorse or promote any products or commercial entities unless specific written permission is obtained from DOE/NREL/Alliance. The user also understands that DOE/NREL/Alliance is not obligated to provide the user with any support, consulting, training or assistance of any kind with regard to the use of these Data or to provide the user with any updates, revisions or new versions of these Data.
YOU AGREE TO INDEMNIFY THE GOVERNMENT AND DOE/NREL/ALLIANCE, AND ITS SUBSIDIARIES, AFFILIATES, OFFICERS, AGENTS, AND EMPLOYEES AGAINST ANY CLAIM OR DEMAND, INCLUDING REASONABLE ATTORNEYS' FEES, RELATED TO YOUR USE OF THESE DATA. THESE DATA ARE PROVIDED BY DOE/NREL/ALLIANCE "AS IS" AND ANY EXPRESS OR IMPLIED WARRANTIES, INCLUDING BUT NOT LIMITED TO, THE IMPLIED WARRANTIES OF MERCHANTABILITY AND FITNESS FOR A PARTICULAR PURPOSE ARE DISCLAIMED. IN NO EVENT SHALL THE GOVERNMENT OR DOE/NREL/ALLIANCE BE LIABLE FOR ANY SPECIAL, INDIRECT OR CONSEQUENTIAL DAMAGES OR ANY DAMAGES WHATSOEVER, INCLUDING BUT NOT LIMITED TO CLAIMS ASSOCIATED WITH THE LOSS OF DATA OR PROFITS, WHICH MAY RESULT FROM AN ACTION IN CONTRACT, NEGLIGENCE OR OTHER TORTIOUS CLAIM THAT ARISES OUT OF OR IN CONNECTION WITH THE ACCESS, USE OR PERFORMANCE OF THESE DATA.
copyright: true

## General comment
This product is the same as "Corrugated product, average production, at mill", but has 100% recycled containerboard as input instead of industry-average.

Corrugated product made from containerboard (linerboard and corrugating medium), average U.S. production, at mill. All flows are production-weighted means. Data were developed for a full LCA that was critically reviewed. Reviewer was Ms. Lindita Bushi, Athena Institute; Ms Melissa Hamilton, Earthshift.

The unit process includes sheet feeder plants, sheet plants and corrugator plants. Net purchased energy is included, but upstream flows associated with its generation are excluded. Flows associated with transportation of inputs from the technosphere are included. Product transportation is excluded.

## Technology
Current technology mix for corrugated products production

## Geography
United States

## Time period
Primary data was collected from participating companies and associations for their operational activities representative of 2014.

## Reference product
- Corrugated product, 100% recycled, at mill [US]: 1 kg

## Inputs from technosphere
- Transport, ocean freighter, diesel powered [US]: 0.00101495 t*km
  Chemicals: 2.5% of total mass travel 2020 km
- Borax, anhydrous, powder, at plant: 0.000302798 kg
- Sodium hydroxide, production mix, at plant [US]: 0.000550835 kg; provider Chlorine, production mix, at plant
- Transport, train, diesel powered [RNA]: 0.445139 t*km
  Wood logs to P&P (pulp and paper) mills: 3.2% of total mass travels 2828 km. Wood chips to P&P mills: 4.8% of total mass travels 1989 km. Recovered fiber to P&P mills: 11.0% of total mass travels 589 km. Pulp to P&P mills: 21.4% of total mass travels 1347 km. Chemicals: 31.3% of total mass travels 1355 km. Residuals to management: 11.0% of total mass travels 589 km.
- Liquefied petroleum gas, at refinery [RNA]: 2.03e-6 m3; provider Petroleum refining, at refinery
- Diesel, at refinery: 2.05e-6 m3; provider Petroleum refining, at refinery
- Slack wax; at plant [US]: 0.0037599 kg; provider Slack wax, at plant, US SE
- Transport, combination truck, diesel powered [RNA]: 0.306533 t*km
  Wood logs to P&P (pulp and paper) mills: 96.8% of total mass travels 145 km. Wood chips to P&P mills: 95.2% of total mass travels 259 km. Recovered fiber to P&P mills: 87.8% of total mass travels 201 km. Pulp to P&P mills: 78.6% of total mass travels 267 km. Chemicals: 59.5% of total mass travels 208km. Residuals to management: 87.8% of total mass travels 201km. Purchased hogged fuel, other biomass: 100% of total mass travels 145km.
- Disposal, other waste, to unspecified disposal: 0.00341582 kg
- Maize starch, at plant: 0.0190708 kg
  i.e. : Maize starch, at plant
- Adhesives and binders, at plant: 0.00160843 kg
- Coating powder, at plant: 0.000513365 kg
- Steam, purchased by containerboard mills: 0.00240724 MJ
  Used as a proxy for steam used by corrugated products facilities.
- Unspecified inks: 0.00129887 kg
- Process wastewater, to municipal wastewater treatment: 0.251608 kg
- Gasoline, at refinery: 2.56e-10 m3; provider Petroleum refining, at refinery
- Transport, barge, diesel powered [RNA]: 0.00266047 t*km
  Recovered fiber to pulp and paper mills: 1.2% of total mass travels 824 km. Chemicals: 6.8% of total mass travels 336 km. Residuals to management : 1.2% of total mass travels 824 km
- Glue, at plant: 0.000337704 kg
- Converting losses to recycling: 0.12522 kg
- Natural gas, processed, at plant, 1.357 m3/kg [RNA]: 0.0312556 m3; provider Natural gas, processed, at plant

## Inputs from nature
- Water [resource, water]: 0.459492 kg
  Equal to output of cooling water. When needed, facility energy accounts for treating input of water

## Emissions to nature
- Copper [emission, air]: 2.04e-10 kg
- Nitrogen oxides [emission, air]: 5.1e-5 kg
- Chloride [emission, water]: 1.46e-11 kg
- Suspended solids, inorganic [emission, water]: 2.53e-6 kg
- Manganese [emission, air]: 3.94e-10 kg
- Methane [emission, air]: 1.19e-6 kg
- Selenium [emission, air]: 5.22e-10 kg
- Oils, unspecified [emission, water]: 1.09e-9 kg
- Carbon dioxide [emission, air]: 0.0703344 kg
- Radionuclides [emission, air]: 0.328576 kBq
- Water [emission, air]: 0.215608, 0.0133552 kg (2 entries)
- Lead [emission, air]: 5.56e-10 kg
- Nickel [emission, air]: 1.15e-9 kg
- Nitrous oxide [emission, air]: 2.37e-7 kg
- 2,3,7,8-Tetrachlorodibenzo-p-dioxin [emission, air]: 3.4e-15 kg
- Hydrochloric acid [emission, air]: 1.71e-7 kg
- Cobalt [emission, air]: 4.21e-11 kg
- Sulfur dioxide [emission, air]: 1.04e-6 kg
- Biological Oxygen Demand [emission, water]: 4.53e-6 kg
- Copper [emission, water]: 7.28e-11 kg
- Arsenic [emission, air]: 2.36e-10 kg
- Iron [emission, water]: 7.28e-11 kg
- Carbon monoxide [emission, air]: 4.42e-5 kg
- Volatile organic compounds [emission, air]: 0.000139285 kg
- Mercury [emission, air]: 2.32e-10 kg
- Particulate matter [emission, air]: 4.37e-5 kg
- Zinc [emission, air]: 1.36e-10 kg
- Chromium [emission, air]: 8.03e-10 kg
- Polycyclic aromatic hydrocarbons [emission, air]: 6.44e-13 kg

## Inventory method
Attributional

## Modelling constants
his process is generated per survey data on energy and material inputs, production, and environmental releases from 166 converting facilities (128 corrugator plants, 31 sheet plants, and 7 sheet-feeder plants) representing 23% of overal production volume for 2014.

## Completeness
TREATMENT OF MISSING ENVIRONMENTAL DATA: Elementary flows are cut-off at less than 1% based on environmental relevance.
TREATMENT OF MISSING TECHNOSPHERE DATA: Intermediate flows are cut-off at less than 1% based on environmental relevance. Capital equipment and maintenance, maintenance and operation of support equipment, or transport of employees. In addition, the study did not include energy related to the use of the packaging product, nor that of the product packaged by it. Other overhead functions such as HVAC and lighting were included to the extent they are considered in total mill energy usage as reported by participating companies.
MASS BALANCE: Water, fiber and carbon balances were performed for the containerboard production and converting unit processes. Where adequate, the results of the mass balances were used to correct the collected data.

## Data selection
* Data on water inputs, environmental loads, solid waste management, and energy (quantity and types of fuels) for the relevant pulp and paper mills were drawn from responses to the 2014 AF&PA Environmental, Health, and Safety Survey.
*Information on quantity of energy used, fiber input, furnish production, and chemical consumption (quantity and type) at the department level was collected in a supplemental survey.
*Data regarding the emissions of toxic substances (as defined by the U.S. Toxic Release Inventory) were modeled using U.S. LCI and NCASI information.
* Data on nutrient content of treated wastewater effluents from pulp and paper mills were derived from available information in the U.S. EPA Permit Compliance System database (www.epa.gov/enviro/html/pcs/); these data are insufficient to allow characterization of effluents from the specific mills in the database, but they do allow general characterization of effluents from U.S. pulp and paper mills.
* Data submitted by the industry in connection with the TSCA Inventory Update Rule (IUR, www.epa.gov/iur/) were used to estimate quantities of kraft pulping co-products (e.g., turpentine and tall oil) produced; the IUR data were not sufficient to characterize every mill in the database, but were sufficient to characterize kraft pulping processes in general.
* Converting facilities in the U.S. were surveyed to collect energy and material input, production, and environmental release information.

## Data treatment
rimary data were from survey data on energy and material inputs, production, and environmental releases from 166 converting faciilties representing 23% of overall production volume for the reference years 2014. The 2014 U.S.-average corrugated product studied in this LCA consists of 66.8% linerboard and 33.2% corrugated medium. The average basis weight of the U.S. industry mix is 131.6 lb/thousand square feet (msf, 0.643 kg/m2) and consists of approximately 0.6% singleface, 90.9% singlewall, 8.0% doublewall, and 0.5% triplewall. Surveys requesting detailed production, energy and raw material input, and environmental releases (including material outputs recycled by other facilities) were received from 269 converting facilities. The information provided via the surveys was quality-assured by evaluating internal consistency of various survey data elements based on engineering principles and by comparing with average or median values reported by similar facilities. A mass balance was performed considering all input materials and outputs of corrugated sheets, finished corrugated products, recycled materials, and solid waste. Agreement of inputs and outputs within 10% was required for a facility’s survey information to be included in the analysis. The carbon contents of corrugated products were calculated using carbon balances. Energy consumption data entry elements underwent a two-step QA process: 1) comparing entries to those of similar facilities to identify gross errors, and 2) identification of potential outliers using statistical outlier tests of total energy intensity. Entered values of material inputs and water contents of those inputs were evaluated for reasonableness. Entered values for water intake to facilities were compared with those of water releases for that facility. For electricity purchased by converting mills, a 2014 U.S. average power mix was used because the survey representativeness was low and because facilities are spread out across the nation.

## Data collection
All primary data were collected via the converting facilities questionnaire from 2015-2016 for the reference year 2014.

## Sampling procedure
BOUNDARY CONDITIONS: The system boundary includes: 1) transport of raw materials to converting facilities; 2) the conversion of rolls of linerboard and corrugating medium to corrugated product by softening with heat/steam, running through corrugated rollers, applying starch to flute tips for glueing to linerboard layer(s), drying in a hot plate section, slitting into sheets, and then stacking, and palletizing for shipping. Emissions are calculated from reported annual averages.
DATA COLLECTION: All material and energy inputs, production processes, and environmental releases are based on a survey including results from 122 corrugator plants, 38 sheet plants, and 13 sheet-feeder plants (a total of 166 converting facilities). Data were recorded as production-weighted means.
UNCERTAINTY ESTIMATION: Most transportation distances were based on U.S. Census data, which are averaged across different categories.

## Review details
The LCA study that produced this unit process was critically reviewed per ISO 14040 and 14044 standards by Dr. Lindita Bushi, Senior Research Associate of Athena Sustainable Materials Institute.

## Intended application
In order to respond to increasing interest among product manufacturers and consumer retail markets in selecting more sustainable packaging options, CPA engaged NCASI to update the results of a LCA they published in 2014 that relied primarily on 2010 data to the most recent available data (i.e., 2014 data). SITUATION A -- MICRO-LEVEL DECISION SUPPORT: The intended application for this process is for micro-level decision support as described in Goal Situation A from the ILCD Handbook's Detailed Guidance. These data were developed as specific, average or generic unit process LCI results for use in answering internal company product-related questions. A full inventory of environmental flows are included, thus this unit process can be used for a full range of LCIA impact categories, on the fate and transport considerations have been applied. The original study results were analyzed using the TRACI LCIA factors.

## Project
This LCA was commissioned by the Corrugated Packaging Alliance (CPA), a joint venture of the American Forest & Paper Association (AF&PA), Fibre Box Association (FBA), the Association of Independent Corrugated Converters (AICC) and TAPPI. For this study, a core project team was established to direct, review, and coordinate the activities associated with the methodologies employed, data collection, modeling, presentation and dissemination of the LCI data and corresponding LCA results. The core group for this project consisted of a technical advisory group within the Fibre Box Association (FBA) Sustainability Committee along with various staff from the National Council for Air and Stream Improvement (NCASI).

## Sources
- NCASI (2017) LCA Average Corrugated Product
