# Electricity, at eGrid, NEWE, 2008

Dataset: openLCA process, unit process
Category: 22: Utilities/2211: Electric Power Generation, Transmission and Distribution
Geography: Northern America
Time period: 2007-12-31 to 2007-12-31
Allocation method: no allocation
Generated by: Alberta Carpenter
Published in: Chris Goemans, Athena Institute
restrictionsDescription: All information can be accessed by everybody.
copyright: false

## General comment
The methodology used to put together the grid information is outlined in reference 1.

## Technology
Typical

## Geography
Maine, New Hampshire, Vermont,Massachusetts, Rhode Island and Connecticut.

## Reference product
- Electricity, at grid [RNA]: 1 kWh

## Inputs from technosphere
- Electricity, biomass, at power plant [RNA]: 0.0322557 kWh
  Solid Renewable Fuels (Biomass) WDS – Wood/Wood Waste Solids (Paper Pellets, Railroad Ties, Utility Poles, Wood Chips, and other wood solids)
- Electricity, diesel, at power plant [RNA]: 0.00168788 kWh
  Petroleum (DFO) - Distillate Fuel Oil (includes all Diesel and No. 1, No. 2, and No. 4 Fuel Oils)
- Electricity, MSW, non-biogenic, at power plant: 0.0121751 kWh
  Other Fuels MSN - Municipal Solid Waste – Non-biogenic components
- Electricity, at wind power plant, unspecified: 0.00122623 kWh
  Wind
- Electricity, diesel, at power plant [RNA]: 3.33024e-5 kWh
  Petroleum (DFO) JF - jet fuel
- Electricity, petroleum, waste oil, at power plant: 0.000113672 kWh
  Petroleum (Other Fossil) WO – Waste/Other Oil (including Crude Oil, Liquid Butane, Liquid Propane, Oil Waste, Re-Refined Motor Oil, Sludge Oil, Tar Oil, or other petroleum-based liquid wastes)
- Electricity, bituminous coal, at power plant [RNA]: 0.0249468 kWh
  Subbituminous Coal
- Electricity, biomass, gas, landfill, at power plant: 0.00321861 kWh
  Gaseous Renewable Fuels (Biomass) LFG - landfill gas
- Electricity, biomass,liquid, unspecified, at power plant: 0.00879671 kWh
  Liquid Renewable Fuels (Biomass) BLQ - black liquor
- Electricity, hydropower, at power plant, unspecified: 0.0669494 kWh
  Hydroelectric
- Electricity, biomass, gas, unspecified, at power plant: 1.19376e-5 kWh
  Gaseous Renewable Fuels (Biomass) OBG – Other Biomass Gases (Digester Gas, Methane, and other biomass gases)
- Electricity, biomass,liquid, unspecified, at power plant: 1.24644e-6 kWh
  Liquid Renewable Fuels (Biomass) OBL – Other Biomass Liquid (Ethanol, Fish Oil, Liquid Acetonitrile Waste, Medical Waste, Tall Oil, Waste Alcohol, and other Biomass not specified)
- Electricity, residual fuel oil, at power plant [RNA]: 0.0241276 kWh
  Petroleum (RFO) – Residual Fuel Oil (includes No. 5 and No. 6 Fuel Oils and Bunker C Fuel Oil)
- Electricity, other fuels, unspecified, at power plant: 0.000185581 kWh
  Other Fuels OTH – Other (Batteries, Chemicals, Coke Breeze, Hydrogen, Pitch, Sulfur, Tar Coal, and miscellaneous technologies)
- Electricity, biomass, solid, biogenic MSW, at power plant: 0.0154954 kWh
  Solid Renewable Fuels (Biomass) MSB - Municipal Solid Waste – Biogenic Component
- Electricity, bituminous coal, at power plant [RNA]: 0.00044391 kWh
  Bituminous Coal SC - Coal Synfuel. Coal-based solid fuel that has been processed by a coal synfuel plant, and coal-based fuels such as briquettes, pellets, or extrusions, which are formed from fresh or recycled coal and binding materials.
- Electricity, diesel, at power plant [RNA]: 0.000173352 kWh
  Petroleum (DFO) KER - kerosene
- Electricity, other fuels, unspecified, at power plant: 0.000102774 kWh
  Other Fuels PUR – Purchased Steam
- Electricity, biomass, liquid, sludge, at power plant: 0.00040937 kWh
  Liquid Renewable Fuels (Biomass) SLW – Sludge Waste
- Electricity, natural gas, at power plant [RNA]: 0.403145 kWh
  Natural Gas
- Electricity, tire derived fuel, at power plant: 0.00213881 kWh
  Solid Renewable Fuels (Biomass) TDF - tires, tire derived fuel
- Electricity, solar, unspecified, at power plant: 6.30949e-7 kWh
  Solar (Photovoltaic, Thermal)
- Electricity, bituminous coal, at power plant [RNA]: 0.122671 kWh
  Bituminous Coal BIT - Anthracite Coal, and Bituminous Coal.
- Electricity, nuclear, at power plant [RNA]: 0.279689 kWh
  Nuclear Fission

## Sampling procedure
based on EIA electricity reports for all power plants in the US.

## Sources
- EIA
- EIA
- EIA
- Chris Goemans, Athena Institute
- US DOE
- International Energy Agency
- Statistics Canada
- EIA
- Statistics Canada
- EIA
- EIA
- US DOE
- EIA
- USEPA
- Statistics Canada
- unspecified
- Statistics Canada
- EIA
- EIA
- EIA
- Statistics Canada
- USEPA
- Statistics Canada
- EIA
