# Xylenes, mixed, produced from naphtha, at plant, kg

Dataset: openLCA process, unit process
Category: 31-33: Manufacturing/3241: Petroleum and Coal Products Manufacturing
Geography: Northern America
Time period: 2015-12-31 to 2016-11-30
Allocation method: no allocation
Generated by: Franklin Associates, A Division of ERG
Owner: NAPCOR
Reviewer: Franklin Associates, A Division of ERG
Published in: Franklin Associates (2019) Cradle-to-Resin LCA PET for NAPCOR
copyright: false

## General comment
Mixed xylenes are created as a coproduct of benzene and toluene from one of three sources—pyrolysis gasoline from steam cracking, naphtha from the refining process, or coke oven gas from coal pyrolysis. This analysis considers the production from the catalytic reforming of naphtha from a refinery.

The reforming processes are used to convert paraffinic hydrocarbon streams into aromatic compounds such as benzene, toluene, and xylene. Catalytic reforming uses catalysts, such as platinum and palladium, to dehydrogenate straight-run light naphtha to yield a mixture of aromatic hydrocarbons (Cheremisinoff, 2009). The hydrogen that is removed during dehydrogenation is used during the hydrocracking process and reduces coke formation.

The BTX aromatics are then extracted from the reformate and fractionated to separate streams using distillation. Adsorption or crystallization may be used as well to separate the aromatic streams.
Total energy data for mixed xylenes were provided by a confidential source in the previous analysis from 2011. The mix of fuels for energy and estimated transport data was reviewed and revised from discussions with a current producer in 2018. Carbon dioxide emissions were estimated from the PlasticsEurope BTX EcoProfile report (PlasticsEurope, 2013).

## Technology
Mixed Xylenes are produced from the catalytic reforming of naphtha from a refinery.

## Reference product
- Xylenes, mixed, at plant, kg: 1 kg

## Inputs from technosphere
- Electricity, at grid [RNA]: 0.021 kWh; provider Electricity, at Grid, US, 2010
- Natural gas, combusted in industrial boiler [RNA]: 0.051 m3
- Transport, barge, average fuel mix [RNA]: 0.0832 t*km
  Estimate
- Transport, pipeline, unspecified petroleum products [RNA]: 0.0161 t*km
  Estimate
- Petroleum refining coproduct, at refinery [RNA]: 1 kg; provider Petroleum refining, at refinery
  Naphtha

## Emissions to nature
- Carbon dioxide [emission, air]: 0.15 kg

## Inventory method
Attributional. Compatible with TRACI

## Modelling constants
Total energy data for mixed xylenes were provided by a confidential source in the previous analysis from 2011. The mix of fuels for energy and estimated transport data was reviewed and revised from discussions with a current producer in 2018. Carbon dioxide emissions were estimated from the PlasticsEurope BTX EcoProfile report.

## Completeness
TREATMENT OF MISSING ENVIRONMENTAL DATA: Elementary flows are cut-off at less than 1% based on environmental relevance.
TREATMENT OF MISSING TECHNOSPHERE DATA: Intermediate flows are cut-off is at 1% based on environmental relevance.
MASS BALANCE: For primary data the mass balance was calculated by a straight comparison of inputs and outputs

## Data selection
The previous mixed xylenes 2011 dataset was updated using revised energy and transportation data from a producer in 2018. Carbon dioxide emissions were estimated from the PlasticsEurope BTX EcoProfile report.

## Data treatment
The previous 2011 dataset was updated with 2018 data on energy and transportation from a current producer.

## Data collection
Updated energy and transportation data is from 2018 other inputs are from 2011 which were a compination of primary data from a producer and secondary data. Our update went from a secondary source to primary information.

## Sampling procedure
BOUNDARY CONDITIONS: The system boundary includes (1) raw material extraction (e.g., extraction of petroleum and natural gas as feedstocks for mixed xylenes production), (2) incoming transportation for each process, and (3) manufacturing of mixed xylenes, including incoming transportation for each material.
DATA COLLECTION: The previous mixed xylenes 2011 dataset was updated using revised energy and transportation data from a producer in 2018. Carbon dioxide emissions were estimated from the PlasticsEurope BTX EcoProfile report. Supporting background data were drawn from credible, widely used databases including the US LCI database, GREET, and Ecoinvent.
UNCERTAINTY ESTIMATION: All data received were carefully discussed with current producer(s) and evaluated before compiling the update to the existing data sets, used to generate results. No uncertainty analysis was carried out due to the lack of uncertainty data or probability distributions for key parameters, which are often only available as single point estimates from the producers.

## Review details
Internal review of data entry proofreading, mass balance verification and data documentation.

## Intended application
"Accounting, with system-external interactions" - The intended application is a purely descriptive accounting / documentation of the analysed system including existing interactions with other systems in the LCI model. These data are an update to a previously published dataset which is a generic unit process data.

## Sources
- Franklin Associates (2019) Cradle-to-Resin LCA PET for NAPCOR
