# Injection molding, rigid LLDPE part, at plant

Dataset: openLCA process, unit process
Category: 31-33: Manufacturing/3261: Plastics Product Manufacturing
Geography: Northern America
Time period: 2009-12-31 to 2009-12-31
Allocation method: no allocation
Generated by: Franklin Associates
Published in: THE RIGID PLASTICS PROCESSING GROUP (RPPG) OF THE AMERICAN CHEMISTRY COUNCIL
restrictionsDescription: All information can be accessed by everybody.
copyright: false

## General comment
For each kilogram of plastic part fabrication, the amount of incoming corrugated box material is equivalent to that coming out of the process as it is purchased to be used as shipping packaging. An average of 0.045 kg of rigid plastic part scrap is produced for every kilogram of injection molded parts produced; this scrap is sold for recycling. The remaining solid waste generated from the facilities surveyed in this analysis is landfilled. For every kilogram of injection molded plastic product, 0.0158 kg of solid waste is sent to landfill. Of this solid waste, an average of 84 percent by mass is process waste such as contaminated resin scrap, hydraulic oil, and/or inks; while, 16 percent is packaging waste from incoming materials. The small (<1%) mass imbalance is due to variability in data availability for, and weighting of, amounts of ancillary inputs and waste and emission outputs. The packaging inputs and printing emissions in this data set represent the average reported per kilogram of output across a range of procucts produced at manufacturing facilities. When using this data to represent a specific molded product, users should adjust the amount of packaging and printing emissions as needed based on the actual materials and processes used. Complete inventory data and metadata are available in full in the final report and appendices, Life Cycle Inventory of Plastic Fabrication Processes: Injection Molding and Thermoforming. This report has been extensively reviewed within Franklin Associates and has undergone partial critical review by ACC Rigid Plastics Processing Group (RPPG) members and is available at: www.americanchemistry.com. Quantities may vary slightly between the reference to main source and and this module due to rounding. Important note: although most of the data in the US LCI database has undergone some sort of review, the database as a whole has not yet undergone a formal validation process. Please email comments to lci@nrel.gov.

## Technology
Fabrication of rigid plastic parts by injection moldng. Of the product weight generated by facilities providing data for this analysis, 52 percent is produced from hydraulic machinery, 34 percent from hybrid machinery, and 15 percent from all-electric machines.

## Geography
RNA

## Reference product
- Injection molding, rigid LLDPE part, at plant [RNA]: 1 kg

## By-products
- Corrugate packaging, from LDPE injection molding, for shipping [RNA]: 0.1 kg
- LLDPE scrap, from LLDPE injection molding, at plant [RNA]: 0.045 kg

## Inputs from technosphere
All rows: lognormal geomSd 1
- Transport, train, diesel powered [RNA]: 1.87 t*km
- Diesel, combusted in industrial equipment [RNA]: 8.3e-6 l
- Converted corrugated box, with average bleaching, at plant: 0.1 kg
- Disposal, solid waste, unspecified, to sanitary landfill: 0.016 kg
- Polyethylene, linear low density, LLDPE, resin, at plant [RNA]: 1.034 kg
- Petroleum refining, for olefins production, at plant [RNA]: 0.0013 kg
- Liquefied petroleum gas, combusted in industrial boiler [RNA]: 0.00083 l
- Gasoline, combusted in equipment [RNA]: 8.3e-5 l
- Colorant, at plant: 0.0194 kg
- Natural gas, combusted in industrial boiler [RNA]: 0.0034 m3
- Electricity, at grid [RNA]: 1.79 kWh; provider Electricity, at Grid, US, 2010
- Transport, combination truck, diesel powered [RNA]: 0.031 t*km

## Inputs from nature
- Water [resource, water]: 0.67 kg; lognormal geomSd 1

## Emissions to nature
All rows: lognormal geomSd 1
- Methyl ethyl ketone [emission, air]: 0.0001 kg
- p-Xylene [emission, air]: 1e-7 kg
- Ethanol [emission, air]: 1e-5, 0.001 kg (2 entries)
- Isopropanol [emission, air]: 0.0001 kg
- m-Xylene [emission, air]: 1e-6 kg
- Propane [emission, air]: 1e-6 kg
- Particulate matter [emission, air]: 6.7e-6 kg
- o-Xylene [emission, air]: 1e-7 kg
- Methylene chloride [emission, air]: 1e-6 kg
- Alcohols, ethoxylated C12-14 [emission, air]: 0.0001 kg
- Ethyl acetate [emission, air]: 0.0001 kg
- Volatile organic compounds [emission, air]: 4.3e-5 kg
- Methanol [emission, air]: 1e-6 kg
- Toluene [emission, air]: 1e-5 kg
- Ethylbenzene [emission, air]: 1e-7 kg

## Allocation factors
- causal, Injection molding, rigid LLDPE part, at plant, for Transport, combination truck, diesel powered: 1
- causal, LLDPE scrap, from LLDPE injection molding, at plant, for Ethanol: 0
- causal, Corrugate packaging, from LDPE injection molding, for shipping, for m-Xylene: 0
- causal, Corrugate packaging, from LDPE injection molding, for shipping, for Particulate matter: 0
- causal, Corrugate packaging, from LDPE injection molding, for shipping, for Transport, train, diesel powered: 0
- causal, LLDPE scrap, from LLDPE injection molding, at plant, for o-Xylene: 0
- causal, Corrugate packaging, from LDPE injection molding, for shipping, for Ethanol: 0
- causal, Injection molding, rigid LLDPE part, at plant, for Water: 1
- causal, Injection molding, rigid LLDPE part, at plant, for Transport, train, diesel powered: 1
- causal, Injection molding, rigid LLDPE part, at plant, for Ethyl acetate: 1
- causal, LLDPE scrap, from LLDPE injection molding, at plant, for Ethyl acetate: 0
- causal, Corrugate packaging, from LDPE injection molding, for shipping, for Natural gas, combusted in industrial boiler: 0
- physical, Injection molding, rigid LLDPE part, at plant: 1
- causal, Injection molding, rigid LLDPE part, at plant, for Diesel, combusted in industrial equipment: 1
- causal, Corrugate packaging, from LDPE injection molding, for shipping, for Petroleum refining, for olefins production, at plant: 0
- causal, Injection molding, rigid LLDPE part, at plant, for Liquefied petroleum gas, combusted in industrial boiler: 1
- causal, Corrugate packaging, from LDPE injection molding, for shipping, for Isopropanol: 0
- causal, Injection molding, rigid LLDPE part, at plant, for Disposal, solid waste, unspecified, to sanitary landfill: 1
- causal, Corrugate packaging, from LDPE injection molding, for shipping, for p-Xylene: 0
- causal, Injection molding, rigid LLDPE part, at plant, for Petroleum refining, for olefins production, at plant: 1
- causal, Corrugate packaging, from LDPE injection molding, for shipping, for Liquefied petroleum gas, combusted in industrial boiler: 0
- causal, LLDPE scrap, from LLDPE injection molding, at plant, for Isopropanol: 0
- causal, LLDPE scrap, from LLDPE injection molding, at plant, for Ethylbenzene: 0
- causal, LLDPE scrap, from LLDPE injection molding, at plant, for Volatile organic compounds: 0
- causal, LLDPE scrap, from LLDPE injection molding, at plant, for Diesel, combusted in industrial equipment: 0
- economic, Injection molding, rigid LLDPE part, at plant: 1
- causal, Injection molding, rigid LLDPE part, at plant, for Methanol: 1
- economic, Corrugate packaging, from LDPE injection molding, for shipping: 0
- causal, LLDPE scrap, from LLDPE injection molding, at plant, for Methanol: 0
- causal, Corrugate packaging, from LDPE injection molding, for shipping, for Methylene chloride: 0
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
## Sampling procedure
Data are from primary sources.

## Sources
- THE RIGID PLASTICS PROCESSING GROUP (RPPG) OF THE AMERICAN CHEMISTRY COUNCIL
