# Railroad ties, hardwood, creosote treated, SE

Dataset: openLCA process, unit process
Category: 31-33: Manufacturing/3211: Sawmills and Wood Preservation
Geography: United States
Time period: 2004-12-31 to 2009-12-30
Allocation method: physical allocation
Generated by: Chris Bolin;
Reviewer: Paul Cooper
Published in: Chris Bolin
restrictionsDescription: All information can be accessed by everybody.
copyright: false

## General comment
Pressure-treated creosote southeast US hardwood rail road ties. Base process data presented with allocations to within process co-products noted. Refer to allocation worksheet for specifics. All allocations performed using mass or volume. This sheet sets out each unit process in the production of one cubic meter of creosote treated rail road ties producted in the Southeast region. Important note: although most of the data in the US LCI database has undergone some sort of review, the database as a whole has not yet undergone a formal validation process. Please email comments to lci@nrel.gov.; Geography: SE US

## Technology
typical

## Geography
US Southeast

## Time period
2005-2009

## Reference product
- Railroad ties; hardwood; creosote treated [US]: 1 m3
  Retention = 5.4537 lb/ft3 = 87.35989 kg/m3

## Inputs from technosphere
- Transport, combination truck, diesel powered [RNA]: 0.3292 t*km
  Preservative Production; from surveys
  68% of diluent oil for preservative producion by truck; transport coal tar
- Disposal, solid waste, unspecified, to unspecified landfill: 0.003159 kg
  Preservative Production;
  Solid waste disposal associated with the coal mining and coal distillation by product processing. Solid waste disposal as reported in treater surveys as other (normal trash or municipal waste). Other waste disposal—Amount of normal trash or municipal waste that is typically collected in trash cans or dumpsters.
- Diesel, combusted in industrial equipment [RNA]: 2.091 l
  Preservative Production
- Transport, train, diesel powered [RNA]: 255.9 t*km
  Preservative Wood Treatment; from surveys
  46% of tie total by rail; 45% of preservative by rail;
- Wood waste, unspecified, combusted in industrial boiler [RNA]: 36.7 kg
  Preservative Wood Treatment
- Transport, combination truck, diesel powered [RNA]: 230.6 t*km
  Preservative Wood Treatment; from surveys
  54% of tie total by truck; 48% of preservative by truck;
- Transport, train, diesel powered [RNA]: 93.53 t*km
  Preservative production; from surveys; 32% of diluent oil for preservative producion by rail; 100% of coal production; transport coal tar
- Natural gas, combusted in industrial boiler [RNA]: 24.9 m3
  Preservative Wood Treatment
- Bituminous coal, combusted in industrial boiler [RNA]: 113 kg
  Preservative Production
- Transport, ocean freighter, residual fuel oil powered [US]: 48.4 t*km
  Preservative production: creostoe production; coal tar; from surveys
- Electricity, at grid [RNA]: 12.5 kWh; provider Electricity, Eastern US, 2014
  Preservative Production
- Creosote, at plant: 281.1 kg
  Preservative Wood Treatment
- Transport, barge, residual fuel oil powered [RNA]: 0.363 t*km
  Preservative production: creosote production; coal tar; from surveys
- Diesel, combusted in industrial equipment [RNA]: 2.048 l
  Preservative Wood Treatment
- Natural gas, combusted in industrial equipment, 1.357 m3/kg, 52.13 MJ/kg [RNA]: 3.31e-5 m3; provider Natural gas, combusted in industrial equipment
  Preservative Wood Treatment; surrogate for LPG
- Gasoline, combusted in equipment [RNA]: 0.08799 l
  Preservative Wood Treatment
- Residual fuel oil, at refinery [RNA]: 6.64 l; provider Petroleum refining, at refinery
  Preservative Wood Treatment; feedstock
- Gasoline, combusted in equipment [RNA]: 0.0948 l
  Preservative Production
- Electricity, at grid [RNA]: 19.35 kWh; provider Electricity, Eastern US, 2014
  Preservative Wood Treatment
- Residual fuel oil, combusted in industrial boiler [RNA]: 0.197 l
  Preservative Production
- Disposal, solid waste, unspecified, to unspecified treatment: 0.6444 kg
  Preservative Wood Treatment;
  Hazardous and Process waste disposed—Amount of hazardous waste for the survey year and units (pounds, tons, drums, etc.). Chemical and process waste disposed—Amount of waste and units from the treatment process, such as from tanks, treatment equipment, and drip pad area, but not including hazardous waste. This may be regulated in your state as chemical, industrial, or special waste.
- Disposal, solid waste, unspecified, to unspecified landfill: 3.749 kg
  Preservative Wood Treatment;
  Solid waste disposal associated with the coal mining and coal distillation by product processing. Solid waste disposal as reported in treater surveys as other (normal trash or municipal waste). Other waste disposal—Amount of normal trash or municipal waste that is typically collected in trash cans or dumpsters.
- Railroad tie; hardwood; rough; green; at sawmill [US]: 563.64 kg; provider Railroad tie, hardwood, rough, green, at sawmill, SE
  Preservative Wood Production;
  Untreated Railroad ties, surrogate for SE hardwood lumber;
  65,794 lb/MCF, 65.794 lb/cuft = 1054 kg/m3 green weight @ 87% MC.
  Oven dry weight = 563.6364 kg/m3. MEP Hdwd worksheet Column H, Row 35. Actual green weight input is at 76% 992.00 kg/m3
- Disposal, solid waste, unspecified, to unspecified treatment: 32.42 kg
  Preservative Production;
  Hazardous and Process waste disposed—Amount of hazardous waste for the survey year and units (pounds, tons, drums, etc.). Chemical and process waste disposed—Amount of waste and units from the treatment process, such as from tanks, treatment equipment, and drip pad area, but not including hazardous waste. This may be regulated in your state as chemical, industrial, or special waste.

## Inputs from nature
- Water [resource, water]: 164 kg
  Preservative Wood Treatment

## Emissions to nature
- Methane [emission, air, troposphere, rural]: 0.499 kg
  Preservative Production
- Creosote [emission, ground, human-dominated, industrial]: 0.000239 kg
  Preservative Wood Treatment
- Creosote [emission, air, troposphere, rural]: 0.126 kg
  Preservative Wood Treatment
- Carbon monoxide [emission, air, troposphere, rural]: 0.16 kg
  Preservative Production
- Ammonia [emission, air, troposphere, rural]: 0.000987 kg
  Preservative Production
- Sulfur dioxide [emission, air, troposphere, rural]: 0.00081 kg
  Preservative Production
- Nitrogen oxides [emission, air, troposphere, rural]: 0.098 kg
  Preservative Production
- Volatile organic compounds [emission, air, troposphere, rural]: 0.0145 kg
  Preservative Wood Treatment; at kiln; emission from the wood product being dried
- Hydrochloric acid [emission, air, troposphere, rural]: 0.000118 kg
  Preservative Production
- Sulfur oxides [emission, air, troposphere, rural]: 0.0422 kg
  Preservative Production
- Hydrofluoric acid [emission, air, troposphere, rural]: 2.56e-6 kg
  Preservative Production
- Particulate matter, ≤ 10μm [emission, air, troposphere, rural]: 0.0212 kg
  Preservative Production
- Carbon dioxide [emission, air, troposphere, rural]: 21.1 kg
  Preservative Production

## Sampling procedure
Industry survey

## Sources
- Chris Bolin
- Chris Bolin
