# Electricity, at Grid, ASCC, 2008

Dataset: openLCA process, unit process
Category: 22: Utilities/2211: Electric Power Generation, Transmission and Distribution
Geography: Northern America
Time period: 2007-12-31 to 2007-12-31
Allocation method: no allocation
Generated by: Alberta Carpenter
Published in: Chris Goemans, Athena Institute
restrictionsDescription: All information can be accessed by everybody.
copyright: false

## General comment
The methodology used to put together the grid information is outlined in reference 1.

## Technology
Typical

## Geography
Alaska

## Reference product
- Electricity, at grid [RNA]: 1 MJ

## Inputs from technosphere
- Electricity, diesel, at power plant [RNA]: 0.0643081 kWh
  JF – Jet Fuel
- Electricity, hydropower, at power plant, unspecified: 0.172964 kWh
  WAT – Water (Conventional, Pumped Storage)
- Electricity, biomass,liquid, unspecified, at power plant: 0.000691042 kWh
  OBL – Other Biomass Liquid (Ethanol, Fish Oil, Liquid Acetonitrile Waste, Medical Waste, Tall Oil, Waste Alcohol, and other Biomass not specified)
- Electricity, natural gas, at power plant [RNA]: 0.590785 kWh
  NG – Natural Gas
- Electricity, residual fuel oil, at power plant [RNA]: 0.0186969 kWh
  RFO – Residual Fuel Oil (includes No. 5 and No. 6 Fuel Oils and Bunker C Fuel Oil)
- Electricity, diesel, at power plant [RNA]: 0.0613402 kWh
  DFO – Distillate Fuel Oil (includes all Diesel and No. 1, No. 2, and No. 4 Fuel Oils)
- Electricity, bituminous coal, at power plant [RNA]: 0.0912047 kWh
  SUB – Subbituminous Coal
- Electricity, at wind power plant, unspecified: 1.00371e-5 kWh
  WND – Wind

## Sampling procedure
based on EIA electricity reports for all power plants in the US.

## Sources
- EIA
- EIA
- EIA
- Chris Goemans, Athena Institute
- US DOE
- International Energy Agency
- Statistics Canada
- EIA
- Statistics Canada
- EIA
- EIA
- US DOE
- EIA
- USEPA
- Statistics Canada
- unspecified
- Statistics Canada
- EIA
- EIA
- EIA
- Statistics Canada
- USEPA
- Statistics Canada
- EIA
