# Fuels, burned at uncoated mechanical paper, average production, at mill

Dataset: openLCA process, unit process
Category: 31-33: Manufacturing/3221: Pulp, Paper, and Paperboard Mills
Geography: Northern America
Time period: 2005-12-31 to 2005-12-31
Allocation method: no allocation
Generated by: Caroline Gaudreault
Reviewer: Martha Stevenson
Published in: AF&PA
restrictionsDescription: All information can be accessed by everybody.
copyright: false

## General comment
Uncoated mechanical paper, average North American production, at mill. All flows are production-weighted means. Data were developed for a full LCA that was critically reviewed. Reviewers were: • Martha Stevenson, Chairperson – Private Consultant to the public interest with ten years of experience in sustainability, environmental management, packaging and materials recovery; led the development of the Design Guidelines for Sustainable Packaging and the COMPASS software used to compare the environmental impacts of package designs; • Pascal Lesage – Life cycle assessment consultant, Researcher at École Polytechnique de Montréal [at the Inter-University Research Centre for the Life Cycle of Products, Processes and Services (CIRAIG) in Montreal]; and • Dale Phenicie, Environmental Affairs Consulting – Consultant with 35 years of experience in environmental protection and process consulting for the forest products industry. Has served on several U.S. EPA Task Forces dealing with water quality issues and authored several AF&PA Environmental, Health and Safety/Sustainability reports.

## Technology
current technology mix for uncoated mechanical paper

## Time period
Primary data collected from participating companies and associations for their operational activities are representative for 2006 and 2007.

## Reference product
- Fuels, burned at uncoated mechanical paper, average production, at mill [RNA]: 8061 MJ

## Inputs from technosphere
- Hog fuel, pur., combusted in industrial boiler, at pulp and paper mill (EXCL.) [RNA]: 32.602 kg
  Purchased hogged fuel. Typically from wood products manufacturing.
- Bituminous coal, combusted in industrial boiler, at pulp and paper mill (EXCL.) [RNA]: 45.359 kg
- TDF, combusted in industrial boiler, at pulp and paper mill (EXCL.) [RNA]: 0.38086 kg
  All combusted. Not present in any database.
- RFO, combusted in industrial boiler, at pulp and paper mill (EXCL.) [RNA]: 34.021 l
  All combusted on site. Actually received at supplier, not refinery.
- LPG, combusted in industrial boiler, at pulp and paper mill (EXCL.) [RNA]: 0.14981 l
- Gasoline, combusted in equipment, at pulp and paper mill (EXCL.) [RNA]: 0.072754 l
  Gasoline and kerosene, assumed to be gasoline.
- Natural gas, combusted in industrial boiler, at pulp and paper mill (EXCL.) [RNA]: 93.646 m3
- Hog fuel, self-gen., combusted in ind. boiler, at pulp and paper mill (EXCL.) [RNA]: 55.754 kg
  Combustion of self-generated hogged fuel from pulpwood. Wood inputs are accounted for in the process named Uncoated mechanical paper, average production, at mill
- Diesel, combusted in industrial boiler, at pulp and paper mill (EXCL.) [RNA]: 0.7856 l
  Proxy for light fuel oil.

## Emissions to nature
- Cadmium [emission, air]: 1.0473e-5 kg
  From spent liquor recovery, non-recyclable paper combustion and wastewater residuals combustion
- Methyl isobutyl ketone [emission, air]: 7.7111e-5 kg
  (same comment as for Cadmium)
- Toluene [emission, air]: 7.5213e-5 kg
  (same comment as for Cadmium)
- Copper [emission, air]: 9.8354e-6 kg
  (same comment as for Cadmium)
- Acrolein [emission, air]: 3.9094e-5 kg
  (same comment as for Cadmium)
- Benzo[ghi]perylene [emission, air]: 3.9705e-7 kg
  (same comment as for Cadmium)
- Manganese [emission, air]: 0.00012774 kg
  (same comment as for Cadmium)
- Aldehydes, C3 [emission, air]: 0.00065719 kg
  (same comment as for Cadmium)
- Methane [emission, air]: 0.0087684 kg
  (same comment as for Cadmium)
- Formaldehyde [emission, air]: 0.00083502 kg
  (same comment as for Cadmium)
- Methanol [emission, air]: 0.015504 kg
  (same comment as for Cadmium)
- 1,1,1-Trichloroethane [emission, air]: 7.8339e-6 kg
  (same comment as for Cadmium)
- Carbon tetrachloride [emission, air]: 5.8897e-6 kg
  (same comment as for Cadmium)
- Silver [emission, air]: 1.2559e-5 kg
  (same comment as for Cadmium)
- Trisodium phosphate [emission, air]: 0.039096 kg
  (same comment as for Cadmium)
- Nitrogen dioxide [emission, air]: 1.1521 kg
  From all combustion processes at pulp and paper mill.
- Arsenic [emission, air]: 4.1285e-7 kg
  (same comment as for Cadmium)
- Hydrogen sulfide [emission, air]: 0.010243 kg
  Total reduced sulfur assumed to be hydrogen sulfide. From all combustion processes at pulp and paper mill.
- Methylene chloride [emission, air]: 4.5613e-5 kg
  (same comment as for Cadmium)
- Hexane [emission, air]: 7.1085e-5 kg
  (same comment as for Cadmium)
- Hydrochloric acid [emission, air]: 0.008645 kg
  (same comment as for Cadmium)
- Styrene [emission, air]: 3.0353e-5 kg
  (same comment as for Cadmium)
- Polycyclic organic matter [emission, air]: 3.2678e-5 kg
  (same comment as for Cadmium)
- Nitrous oxide [emission, air]: 0.0061777 kg
  (same comment as for Cadmium)
- Naphthalene [emission, air]: 2.1474e-5 kg
  (same comment as for Cadmium)
- Nickel [emission, air]: 3.9393e-6 kg
  (same comment as for Cadmium)
- Vanadium [emission, air]: 2.1042e-7 kg
  (same comment as for Cadmium)
- Phenol [emission, air]: 0.001448 kg
  (same comment as for Cadmium)
- Xylene [emission, air]: 0.00011069 kg
  (same comment as for Cadmium)
- Zinc [emission, air]: 2.5777e-5 kg
  (same comment as for Cadmium)
- Antimony [emission, air]: 1.0046e-5 kg
  (same comment as for Cadmium)
- 1,1,2-Trichloroethane [emission, air]: 1.7327e-5 kg
  (same comment as for Cadmium)
- Carbon dioxide [emission, air]: 389.18 kg
  (same comment as for Cadmium)
- Carbon disulfide [emission, air]: 6.6391e-5 kg
  (same comment as for Cadmium)
- Barium [emission, air]: 0.00032618 kg
  (same comment as for Cadmium)
- Chloroform [emission, air]: 5.2981e-6 kg
  (same comment as for Cadmium)
- Sulfuric acid [emission, air]: 0.0029436 kg
  (same comment as for Cadmium)
- Biphenyl [emission, air]: 1.8184e-5 kg
  (same comment as for Cadmium)
- Beryllium [emission, air]: 0.00017685 kg
  (same comment as for Cadmium)
- Lead [emission, air]: 2.1745e-6 kg
  (same comment as for Cadmium)
- Benzene [emission, air]: 0.00010419 kg
  (same comment as for Cadmium)
- Chromium [emission, air]: 1.8989e-5 kg
  (same comment as for Cadmium)
- 2,3,7,8-Tetrachlorodibenzo-p-dioxin [emission, air]: 2.3946e-13 kg
  (same comment as for Cadmium)
- Cresol [emission, air]: 0.00042899 kg
  (same comment as for Cadmium)
- Carbon monoxide [emission, air]: 0.059292 kg
  (same comment as for Cadmium)
- Sulfur dioxide [emission, air]: 2.5249 kg
  From all combustion processes at pulp and paper mill.
- Tetrachloroethylene [emission, air]: 2.6263e-6 kg
  (same comment as for Cadmium)
- Selenium [emission, air]: 0.00019892 kg
  (same comment as for Cadmium)
- Mercury [emission, air]: 3.8391e-7 kg
  (same comment as for Cadmium)
- Hydrofluoric acid [emission, air]: 0.0001306 kg
  (same comment as for Cadmium)
- Trichloroethylene [emission, air]: 4.086e-6 kg
  (same comment as for Cadmium)
- Hexachlorobenzene [emission, air]: 5.052e-10 kg
  (same comment as for Cadmium)
- Chloromethane [emission, air]: 0.0025835 kg
  (same comment as for Cadmium)
- Cumene [emission, air]: 9.5626e-5 kg
  (same comment as for Cadmium)
- Acetaldehyde [emission, air]: 0.00171 kg
  (same comment as for Cadmium)
- 1,2,4-Trichlorobenzene [emission, air]: 2.2459e-5 kg
  (same comment as for Cadmium)

## Sampling procedure
The survey included results from 8 mills representing 1.7 million short tons per year (TPY), nearly 61% of 2006/2007 North American production volume.

## Sources
- AF&PA
