# Electricity, at eGrid, HIMS, 2010

Dataset: openLCA process, unit process
Category: 22: Utilities/2211: Electric Power Generation, Transmission and Distribution
Geography: Northern America
Time period: 2009-12-31 to 2009-12-31
Allocation method: no allocation
Generated by: Samantha Wascavage
Published in: Chris Goemans, Athena Institute
restrictionsDescription: All information can be accessed by everybody.
copyright: false

## General comment
The methodology used to put together the grid information is outlined in reference 1.

## Technology
Typical

## Geography
Misc Hawaii electricity grid that includes all of Hawaii except for Oahu (HIOA).

## Reference product
- Electricity, at grid [RNA]: 1 kWh

## Inputs from technosphere
- Electricity, hydropower, at power plant, unspecified: 0.02391 kWh
  Hydroelectric
- Electricity, biomass,liquid, unspecified, at power plant: 8e-6 kWh
  BLQ – Black Liquor also includes OBL, SLW, WDL
- Electricity, biomass, solid, agriculture by-products, at power plant: 0.036462 kWh
  Solid Renewable Fuels (Biomass) AB - Agriculture Crop By-products/ Straw/ Energy Crops also includes MSB, MSW, OBS, TDF, WDS
- Electricity, geothermal, unspecified: 0.068107 kWh
  GEO – Geothermal
- Electricity, bituminous coal, at power plant [RNA]: 0.016764 kWh
  Bituminous Coal- (BIT, SC, SGC, WC)
- Electricity, diesel, at power plant [RNA]: 0.436696 kWh
  Petroleum (DFO) - Distillate Fuel Oil (includes all Diesel and No. 1, No. 2, and No. 4 Fuel Oils also includes, JF, KER)
- Electricity, residual fuel oil, at power plant [RNA]: 0.159053 kWh
  Petroleum (RFO) - Residual Fuel Oil (includes No. 5 and No. 6 Fuel Oils and Bunker C Fuel Oil)
- Electricity, at wind power plant, unspecified: 0.088657 kWh
  Wind
- Electricity, petroleum, waste oil, at power plant: 0.097745 kWh
  Petroleum (Other Fossil) WO - Waste/Other Oil (including Crude Oil, Liquid Butane, Liquid Propane, Oil Waste, Re-Refined Motor Oil, Sludge Oil, Tar Oil, or other petroleum-based liquid wastes also includes PC, SG )
- Electricity, solar, unspecified, at power plant: 0.000601 kWh
  Solar (Photovoltaic, Thermal)
- Electricity, other fuels, unspecified, at power plant: 0.074379 kWh
  OTH – Other (Batteries, Chemicals, Coke Breeze, Hydrogen, Pitch, Sulfur, Tar Coal, and miscellaneous technologies also includes, MSN, PUR, WH)

## Sampling procedure
based on EIA electricity reports for all power plants in the US.

## Sources
- EIA
- EIA
- Statistics Canada
- Statistics Canada
- Chris Goemans, Athena Institute
- EIA
- USEPA
- EIA
- Statistics Canada
- EIA
- Statistics Canada
- EIA
- unspecified
- EIA
- USEPA
- EIA
- EIA
- Statistics Canada
- US DOE
- International Energy Agency
- EIA
