# Wood fuel, hardwood, generated at mill, combusted in industrial boiler, E

Dataset: openLCA process, unit process
Category: 22: Utilities/2213: Water, Sewage and Other Systems
Geography: United States
Time period: 2003-12-31 to 2003-12-31
Allocation method: no allocation
Generated by: Maureen Puettmann
Published in: Franklin Associates
restrictionsDescription: All information can be accessed by everybody.
copyright: false

## General comment
Important note: although most of the data in the US LCI database has
undergone some sort of review, the database as a whole has not yet
undergone a formal validation process.
Please email comments to lci@nrel.gov.

## Technology
This process is a copy of the FAL "Wood waste, unspecified, combusted into industrial boilers" for which (1) the wood input was changed to an adapted version of the Franklin fuel wood dataset; (2) wood weight is expressed on oven dry basis; (3) outputs to nature have been scaled to reflect 1 kg of oven dry wood input and (4) waste flow is changed to waste treatment input.

## Geography
US

## Reference product
- Wood fuel; hardwood; generated at mill; combusted in industrial boiler [US]: 1 kg
  Weight reported on an ovendry basis.

## Inputs from technosphere
- Wood fuel; hardwood; dry; at engineered wood flooring plant [US]: 0.019 kg; provider Engineered flooring, hardwood, unfinished, E
  Weight reported on an ovendry basis. Assumes the actual moisture content is 85%.
- Wood fuel; hardwood; green; at veneer mill [US]: 0.926 kg; provider Bucked and debarked log, hardwood, green, at veneer mill, E
  Weight reported on an ovendry basis. Assumes the actual moisture content is 85%.
- Wood fuel; hardwood; dry; at veneer mill [US]: 0.024 kg; provider Veneer, hardwood, dry, at veneer mill, E
  Weight reported on an ovendry basis. Assumes the actual moisture content is 6%.
- Bark; hardwood; green; at veneer mill [US]: 0.031 kg; provider Bucked and debarked log, hardwood, green, at veneer mill, E
  Weight reported on an ovendry basis. Assumes the actual moisture content is 85%.
- Disposal, solid waste, unspecified, to unspecified treatment: 0.0882 kg

## Emissions to nature
- Biological Oxygen Demand [emission, water]: 0.0175 kg
- Lead [emission, air]: 4.32e-7 kg
- Antimony [emission, air]: 7.11e-8 kg
- Carbon tetrachloride [emission, air]: 4.05e-7 kg
- Total Organic Carbon [emission, air]: 3.68e-5 kg
- Phenols [emission, air]: 4.59e-7 kg
- Carbon monoxide [emission, air]: 0.0054 kg
- Beryllium [emission, air]: 9.9e-9 kg
- Nickel [emission, air]: 2.97e-7 kg
- Sulfur oxides [emission, air]: 0.000225 kg
- Particulate matter, > 2.5μm and ≤ 10μm [emission, air]: 0.0045 kg
- Cobalt [emission, air]: 5.85e-8 kg
- Selenium [emission, air]: 2.52e-8 kg
- Nitrogen oxides [emission, air]: 0.000117, 0.00198 kg (2 entries)
- Formaldehyde [emission, air]: 3.96e-5 kg
- Methylene chloride [emission, air]: 2.61e-6 kg
- 2,3,7,8-Tetrachlorodibenzo-p-dioxin [emission, air]: 1.5e-8 kg
- Hydrochloric acid [emission, air]: 0.000171 kg
- Carbon dioxide [emission, air]: 1.76 kg
- Cadmium [emission, air]: 3.69e-8 kg
- Mercury [emission, air]: 3.15e-8 kg
- Methane [emission, air]: 0.000189 kg
- Metals [emission, air]: 0.000385 kg
- Manganese [emission, air]: 1.44e-5 kg
- Acrolein [emission, air]: 3.6e-5 kg
- Acetaldehyde [emission, air]: 7.47e-6 kg
- Chromium [emission, air]: 1.89e-7 kg
- Benzene [emission, air]: 3.78e-5 kg
- Chlorine [emission, air]: 7.11e-6 kg
- Naphthalene [emission, air]: 8.73e-7 kg
- Arsenic [emission, air]: 1.98e-7 kg

## Sources
- Combustion Engineering Inc.
- U.S. DoE
- Sassenrath, Charles P
- Maureen Puettmann
- Argonne National Laboratory
- U.S. EPA
- Franklin Associates
- Kaminski, Paul
