# Lost foam casting, aluminum

Dataset: openLCA process, unit process
Category: 31-33: Manufacturing/3315: Foundries
Geography: Northern America
Time period: 1995-12-31 to 1995-12-31
Allocation method: no allocation
Generated by: James Littlefield
Published in: Vehicle Recycling Partnership (VRP)
restrictionsDescription: All information can be accessed by everybody.
copyright: false

## General comment
No co-product allocation for scrap materials that are recycled or reused; all environmental flows for scrap are included in the environmental flows for the product.
Important note: although most of the data in the US LCI database has
undergone some sort of review, the database as a whole has not yet
undergone a formal validation process.
Please email comments to lci@nrel.gov.

## Technology
representative of lost foam aluminum casting technology.

## Geography
USA

## Reference product
- Aluminum, cast, lost foam, at plant [RNA]: 1 kg

## By-products
- Alumimum scrap, at lost foam casting [RNA]: 0.398 kg
  Composition by weight: 28% aluminum, 12% shotblast (urea and acrylic), 0.6% expandable polystyrene, 59% sand/sand fines.

## Inputs from technosphere
- Aluminum, liquid, at plant: 1.11 kg
- Refractory material, unspecified, at plant: 0.0643 kg
- Plasticshot, polyurea formaldehyde, at plant: 0.0347 kg
- Zinc stearate, at plant: 3e-5 kg
- Water, process, deionized: 1.26 kg
- Disposal, solid waste, unspecified, to sanitary landfill: 0.0139 kg
- Natural gas, combusted in industrial boiler [RNA]: 0.409 m3
- Glue, at plant: 0.00032 kg
- Argon, liquid, at plant: 0.0047 kg
- Plasticshot, polymethylmethacrylate, at plant: 0.015 kg
- Plastic baggies, low density polyethylene, at plant: 9e-5 kg
- Water, at user: 0.184 kg
- Expandable polystyrene, at plant: 0.0153 kg
  consists of 90-95% polystyrene and 5-10% blowing agent
- Electricity, at grid [RNA]: 1.9 kWh; provider Electricity, at Grid, US, 2010

## Inputs from nature
- Water [resource, water]: 0.233 kg
  Includes measured process emissions. Does not include fuel emissions.
- Quartz, sand [resource, ground]: 0.235 kg

## Emissions to nature
- Nitrogen oxides [emission, water]: 4.21e-5 kg
  Includes measured process emissions. Does not include fuel emissions.
- Sulfur oxides [emission, air]: 5e-6 kg
  Measured values after abatement which includes both process and on-site fuel emissions.
- Suspended solids, inorganic [emission, water]: 0.000233 kg
- Particulate matter [emission, air]: 9.4e-5 kg
  Measured values after abatement which includes both process and on-site fuel emissions.
- Carbon monoxide [emission, air]: 0.000897 kg
  Measured values after abatement which includes both process and on-site fuel emissions.
- Volatile organic compounds [emission, air]: 0.00154 kg
  Measured values after abatement which includes both process and on-site fuel emissions.
- Phenol [emission, water]: 3.01e-6 kg
  Includes measured process emissions. Does not include fuel emissions.
- Carbon dioxide [emission, air]: 0.899 kg
  Measured values after abatement which includes both process and on-site fuel emissions.
- Oils, unspecified [emission, water]: 0.000462 kg
  Includes measured process emissions. Does not include fuel emissions.
- Nitrogen oxides [emission, air]: 0.000945 kg
  Measured values after abatement which includes both process and on-site fuel emissions.
- Biological Oxygen Demand [emission, water]: 0.000866 kg
  Includes measured process emissions. Does not include fuel emissions.

## Allocation factors
- causal, Aluminum, cast, lost foam, at plant, for Expandable polystyrene, at plant: 1
- causal, Alumimum scrap, at lost foam casting, for Plasticshot, polymethylmethacrylate, at plant: 0
- causal, Aluminum, cast, lost foam, at plant, for Phenol: 1
- causal, Alumimum scrap, at lost foam casting, for Zinc stearate, at plant: 0
- causal, Aluminum, cast, lost foam, at plant, for Argon, liquid, at plant: 1
- causal, Aluminum, cast, lost foam, at plant, for Aluminum, liquid, at plant: 1
- causal, Alumimum scrap, at lost foam casting, for Biological Oxygen Demand: 0
- economic, Alumimum scrap, at lost foam casting: 0
- causal, Alumimum scrap, at lost foam casting, for Natural gas, combusted in industrial boiler: 0
- causal, Aluminum, cast, lost foam, at plant, for Carbon dioxide: 1
- causal, Aluminum, cast, lost foam, at plant, for Plastic baggies, low density polyethylene, at plant: 1
- causal, Alumimum scrap, at lost foam casting, for Water, at user: 0
- physical, Alumimum scrap, at lost foam casting: 0
- causal, Alumimum scrap, at lost foam casting, for Phenol: 0
- causal, Aluminum, cast, lost foam, at plant, for Nitrogen oxides: 1
- causal, Aluminum, cast, lost foam, at plant, for Natural gas, combusted in industrial boiler: 1
- causal, Aluminum, cast, lost foam, at plant, for Carbon monoxide: 1
- causal, Aluminum, cast, lost foam, at plant, for Electricity, at grid: 1
- causal, Alumimum scrap, at lost foam casting, for Sulfur oxides: 0
- causal, Aluminum, cast, lost foam, at plant, for Glue, at plant: 1
- causal, Aluminum, cast, lost foam, at plant, for Water, process, deionized: 1
- causal, Alumimum scrap, at lost foam casting, for Expandable polystyrene, at plant: 0
- causal, Alumimum scrap, at lost foam casting, for Nitrogen oxides: 0
- causal, Alumimum scrap, at lost foam casting, for Plastic baggies, low density polyethylene, at plant: 0
- causal, Alumimum scrap, at lost foam casting, for Nitrogen oxides: 0
- causal, Aluminum, cast, lost foam, at plant, for Refractory material, unspecified, at plant: 1
- causal, Aluminum, cast, lost foam, at plant, for Sulfur oxides: 1
- causal, Aluminum, cast, lost foam, at plant, for Plasticshot, polymethylmethacrylate, at plant: 1
- causal, Aluminum, cast, lost foam, at plant, for Oils, unspecified: 1
- causal, Alumimum scrap, at lost foam casting, for Refractory material, unspecified, at plant: 0
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
## Sources
- Vehicle Recycling Partnership (VRP)
