# Palm kernels, at plant

Dataset: openLCA process, unit process
Category: 11: Agriculture, Forestry, Fishing and Hunting/1111: Oilseed and Grain Farming
Geography: Northern America
Time period: 1984-12-31 to 1990-12-31
Allocation method: no allocation
Generated by: Franklin Associates
Published in: THE PLASTICS DIVISION OF THE AMERICAN C
restrictionsDescription: All information can be accessed by everybody.
copyright: false

## General comment
Bunch ash, crude palm oil, and shells used in road construction have been treated as coproducts, for which credit has been given on a mass basis. Mass imbalance is due to unavailability of the weight of empty fruit bunches sent to incineration. Complete inventory data and metadata are available in full in the final report and appendices, Cradle-to-Gate Life Cycle Inventory of Nine Plastic Resins and Four Polyurethane Precursors. This report has been extensively reviewed within Franklin Associates and has undergone partial critical review by ACC Plastics Division members and is available at: www.americanchemistry.com. Quantities may vary slightly between the reference to main source and and this module due to rounding. Important note: although most of the data in the US LCI database has undergone some sort of review, the database as a whole has not yet undergone a formal validation process. Please email comments to lci@nrel.gov.

## Technology
Stem sterilization, and incineration of fresh fruit bunches followed by mechanical processing, and centrifuge separation

## Geography
Maylasia

## Reference product
- Palm kernels, at plant [RNA]: 1 kg

## Inputs from technosphere
- Harvesting, fresh fruit bunch, at farm [RNA]: 2.98 kg; provider Harvesting, fresh fruit bunch, at farm, 2003
- Disposal, solid waste, unspecified, to sanitary landfill: 0.0197 kg
- Wood waste, unspecified, combusted in industrial boiler [RNA]: 1.4 kg
- Transport, single unit truck, diesel powered [RNA]: 0.0604147 t*km

## Emissions to nature
- Volatile organic compounds [emission, air]: 0.00052 kg
- Methane [emission, air]: 0.02297 kg
- Carbon dioxide [emission, air]: 0.631 kg
- Carbon monoxide [emission, air]: 0.00011 kg
- Suspended solids, inorganic [emission, water]: 0.00073 kg
- Nitrogen oxides [emission, air]: 0.00027 kg
- Total dissolved solids [emission, water]: 0.00507 kg
- Oil and grease, unspecified [emission, water]: 4.8e-5 kg
- Nitrogen [emission, water]: 9.7e-5 kg
- Sulfur oxides [emission, air]: 0.00105 kg
- Particulate matter [emission, air]: 0.003 kg
- Biological Oxygen Demand [emission, water]: 0.00018 kg
- Chemical Oxygen Demand [emission, water]: 0.00163 kg
- Hydrogen sulfide [emission, air, troposphere, rural]: 0.00015 kg

## Sampling procedure
Data are from secondary sources.

## Sources
- THE PLASTICS DIVISION OF THE AMERICAN C
