# Aluminum, secondary, shape casted

Dataset: openLCA process, unit process
Category: 31-33: Manufacturing/3313: Alumina and Aluminum Production and Processing
Geography: Northern America
Time period: 1997-12-31 to 1997-12-31
Allocation method: no allocation
Generated by: James Littlefield, Franklin Associates
Published in: Franklin Associates
restrictionsDescription: All information can be accessed by everybody.
copyright: false

## General comment
Separate unit processes are shown for automotive and UBC (used beverage container) scrap; however, it was determined that the recovery rates and processing requirements for these 2 markets are similar, and thus the results for the 2 markets are the same. Atmospheric, waterborne, and solid waste emissions represent process emissions only, not fuel combustion emissions.,
Important note: although most of the data in the US LCI database has
undergone some sort of review, the database as a whole has not yet
undergone a formal validation process.
Please email comments to lci@nrel.gov.

## Geography
North America

## Reference product
- Aluminum, secondary, shape casted [RNA]: 1 kg

## Inputs from technosphere
- Disposal, solid waste, unspecified, to sanitary landfill: 0.03538 kg
- Alloying additives, at plant: 0.025 kg
- Chemicals, unspecified, used for wastewater treatment: 0.01 kg
- Quicklime, at plant [RNA]: 2.82e-5 kg
- Electricity, at grid [RNA]: 0.8268 kWh; provider Electricity, at Grid, US, 2010
- Aluminum, secondary, ingot, at plant [RNA]: 0.975 kg
- Sodium hydroxide, production mix, at plant [US]: 0.003 kg; provider Chlorine, production mix, at plant
- Filter media, at plant: 5.81e-5 kg
- Treatment salts, unspecified, at plant: 0.01 kg
- Natural gas, combusted in industrial boiler [RNA]: 0.5635 m3
- Treatment gases, unspecified, at plant: 0.011 kg
- Grain refiners, at plant: 0.0003 kg
- Silica sand, at mine: 0.03538 kg
- Lube oil, at plant: 1.055e-6 kg
- Packaging, unspecified, at plant: 2e-5 kg

## Emissions to nature
- Biological Oxygen Demand [emission, water]: 1.1087e-6 kg
- Lead [emission, air]: 2.59e-7 kg
- Acid compounds [emission, air]: 0.0009139 kg
- Chemical Oxygen Demand [emission, water]: 1.03e-6 kg
- Particulate matter [emission, air]: 2.09e-7 kg
- Organic compounds [emission, water]: 1.55e-6 kg
- Total dissolved solids [emission, water]: 2.87e-8 kg
- Suspended solids, inorganic [emission, water]: 5.49e-5 kg
- Metals [emission, water]: 2.71e-5 kg
- Volatile organic compounds [emission, air]: 5.6e-5 kg

## Sources
- The Aluminum Association
- Franklin Associates
- unspecified
- unspecified
