# Semi-permanent mold (SPM) casting, aluminum

Dataset: openLCA process, unit process
Category: 31-33: Manufacturing/3315: Foundries
Geography: Northern America
Time period: 1995-12-31 to 2000-12-31
Allocation method: no allocation
Generated by: James Littlefield
Published in: Vehicle Recycling Parnership (VRP)
restrictionsDescription: All information can be accessed by everybody.
copyright: false

## General comment
No co-product allocation for scrap materials; all environmental flows for scrap are included in the environmental flows for the product. A percent difference is calculated in cases when 2 plants reported the same data point; the percent difference is calculated by dividing the difference between the 2 plants by the average of the 2 plants.
Important note: although most of the data in the US LCI database has
undergone some sort of review, the database as a whole has not yet
undergone a formal validation process.
Please email comments to lci@nrel.gov.

## Technology
representative of current SPM casting technologies

## Geography
United States

## Reference product
- Aluminum, cast, semi-permanent mold (SPM), at plant [RNA]: 1 kg
  Average of 2 plants

## By-products
- Byproduct of aluminum casting, SPM, liquid residuals [RNA]: 0.0168 kg
  Average of 2 plants. Composition by weight: 74% oily water and 25% sulfuric acid/amines.
- Aluminum scrap, at semi-permanent mold casting [RNA]: 0.669 kg
  Average of 2 plants. Composition by weight: 56% salt, 32% sand, 4% aluminum dross/scrap/flashing/chips, 5% irony offal, 3% pallets/dust/cardboard.

## Inputs from technosphere
- Cleaning blast, at plant: 0.0032 kg
  Represents 1 plant. Includes glass oxide and chemicals for removing flash.
- Hydraulic fluid, at plant: 0.0035 kg
  Represents 1 plant.
- Aluminum ingot, production mix, at plant [US]: 1.09 kg
  This is the average of total aluminum inputs for 2 plants. There's a 13% difference between the 2 plants. Aluminum ingot includes a combination of 319 and 356 alloys. Weight of ingot includes alloying materials.
- Oxygen, liquid, at plant [RNA]: 0.257 kg
  Represents 1 plant. Oxygen combustion in rotaries.
- Oil, at plant: 0.0031 kg
  Represents 1 plant. Includes mostly paraffinic petroleum distallates; these fluids are used as lubrication oils, greases, and lubricating sprays.
- Disposal, solid waste, unspecified, to sanitary landfill: 0.661 kg
  Average of 2 plants.
- Disposal, liquid wastes, unspecified, to sanitary landfill: 0.0002 kg
  Average of 2 plants.
- Carbon dioxide, liquid, at plant: 0.013 kg
  Average of 2 plants. There's a 134% difference between the 2 plants. Carbon dioxide is used to clean molds.
- Core coating for aluminum casting: 0.00037 kg
  Represents 1 plant.
- Quicklime, at plant [RNA]: 0.0083 kg
  Represents 1 plant. Lime is used to clean emissions from rotaries.
- Flux, at plant: 0.225 kg
  Represents 1 plant. Flux is comprised of KCl, NaCl, various carbonates, silicas, and oxides.
- Isocyanate resin, at plant: 0.0177 kg
  Average of 2 plants. There's an 8% difference between the 2 plants. Resin system is A and B stage: isocyanate and phenolic.
- TEA-DMEA (trimethyl amine, dimethylamine), at plant: 0.00381 kg
  Average of 2 plants. There's an 11% difference between the 2 plants.
- Natural gas, combusted in industrial boiler [RNA]: 0.917 m3
  Average of 2 plants. There's a 37% difference between the 2 plants. In this case, one plant is higher for both natural gas and electricity consumption.
- Sulfuric acid, at plant: 0.00151 kg
  Average of 2 plants. There's a 15% difference between the 2 plants. Sulfuric acid is used for TEA gas abatement system.
- Release agent, unspecified, at plant: 0.0005 kg
  Represents 1 plant. Release agent is 59% silicates and 39% water.
- Electricity, at grid [RNA]: 1.92 kWh; provider Electricity, at Grid, US, 2010
  Average of 2 plants. There's a 36% difference between the 2 plants. In this case, one plant is higher for both natural gas and electricity consumption.
- Nitrogen, at plant: 0.0382 kg
  Average of 2 plants. There's an 80% difference between the 2 plants. Nitrogen is used to de-gas and cover.

## Inputs from nature
- Quartz, sand [resource, ground]: 0.825 kg
  Average of 2 plants. There's a 108% difference between the 2 plants.
- Water [resource, water]: 4.56 kg
  Average of 2 plants. There's a 77% difference between the 2 plants.

## Emissions to nature
- Orthophosphate [emission, water]: 3.62e-7 kg
  Represents 1 plant. Measured process emissions.
- Triethylamine [emission, air]: 3.63e-5 kg
  Represents 1 plant. Based on published emission factors for process emissions.
- Nitrogen oxides [emission, air]: 0.00066 kg
  Represents 1 plant. Measured values after abatement which includes both process and on-site fuel emissions.
- Biological Oxygen Demand [emission, water]: 4.48e-5 kg
  Represents 1 plant. Measured process emissions.
- Sulfur oxides [emission, air]: 2e-5 kg
  (same comment as for Nitrogen oxides)
- Aluminum [emission, water]: 3.62e-6 kg
  Represents 1 plant. Measured process emissions.
- Manganese compounds [emission, air]: 5e-7 kg
  Represents 1 plant. Based on published emission factors for process emissions.
- Zinc compounds [emission, air]: 1e-6 kg
  Represents 1 plant. Based on published emission factors for process emissions.
- Aluminum [emission, air]: 1.5e-5 kg
  Represents 1 plant. Based on published emission factors for process emissions.
- Oils, unspecified [emission, water]: 8.61e-6 kg
  Represents 1 plant. Measured process emissions.
- Di(2-ethylhexyl) adipate [emission, air]: 1.59e-5 kg
  Represents 1 plant. Based on published emission factors for process emissions.
- Particulate matter [emission, air]: 0.0141 kg
  (same comment as for Nitrogen oxides)
- Suspended solids, inorganic [emission, water]: 9.65e-5 kg
  Represents 1 plant. Measured process emissions.
- Copper compounds [emission, air]: 5.75e-6 kg
  Represents 1 plant. Based on published emission factors for process emissions.
- Phenol [emission, air]: 1e-6 kg
  Represents 1 plant. Based on published emission factors for process emissions.
- Volatile organic compounds [emission, air]: 0.00434 kg
  (same comment as for Nitrogen oxides)
- Carbon monoxide [emission, air]: 0.00016 kg
  (same comment as for Nitrogen oxides)
- Copper(I) [emission, water]: 4.82e-8 kg
  Represents 1 plant. Measured process emissions.
- 2,3,7,8-Tetrachlorodibenzo-p-dioxin [emission, air]: 4e-6 kg
  Represents 1 plant. Based on published emission factors for process emissions.
- Zinc [emission, water]: 4.48e-7 kg
  Represents 1 plant. Measured process emissions.
- Chromium [emission, water]: 1.21e-8 kg
  Represents 1 plant. Measured process emissions.
- Carbon dioxide [emission, air]: 1.12 kg
  (same comment as for Nitrogen oxides)
- Phenol [emission, water]: 3.44e-8 kg
  Represents 1 plant. Measured process emissions.

## Allocation factors
- causal, Aluminum, cast, semi-permanent mold (SPM), at plant, for Disposal, solid waste, unspecified, to sanitary landfill: 1
- causal, Aluminum, cast, semi-permanent mold (SPM), at plant, for Copper compounds: 1
- causal, Aluminum, cast, semi-permanent mold (SPM), at plant, for Natural gas, combusted in industrial boiler: 1
- causal, Byproduct of aluminum casting, SPM, liquid residuals, for Oxygen, liquid, at plant: 0
- causal, Aluminum, cast, semi-permanent mold (SPM), at plant, for Aluminum: 1
- causal, Aluminum scrap, at semi-permanent mold casting, for Sulfuric acid, at plant: 0
- causal, Aluminum scrap, at semi-permanent mold casting, for Natural gas, combusted in industrial boiler: 0
- causal, Aluminum scrap, at semi-permanent mold casting, for Electricity, at grid: 0
- causal, Aluminum scrap, at semi-permanent mold casting, for Copper compounds: 0
- causal, Byproduct of aluminum casting, SPM, liquid residuals, for Cleaning blast, at plant: 0
- causal, Aluminum scrap, at semi-permanent mold casting, for 2,3,7,8-Tetrachlorodibenzo-p-dioxin: 0
- causal, Aluminum scrap, at semi-permanent mold casting, for Cleaning blast, at plant: 0
- causal, Aluminum, cast, semi-permanent mold (SPM), at plant, for Biological Oxygen Demand: 1
- causal, Aluminum, cast, semi-permanent mold (SPM), at plant, for 2,3,7,8-Tetrachlorodibenzo-p-dioxin: 1
- causal, Byproduct of aluminum casting, SPM, liquid residuals, for Chromium: 0
- causal, Aluminum scrap, at semi-permanent mold casting, for Phenol: 0
- causal, Byproduct of aluminum casting, SPM, liquid residuals, for Copper compounds: 0
- causal, Aluminum scrap, at semi-permanent mold casting, for Nitrogen oxides: 0
- causal, Aluminum, cast, semi-permanent mold (SPM), at plant, for Nitrogen oxides: 1
- causal, Aluminum, cast, semi-permanent mold (SPM), at plant, for Quicklime, at plant: 1
- physical, Aluminum, cast, semi-permanent mold (SPM), at plant: 1
- causal, Aluminum scrap, at semi-permanent mold casting, for Carbon dioxide, liquid, at plant: 0
- causal, Aluminum scrap, at semi-permanent mold casting, for Orthophosphate: 0
- causal, Byproduct of aluminum casting, SPM, liquid residuals, for Oils, unspecified: 0
- causal, Aluminum, cast, semi-permanent mold (SPM), at plant, for Chromium: 1
- causal, Aluminum, cast, semi-permanent mold (SPM), at plant, for Carbon dioxide: 1
- causal, Aluminum, cast, semi-permanent mold (SPM), at plant, for Phenol: 1
- causal, Aluminum scrap, at semi-permanent mold casting, for Chromium: 0
- causal, Aluminum, cast, semi-permanent mold (SPM), at plant, for Hydraulic fluid, at plant: 1
- causal, Aluminum scrap, at semi-permanent mold casting, for Aluminum: 0
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
## Sources
- Vehicle Recycling Parnership (VRP)
