# Compression molding, rigid composites part, at plant

Dataset: openLCA process, unit process
Category: 31-33: Manufacturing/3261: Plastics Product Manufacturing
Geography: United States
Time period: 2010-12-31 to 2011-12-31
Allocation method: no allocation
Generated by: Franklin Associates
Published in: American Composites Manufacturers Assn.
restrictionsDescription: All information can be accessed by everybody.
copyright: false

## General comment
For each kilogram of composite part fabrication, the amount of incoming corrugated box material is equivalent to that coming out of the process as it is purchased to be used as shipping packaging. An average of 0.0014 kg of rigid composite part scrap is produced for every kilogram of compression molded parts produced; this scrap is sold for recycling. The packaging inputs in this data set represent the average reported per kilogram of output across a range of products produced at manufacturing facilities. Because the solid wastes shown are of unknown types, these could include food wastes, office wastes, or packaging wastes from incoming tools/materials. The data providers could not expound on the source of these solid wastes. The difference in the mass balance likely lays here. Complete inventory data and metadata are shown in full in the final report, Life Cycle Inventory of Polymer Composites. The report is not publicly available. This report has been extensively reviewed within Franklin Associates by Rebe Feraldi, Anne Marie Molen, and Melissa Huff and has undergone partial critical review by ACMA members. Important note: although most of the data in the US LCI database has undergone some sort of review, the database as a whole has not yet undergone a formal validation process. Please email comments to lci@nrel.gov.

## Technology
Fabrication of rigid composite parts by compression molding.

## Geography
US

## Reference product
- Compression molding, rigid composites part, at plant [US]: 1 kg

## By-products
- Corrugate packaging, from compression molding, for shipping [US]: 0.027 kg
- Composite scrap, from composites compression molding, at plant [US]: 0.0014 kg

## Inputs from technosphere
All rows: lognormal geomSd 1
- Diesel, combusted in industrial equipment [RNA]: 0.00024 l
- In-mold coating, styrene-based, at plant: 0.0087 kg
- Unsaturated polyester, resin, at plant [US]: 0.17 kg
- Converted corrugated box, with average bleaching, at plant: 0.027 kg
- Pigment, at plant: 0.0081 kg
- E-glass, at plant [US]: 0.28 kg
- Liquefied petroleum gas, combusted in industrial boiler [RNA]: 0.0027 m3
- Initiator, MEKP, at plant: 0.0085 kg
- Electricity, at grid [RNA]: 1.59 kWh; provider Electricity, at Grid, US, 2010
- Ethylbenzene styrene, EB, at plant [RNA]: 0.034 kg
- Transport, ocean freighter, average fuel mix [RNA]: 1.07 t*km
- Disposal, solid waste, unspecified, to waste-to-energy: 0.0014 kg
- Aluminum hydroxide, at plant: 0.24 kg
- Limestone, at mine [RNA]: 0.22 kg
- Thickener, at plant: 0.011 kg
- Disposal, solid waste, unspecified, to municipal incineration: 0.0029 kg
- Disposal, solid waste, unspecified, to sanitary landfill: 0.09 kg
- Co-resin, UPR and styrene-based, at plant: 0.015 kg
- Additive, low-profile, at plant: 0.019 kg
- Natural gas, combusted in industrial boiler [RNA]: 0.0079 m3
- Transport, combination truck, diesel powered [RNA]: 1.21 t*km
- Mold-release agent, at plant: 0.014 kg

## Inputs from nature
- Water [resource, water]: 0.45 kg; lognormal geomSd 1

## Emissions to nature
All rows: lognormal geomSd 1
- Nitrogen [emission, air]: 0.0058 kg
- Oxygen [emission, air]: 0.00037 kg
- Volatile organic compounds [emission, air]: 0.00039 kg
- Particulate matter [emission, air]: 9.4e-5 kg
- Ammonia [emission, air]: 2.6e-6 kg
- Sulfur oxides [emission, air]: 1.1e-6 kg
- Styrene [emission, air]: 0.0022 kg
- Carbon dioxide [emission, air]: 9.4e-5 kg
- Nitrogen oxides [emission, air]: 0.00021 kg

## Allocation factors
- causal, Composite scrap, from composites compression molding, at plant, for Ethylbenzene styrene, EB, at plant: 0
- causal, Corrugate packaging, from compression molding, for shipping, for Unsaturated polyester, resin, at plant: 0
- causal, Composite scrap, from composites compression molding, at plant, for Natural gas, combusted in industrial boiler: 0
- causal, Composite scrap, from composites compression molding, at plant, for Transport, ocean freighter, average fuel mix: 0
- causal, Composite scrap, from composites compression molding, at plant, for Co-resin, UPR and styrene-based, at plant: 0
- causal, Composite scrap, from composites compression molding, at plant, for Pigment, at plant: 0
- causal, Corrugate packaging, from compression molding, for shipping, for Transport, combination truck, diesel powered: 0
- causal, Corrugate packaging, from compression molding, for shipping, for E-glass, at plant: 0
- causal, Compression molding, rigid composites part, at plant, for Disposal, solid waste, unspecified, to sanitary landfill: 1
- causal, Compression molding, rigid composites part, at plant, for Disposal, solid waste, unspecified, to municipal incineration: 1
- causal, Compression molding, rigid composites part, at plant, for Thickener, at plant: 1
- causal, Corrugate packaging, from compression molding, for shipping, for Thickener, at plant: 0
- causal, Corrugate packaging, from compression molding, for shipping, for Transport, ocean freighter, average fuel mix: 0
- causal, Compression molding, rigid composites part, at plant, for Unsaturated polyester, resin, at plant: 1
- causal, Corrugate packaging, from compression molding, for shipping, for Natural gas, combusted in industrial boiler: 0
- causal, Composite scrap, from composites compression molding, at plant, for Aluminum hydroxide, at plant: 0
- causal, Compression molding, rigid composites part, at plant, for Additive, low-profile, at plant: 1
- causal, Composite scrap, from composites compression molding, at plant, for Styrene: 0
- causal, Compression molding, rigid composites part, at plant, for Mold-release agent, at plant: 1
- causal, Composite scrap, from composites compression molding, at plant, for Disposal, solid waste, unspecified, to sanitary landfill: 0
- causal, Compression molding, rigid composites part, at plant, for Transport, ocean freighter, average fuel mix: 1
- causal, Compression molding, rigid composites part, at plant, for Transport, combination truck, diesel powered: 1
- causal, Compression molding, rigid composites part, at plant, for E-glass, at plant: 1
- causal, Compression molding, rigid composites part, at plant, for Sulfur oxides: 1
- causal, Corrugate packaging, from compression molding, for shipping, for Additive, low-profile, at plant: 0
- causal, Composite scrap, from composites compression molding, at plant, for Transport, combination truck, diesel powered: 0
- causal, Compression molding, rigid composites part, at plant, for Ethylbenzene styrene, EB, at plant: 1
- causal, Compression molding, rigid composites part, at plant, for Limestone, at mine: 1
- causal, Composite scrap, from composites compression molding, at plant, for Volatile organic compounds: 0
- causal, Compression molding, rigid composites part, at plant, for Oxygen: 1
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
## Sampling procedure
Data are from primary sources. The composites fabricators who provided data for this module verified that the characteristics of their plants are representative of US composites fabrication facilities producing compression molded composite parts. The representativeness of the composites fabrication processes are unknown, but estimated to be less than 10% of the US production volume.

## Sources
- American Composites Manufacturers Assn.
