# Automotive painting, top coat, per m2

Dataset: openLCA process, unit process
Category: 31-33: Manufacturing/3362: Motor Vehicle Body and Trailer Manufacturing
Geography: Northern America
Time period: 2004-12-31 to 2004-12-31
Allocation method: no allocation
Generated by: James Littlefield, Franklin Associates
Published in: VRP (Vehicle Recycling Partnership)
restrictionsDescription: All information can be accessed by everybody.
copyright: false

## General comment
Data are shown on 2 bases: 1) per 1,000 m2 of surface area and 2) per 1,000 vehicles., This unit process is on the basis of 1 square meter of vehicle surface area.
Important note: although most of the data in the US LCI database has
undergone some sort of review, the database as a whole has not yet
undergone a formal validation process.
Please email comments to lci@nrel.gov.

## Technology
Representative of current industry practices

## Geography
North America

## Reference product
- Automotive painting, top coat, per m2 [RNA]: 1 m2

## Inputs from technosphere
- Disposal, benzene, 1,2,4-trimethyl-, to sanitary landfill: 5.89e-7 kg
  In sludge from wastewater treatment and painting operations
- Disposal, acetone, to sanitary landfill: 6.79e-7 kg
  In sludge from wastewater treatment and painting operations
- Materials for basecoat painting, at plant: 3.52e-5 m3
  (Basecoat materials depend on paint color, but common components include Dipropylene Glycol Monomethyl Ether, Propylene Glycols, and Odorless Mineral Spirits. Pigments include carbon black, titanium dioxide, and iron oxide. No data are available on the percent share by weight of each of these components in the basecoat.)
- Disposal, stoddard solvent, to sanitary landfill: 2.94e-7 kg
  In sludge from wastewater treatment and painting operations
- Disposal, chemical waste, unspecified, to sanitary landfill: 8.37e-7 kg
  In sludge from wastewater treatment and painting operations
- Disposal, ferric oxide, to sanitary landfill: 8.17e-5 kg
  In sludge from wastewater treatment and painting operations
- Tinted clearcoat materials, at plant: 2.54e-6 m3
  (Tinted clearcoat includes Dipropylene Glycol Monomethyl Ether, Acetone, Butyl Alcohol, n-Butyl Acetate, Pseudocumene, Xylene, and Isostearic Acid. No data are available on the percent share by weight of each of these components in the tinted clearcoat.)
- Disposal, light aromatic solvent naphtha, to sanitary landfill: 2.4e-6, 4.53e-8 kg (2 entries)
  In sludge from wastewater treatment and painting operations
- Disposal, copper compounds, to sanitary landfill: 1.99e-6 kg
  In sludge from wastewater treatment and painting operations
- Electricity, at grid [RNA]: 0.939 kWh; provider Electricity, at Grid, US, 2010
- Disposal, propylene glycol butyl ether, to sanitary landfill: 1.67e-5 kg
  In sludge from wastewater treatment and painting operations
- Disposal, heavy alkalide naphtha, to sanitary landfill: 8.37e-7 kg
  In sludge from wastewater treatment and painting operations
- Clearcoat material, at plant: 1.68e-5 m3
  (Clearcoat includes Dipropylene Glycol Monomethyl Ether, Acetone, Butyl Alcohol, n-Butyl Acetate, Pseudocumene, Xylene, and Amyl Alcohol. No data are available on the percent share by weight of each of these components in the clearcoat.)
- Water, at user: 0.706 kg
- Disposal, 1-methoxy-2-propanol, to sanitary landfill: 1.13e-7 kg
  In sludge from wastewater treatment and painting operations
- Disposal, carbon black, to sanitary landfill: 1.96e-5 kg
  In sludge from wastewater treatment and painting operations
- Disposal, n-butyl alcohol, to sanitary landfill: 7.92e-7 kg
  In sludge from wastewater treatment and painting operations

## Emissions to nature
- Diethylene glycol monobutyl ether [emission, air]: 8.44e-10 kg
- Heavy alkalide naphtha, unspecified [emission, air]: 8.5e-7 kg
- Volatile organic compounds [emission, air]: 0.0156 kg
- Copper compounds [emission, water]: 1.81e-10 kg
- 1-Butanol [emission, air]: 7.96e-7 kg
- Light aromatic solvent naphtha, unspecified [emission, air]: 2.41e-6, 5.47e-8 kg (2 entries)
- Propylene glycol monobutyl ether [emission, air]: 1.66e-6 kg
- Acetone [emission, air]: 6.76e-7 kg
- 1,2,4-Trimethylbenzene [emission, air]: 5.79e-7 kg
- Ferric oxide [emission, air]: 8.44e-10 kg
- Propylene glycol 1-methyl ether [emission, air]: 1.09e-7 kg
- Hydrocarbons [emission, air]: 2.85e-7 kg
- Carbon black [emission, air]: 1.95e-10 kg
- Ethylene glycol monobutyl ether [emission, air]: 5.26e-9 kg

## Sources
- VRP (Vehicle Recycling Partnership)
