# Lignite coal, at surface mine

Dataset: openLCA process, unit process
Category: 21: Mining, Quarrying, and Oil and Gas Extraction/2121: Coal Mining
Geography: Northern America
Time period: 1992-12-31 to 2001-12-31
Allocation method: no allocation
Generated by: Franklin Associates
Published in: Franklin Associates
restrictionsDescription: All information can be accessed by everybody.
copyright: false

## General comment
Important note: although most of the data in the US LCI database has
undergone some sort of review, the database as a whole has not yet
undergone a formal validation process.
Please email comments to lci@nrel.gov.

## Technology
Surface mining of shallow lignite deposits.

## Geography
United States

## Reference product
- Lignite coal, at surface mine [RNA]: 1 kg

## Inputs from technosphere
- Lignite coal, combusted in industrial boiler [RNA]: 0.000362 kg
- Electricity, at grid [RNA]: 0.0533 kWh; provider Electricity, at Grid, US, 2010
- Residual fuel oil, combusted in industrial boiler [RNA]: 0.00145 l
- Natural gas, combusted in industrial boiler [RNA]: 0.000251 m3
- Diesel, combusted in industrial boiler [RNA]: 0.015 l
- Gasoline, combusted in equipment [RNA]: 0.00141 l
- Disposal, solid waste, unspecified, to unspecified treatment: 0.235 kg

## Inputs from nature
- Coal, bituminous [resource, ground]: 24.8 MJ

## Emissions to nature
- Methane [emission, air]: 0.00113 kg
- Iron [emission, water]: 2.65e-8 kg
- Particulate matter [emission, air]: 9.8e-5 kg
- Suspended solids, inorganic [emission, water]: 1.98e-6 kg
- Manganese [emission, water]: 1.76e-7 kg

## Sources
- Energy Information Administration
- Franklin Associates
- unspecified
- unspecified
- unspecified
- D.A. Kirchgessner
- U.S. Census bureau
- unspecified
- unspecified
- Energy Information Administration
- Energy Information Administration
- US LCI Mini-Report with Sources Detail
- Energy Information Administration
- unspecified
- U.S. Department of Energy
- Hong, B.D
- Energy Information Administration
- Energy Information Administration
- U.S. EPA
- U.S. EPA
- USGS
