# Transport, light commercial truck, gasoline powered, West North Central

Dataset: openLCA process, unit process
Category: 48-49: Transportation and Warehousing/4841: General Freight Trucking
Geography: Northern America
Time period: 2009-12-31 to 2009-12-31
Allocation method: no allocation
Generated by: Nathan Hardesty
Published in: U.S. Environmental Protection Agency (EP
restrictionsDescription: All information can be accessed by everybody.
copyright: false

## General comment
This dataset represents the West North Central U.S. (MT, NE, ND, SD, WY (Reference 10)) average airborne emissions for operating a gasoline powered light commercial truck. The inventory includes all vehicle operation processes, including off-network and refueling activities.
The refinery-to-pump transportation and distribution data are calculated from Argonne National Laboratory's GREET 1.8d.1 model.
The vehicle operation data are calculated from EPA's MOVES2010a model, using the assumptions described in the corresponding detailed spreadsheet. Emissions factors in MOVES2010a are largely based on EPA's Mobile Source Observation Database, which in turn includes data from a variety of vehicle studies (References 6-8).
MOVES2010a acknowledges sources of uncertainty in the model structure, the population and acitivty data, and other model parameters. As of July 2011, the uncertainty calculation function of the model has not been activated.

## Technology
Combustion of gasoline in a light commercial truck.

## Geography
US

## Reference product
- Transport, light commercial truck, gasoline powered [RNA]: 1 t*km

## Inputs from technosphere
- Transport, barge, average fuel mix [RNA]: 0.0424353 t*km
- Transport, combination truck, average fuel mix [RNA]: 0.0654994 t*km
- Transport, pipeline, unspecified petroleum products [RNA]: 0.642918 t*km
- Gasoline, at refinery: 0.224931 l; provider Petroleum refining, at refinery
- Transport, train, diesel powered [RNA]: 0.122289 t*km
- Transport, ocean freighter, average fuel mix [RNA]: 0.559998 t*km

## Emissions to nature
- Particulate matter, ≤ 10μm [emission, air]: 3.92397e-5 kg
  PM10 from organic carbon, elemental carbon, and sulfate particulates.
- Particulate matter, ≤ 2.5μm [emission, air]: 4.14578e-6 kg
  PM2.5 from brakewear.
- Nitrogen oxides [emission, air]: 0.00181914, 0.00163923 kg (2 entries)
- Nitrous oxide [emission, air]: 3.99815e-5 kg
- Particulate matter, ≤ 2.5μm [emission, air]: 1.36278e-6 kg
  PM2.5 from tirewear.
- Particulate matter, ≤ 2.5μm [emission, air]: 3.61324e-5 kg
  PM2.5 from organic carbon, elemental carbon, and sulfate particulates.
- Particulate matter, ≤ 10μm [emission, air]: 5.68281e-6 kg
  PM10 from tirewear.
- Hydrocarbons [emission, air]: 0.00130086 kg
- Particulate matter, ≤ 10μm [emission, air]: 1.58369e-5 kg
  PM10 from brakewear.
- Volatile organic compounds [emission, air]: 0.00133754 kg
- Sulfur dioxide [emission, air]: 1.02103e-5 kg
- Methane [emission, air]: 7.69206e-5 kg
- Nitrogen dioxide [emission, air]: 0.000179912 kg
- Carbon monoxide [emission, air]: 0.0171016 kg
- Carbon dioxide [emission, air]: 0.522998 kg
- Ammonia [emission, air]: 3.94048e-5 kg

## Sources
- Assessment and Standards Division, Offic
- National Institute of Standards and Tech
- Wang, M.
- National Climatic Data Center, National
- U.S. Alternative Fuels and Advanced Vehi
- U.S. Environmental Protection Agency (EP
- Eastern Research Group
- Assessment and Standards Division, Offic
- Transportation Characteristics Branch, U
- EPA
