# Petroleum refining, for olefins production, at plant

Dataset: openLCA process, unit process
Category: 31-33: Manufacturing/3241: Petroleum and Coal Products Manufacturing
Geography: Northern America
Time period: 2002-12-31 to 2002-12-31
Allocation method: no allocation
Generated by: Franklin Associates
Published in: THE PLASTICS DIVISION OF THE AMERICAN C
restrictionsDescription: All information can be accessed by everybody.
copyright: false

## General comment
This module expresses data on the basis 1 kilogram of general refinery product as well as data allocated to specific refinery products. The data are allocated to specific refinery products based on the percent by mass of each product in the refinery output. Refinery products include gasoline, distillate/diesel oil, LPG, residual oil, kerosene/jet fuel, and other (still gas, petroleum, coke, asphalt, and petrochemical feedstocks). Complete inventory data and metadata are available in full in the final report and appendices, Cradle-to-Gate Life Cycle Inventory of Nine Plastic Resins and Four Polyurethane Precursors. This report has been extensively reviewed within Franklin Associates and has undergone partial critical review by ACC Plastics Division members and is available at: www.americanchemistry.com. Quantities may vary slightly between the reference to main source and and this module due to rounding. Important note: although most of the data in the US LCI database has undergone some sort of review, the database as a whole has not yet undergone a formal validation process. Please email comments to lci@nrel.gov.

## Technology
Desalting, atmospheric distillation, vacuum distillation, and hydrotreating

## Geography
US

## Reference product
- Petroleum refining, for olefins production, at plant [RNA]: 1 kg

## Inputs from technosphere
- Natural gas, combusted in industrial boiler [RNA]: 0.0111 m3
- Liquefied petroleum gas, combusted in industrial boiler [RNA]: 0.00114923 l
- Disposal, solid waste, unspecified, to sanitary landfill: 0.00560421 kg
- Residual fuel oil, combusted in industrial boiler [RNA]: 0.0272 l
- Electricity, at grid [RNA]: 0.143 kWh; provider Electricity, at Grid, US, 2010
- Transport, barge, diesel powered [RNA]: 0.000288148 t*km
  Values for barge transport are calculated based on average fuel consumption rates as reported in Transportation Energy Data Book: Edition 22 from Oak Ridge National Laboratory, September 2002: 22% of barges use diesel fuel in their engines, 78% use residual oil to generate steam for steam turbines, and a barge that consumes residual oil consumes 3.4 gallons per 1,000 ton-miles
- Transport, barge, residual fuel oil powered [RNA]: 0.000958092 t*km
  (same comment as for Transport, barge, diesel powered)
- Crude oil, extracted [RNA]: 1.018 kg
  This weight reflects material loss at processing. INTERNAL OFFGAS USE.
- Transport, ocean freighter, residual fuel oil powered [US]: 4.4089 t*km
  Values for ocean freighter transport are calculated based on average fuel consumption rates as determined from a personal communication with Rich Sonnenschein, U.S. Department of Transportation, Maritime Administration in February 2004: 10% of ocean freighters use diesel fuel, 90% use residual fuel, and a freighter that consumes residual fuel consumes 1.9 gallons per 1,000 ton-miles
- Transport, ocean freighter, diesel powered [US]: 0.489877 t*km
  (same comment as for Transport, ocean freighter, residual fuel oil powered)
- Transport, pipeline, unspecified petroleum products [RNA]: 0.652171 t*km

## Emissions to nature
- Biological Oxygen Demand [emission, water]: 3.4e-5 kg
- Volatile organic compounds [emission, air]: 0.002 kg
- Suspended solids, inorganic [emission, water]: 2.8e-5 kg
- Methane [emission, air]: 7.1e-5 kg
- Polycyclic organic matter [emission, air]: 5.6e-8 kg
- Chromium [emission, air]: 6.76e-10 kg
- Particulate matter, ≤ 10μm [emission, air]: 0.0024 kg
- Lead [emission, water]: 9.8e-10 kg
- Antimony [emission, air]: 2.04e-9 kg
- CFC-13 [emission, air]: 2.2e-8 kg
- Ammonia [emission, air]: 2.1e-5 kg
- Nitrogen oxides [emission, air]: 0.00033 kg
- Carbon dioxide [emission, air]: 0.00025 kg
- Phenol [emission, water]: 2.3e-7 kg
- Carbon tetrachloride [emission, air]: 1.2e-11 kg
- Ammonia [emission, water]: 1.5e-5 kg
- Sulfide [emission, water]: 1.9e-7 kg
- Arsenic [emission, air]: 2.57e-10 kg
- Nickel [emission, air]: 5.75e-9 kg
- Particulate matter, ≤ 2.5μm [emission, air]: 0.00024 kg
- Selenium [emission, water]: 1.6e-9 kg
- Chemical Oxygen Demand [emission, water]: 0.00023 kg
- Ethylene dibromide [emission, air]: 4.3e-9 kg
- Sulfur oxides [emission, air]: 0.0024 kg
- Oils, unspecified [emission, water]: 1.1e-5 kg
- Vanadium [emission, water]: 5.4e-8 kg
- Carbon monoxide [emission, air]: 0.013 kg
- Benzene [emission, air]: 1.1e-6 kg
- Mercury [emission, water]: 6e-11 kg
- Chromium [emission, water]: 3e-9 kg

## Sampling procedure
Data collected from secondary sources.

## Sources
- THE PLASTICS DIVISION OF THE AMERICAN C
