# Recycled postconsumer HDPE pellet

Dataset: openLCA process, unit process
Category: 31-33: Manufacturing/3259: Other Chemical Product and Preparation Manufacturing
Geography: Northern America
Time period: 2006-12-31 to 2008-12-31
Allocation method: no allocation
Generated by: Franklin Associates
restrictionsDescription: All information can be accessed by everybody.
copyright: false

## General comment
Important note: although most of the data in the US LCI database has
undergone some sort of review, the database as a whole has not yet
undergone a formal validation process.
Please email comments to lci@nrel.gov.

## Technology
Typical

## Geography
United States

## Reference product
- Recycled postconsumer HDPE pellet [RNA]: 1 kg
  Depending on the practitioner's choice of methodology, some share of the virgin material burdens for initially producing the plastic may be allocated to the recycled resin.

## Inputs from technosphere
- Electricity, at grid [RNA]: 0.49 kWh; provider Electricity, at Grid, US, 2010
- Diesel, combusted in industrial boiler [RNA]: 0.00018 l
- Liquefied petroleum gas, combusted in industrial boiler [RNA]: 0.0011 l
- Disposal, solid waste, unspecified, to incineration with energy recovery: 0.013 kg
- Wetting agent, unspecified: 0.00057 kg
- Natural gas, combusted in industrial boiler [RNA]: 0.0077 m3
- Defoamant, unspecified: 0.00152 kg
- Transport, combination truck, diesel powered [RNA]: 0.911123 t*km
  Represents transport of inbound material (HDPE and contaminants).
- Alkaline cleaner, unspecified: 6e-5 kg
- Disposal, solid waste, unspecified, to unspecified landfill: 0.066 kg
  Wastes landfilled or incinerated include bale wire trash, labels, PVC in incoming bale, and other materials that become processing wastes or sludges.
- Deposit containers, at collection, CRV [RNA]: 0.046397 kg
  Percentage of postconsumer HDPE collected via California container refund value (CRV) system. Includes wt of contaminants in incoming material.
- Mixed recyclables, sorted at MRF [RNA]: 1.0326 kg
  Includes wt of contaminants in incoming material from MRF.
- Surfactant, unspecified: 0.00077 kg
- Sodium hydroxide, production mix, at plant [US]: 0.00027 kg; provider Chlorine, production mix, at plant
  Pure weight of NaOH for the solution used

## Inputs from nature
- Water [resource, water]: 3912.45 kg
  Water input to washing

## Emissions to nature
- Water [emission, air]: 3.46639 m3
  Water returned after washing (reflects evaporative losses of water carried out with washed resin and evaporated during drying)
- Chemical Oxygen Demand [emission, water]: 1.5e-6 kg
- Biological Oxygen Demand [emission, water]: 0.0003 kg
  Unknown how much of the waterborne emissions are from washing chemicals versus material washed off received plastic. These emissions are not included in the material balance.
- Particulate matter, ≤ 2.5μm [emission, air]: 1.5e-5 kg
- Particulate matter, > 10μm [emission, air]: 2.3e-5 kg
- Suspended solids, inorganic [emission, water]: 0.00029 kg
- Total dissolved solids [emission, water]: 9.1e-6 kg

## Sources
- THE PLASTICS DIVISION OF THE AMERICAN CH
