# Transport, transit bus, CNG powered

Dataset: openLCA process, unit process
Category: 48-49: Transportation and Warehousing/4851: Urban Transit Systems
Geography: Northern America
Time period: 2009-12-31 to 2009-12-31
Allocation method: no allocation
Generated by: Nathan Hardesty
Published in: U.S. Environmental Protection Agency (EP
restrictionsDescription: All information can be accessed by everybody.
copyright: false

## General comment
This dataset represents the U.S. average airborne emissions for operating a CNG (compressed natural gas) powered transit bus. The inventory includes all vehicle operation processes, including off-network and refueling activities.
The refinery-to-pump transportation and distribution data are calculated from Argonne National Laboratory's GREET 1.8d.1 model.
The vehicle operation data are calculated from EPA's MOVES2010a model, using the assumptions described in the corresponding detailed spreadsheet. Emissions factors in MOVES2010a are largely based on EPA's Mobile Source Observation Database, which in turn includes data from a variety of vehicle studies (References 6-8).
MOVES2010a acknowledges sources of uncertainty in the model structure, the population and acitivty data, and other model parameters. As of July 2011, the uncertainty calculation function of the model has not been activated.

## Technology
Combustion of compressed natural gas in a transit bus.

## Geography
US

## Reference product
- Transport, transit bus, CNG powered [RNA]: 1 p*km

## Inputs from technosphere
- Transport, pipeline, unspecified petroleum products [RNA]: 0.00541315 t*km
- Compressed natural gas, at plant: 0.0251011 kg

## Emissions to nature
- Particulate matter, ≤ 10μm [emission, air]: 2.57053e-6 kg
  PM10 from brakewear.
- Hydrocarbons [emission, air]: 8.89287e-5 kg
- Particulate matter, ≤ 2.5μm [emission, air]: 1.56443e-7 kg
  PM2.5 from tirewear.
- Particulate matter, ≤ 10μm [emission, air]: 5.8849e-7 kg
  PM10 from organic carbon, elemental carbon, and sulfate particulates.
- Particulate matter, ≤ 10μm [emission, air]: 6.52369e-7 kg
  PM10 from tirewear.
- Carbon monoxide [emission, air]: 0.00328113 kg
- Nitrogen oxides [emission, air]: 0.000269019 kg
- Particulate matter, ≤ 2.5μm [emission, air]: 5.8849e-7 kg
  PM2.5 from organic carbon, elemental carbon, and sulfate particulates.
- Carbon dioxide [emission, air]: 0.0698404 kg
- Nitrous oxide [emission, air]: 8.90008e-6 kg
- Particulate matter, ≤ 2.5μm [emission, air]: 6.72914e-7 kg
  PM2.5 from brakewear.
- Methane [emission, air]: 2.05378e-6 kg

## Sources
- Assessment and Standards Division, Offic
- National Institute of Standards and Tech
- Wang, M.
- U.S. Alternative Fuels and Advanced Vehi
- U.S. Environmental Protection Agency (EP
- Eastern Research Group
- Assessment and Standards Division, Offic
- unspecified
- EPA
