# Mixed recyclables, sorted at MRF

Dataset: openLCA process, unit process
Category: 56: Administrative and Support and Waste Management and Remediation Services/5629: Remediation and Other Waste Management Services
Geography: Northern America
Time period: 2006-12-31 to 2008-12-31
Allocation method: no allocation
Generated by: Franklin Associates
restrictionsDescription: All information can be accessed by everybody.
copyright: false

## General comment
Important note: although most of the data in the US LCI database has
undergone some sort of review, the database as a whole has not yet
undergone a formal validation process.
Please email comments to lci@nrel.gov.

## Technology
Single-sort high tech 26.3%; dual-sort high tech 25.7%; dual-sort low tech 26.7%; multi-sort low tech 21.3%

## Geography
United States

## Reference product
- Mixed recyclables, sorted at MRF [RNA]: 1 kg
  Because the MRF operating data were allocated over all the pounds of recovered recyclables, this data set can be applied to a kg of any recyclable material output (plastics, paper, steel, aluminum, etc.)

## Inputs from technosphere
- Natural gas, combusted in industrial boiler [RNA]: 2.2e-6 m3
- Liquefied petroleum gas, combusted in industrial boiler [RNA]: 0.0025 l
- Disposal, solid waste, unspecified, to unspecified landfill: 0.087 kg
  Disposal of contaminants removed from material at sorting facility
- Mixed recyclables, to MRF [RNA]: 1.09 kg
  Includes wt of contaminants in incoming material.
- Electricity, at grid [RNA]: 0.016 kWh; provider Electricity, at Grid, US, 2010
- Transport, single unit truck, diesel powered [RNA]: 0.0261 t*km
  Represents transport of inbound material to be sorted, including contaminants
- Transport, combination truck, diesel powered [RNA]: 0.0282 t*km
  Represents transport of inbound material to be sorted, including contaminants
- Diesel, combusted in industrial boiler [RNA]: 0.0018 l

## Sources
- THE PLASTICS DIVISION OF THE AMERICAN CH
