# Prefinished engineered wood flooring, at engineered wood flooring plant, E

Dataset: openLCA process, unit process
Category: 31-33: Manufacturing/3219: Other Wood Product Manufacturing
Geography: United States
Time period: 2006-12-31 to 2006-12-31
Allocation method: no allocation
Generated by: Maureen Puettmann
Published in: Richard D. Bergman
restrictionsDescription: All information can be accessed by everybody.
copyright: false

## General comment
All weights given on an ovendry basis. All moisture contents are on an ovendry basis. MC% =(weight of water in wood / weight of oven dry wood) *100. Reference to specific gravities use oven dry mass and volumes at specified moisture contents. Reference to densities use mass and volume at specified moistrue contents.

Important note: although most of the data in the US LCI database has
undergone some sort of review, the database as a whole has not yet
undergone a formal validation process.
Please email comments to lci@nrel.gov.

## Technology
Average Transportation Distance

## Geography
E= Eastern US United States. The states included MN, IA, MO, WI, IL, NJ, OH, IN, MI, WV, PA, MD, DW, NJ, NY, ME, VT, NH, RI, MA, CT, VA, KY, AR, LA, MS, AL, FL,GA, NC, SC, and TN

## Reference product
- Prefinished engineered wood flooring; at engineered wood flooring plant [US]: 1 m3
  Finished product ready to install

## Inputs from technosphere
- Electricity, at grid [RNA]: 295.346 kWh; provider Electricity, Eastern US, 2014
  Emission control device, at engineered wood flooring plant; 87.2% of total electricty used for emission control devices. Total ECD=338.7 kwh. This ECD uses 26.25% of the mills total electricity consumption
- Aluminum oxide sealer, 100% solids: 1.823 kg
  100% solids; 80% of the UV-cured sealer by weight
- Diesel, combusted in industrial equipment [RNA]: 0.3577 l
  Represents 5% of mill use of diesel
- Isoproponal, liquid: 0.421 l
  25% of total cleaning solvents (stain)
- Isobutyl acetate, liquid: 0.076871 l
  20% of total cleaning solvents (coating)
- Electricity, at grid [RNA]: 43.3536 kWh; provider Electricity, Eastern US, 2014
  Emission control device, at veneer plant; 12.8% of total electricty used for emission control devices. Total ECD =338.7 kwh. This ECD uses 3.85% of the mills total electricity consumption
- Engineered flooring; hardwood; unfinished [US]: 1 m3; provider Engineered flooring, hardwood, unfinished, E
- UV-cured stain, 100% solids: 1.401 kg
- Transport, combination truck, diesel powered [RNA]: 0.6964 t*km
  Transportation for stain and associated chemicals
- Heat; drying stain; at engineered wood flooring mill [US]: 401 MJ; provider Heat, drying veneer, hardwood, at veneer mill, E
  Amount of heat energy consumed during the prefinishing process. Represents 35.7% of total process energy for flooring plant
- UV-cured sealer, 100% solids: 3.333 kg
  100% solids
- Electricity, at grid [RNA]: 67.46 kWh; provider Electricity, Eastern US, 2014
  Represents 6% of mill use of electricity
- Acetone, liquid: 0.338044 l
  80% of total cleaning solvents (coating)
- Disposal, solid waste, unspecified, to inert material landfill: 27.65 kg
  General refuge. Represents 92.8% of mill production of solid waste
- Alumina, at plant [RNA]: 0.4559 kg
  Aluminum oxide (alumina) used improve wear resistance of the prefinsihed engineered wood flooring; 20% of the UV-cured sealer by weight
- UV-cured topcoat, 100% solids: 2.614 kg
  100% solids
- Solvent-based stain, 30% solids: 0.2418 kg
- Corrugated cardboard: 40.31 kg
  Used for packaging the prefinished engineered wood flooring for shipping; not counted toward the final product weight
- Recycling, waste, unspecified: 8.033 kg
  Represents 90.6% of mill production of recycling waste
- Isobutyl acetate, liquid: 0.3305 l
  25% of total cleaning solvents (stain)
- Acetone, liquid: 0.6667 l
  40% of total cleaning solvents (stain)
- Natural gas, combusted in industrial equipment, 1.357 m3/kg, 52.13 MJ/kg [RNA]: 0.0004464 m3; provider Natural gas, combusted in industrial equipment
  Represents 14.3% of mill use of natural gas; natural gas is proxy for propane
- UV-cured filler, 100% solids: 3.376 kg
  100% solids
- Transport, combination truck, diesel powered [RNA]: 2.447 t*km
  Transportation for coatings and associated chemicals
- Water-based stain, 20% solids: 0.4333 kg
- Gasoline, combusted in equipment [RNA]: 0.08636 l
  Represents 14.3% of mill use of gasoline
- Butyl acetate, liquid: 0.1496 l
  10% of total cleaning solvents (stain)

## Emissions to nature
- Volatile organic compounds [emission, air, troposphere, rural]: 0.3033 kg
  Amount of VOCs emitted during the prefinsihing process.

## Sampling procedure
Questionnaires from 4 veneer and 5 flooring plants in the E. United States representing 32 states.

## Sources
- Richard D. Bergman
- Maureen Puettmann
