# Electricity, at grid, US, 2000

Dataset: openLCA process, unit process
Category: 22: Utilities/2211: Electric Power Generation, Transmission and Distribution
Geography: Northern America
Time period: 1999-12-31 to 1999-12-31
Allocation method: no allocation
Generated by: Franklin Associates
Published in: Franklin Associates
restrictionsDescription: All information can be accessed by everybody.
copyright: false

## General comment
Important note: although most of the data in the US LCI database has
undergone some sort of review, the database as a whole has not yet
undergone a formal validation process.
Please email comments to lci@nrel.gov.

## Technology
Representative of year 2000 mix of fuels used for utility electricity generation in the U.S. Fuels include coals, fuel oil, nuclear, hydroelectric, and unconventional energy sources. Data are weighted according to percent share of consumption. Includes line loss factor of 9.91%, which represents the difference between electricity generated and electricity sold.

## Geography
United States, excluding Alaska and Hawaii.

## Reference product
- Electricity, at grid [RNA]: 1 MJ

## Inputs from technosphere
- Electricity, biomass, at power plant [RNA]: 0.0158 kWh
  Accounts for average line losses of 9.91%
- Electricity, fossil, unspecified, at power plant: 0.00666 kWh
  Accounts for average line losses of 9.91%
- Electricity, lignite coal, at power plant [RNA]: 0.0287 kWh
  Accounts for average line losses of 9.91%
- Electricity, bituminous coal, at power plant [RNA]: 0.545 kWh
  Accounts for average line losses of 9.91%
- Electricity, photovoltaic, unspecified: 0.000181 kWh
  Accounts for average line losses of 9.91%
- Electricity, residual fuel oil, at power plant [RNA]: 0.031 kWh
  Accounts for average line losses of 9.91%
- Electricity, hydropower, at power plant, unspecified: 0.0778 kWh
  Accounts for average line losses of 9.91%
- Electricity, at wind power plant, unspecified: 0.0016 kWh
  Accounts for average line losses of 9.91%
- Electricity, nuclear, at power plant [RNA]: 0.216 kWh
  Accounts for average line losses of 9.91%
- Electricity, geothermal, unspecified: 0.00401 kWh
  Accounts for average line losses of 9.91%
- Electricity, natural gas, at power plant [RNA]: 0.173 kWh
  Accounts for average line losses of 9.91%

## Sources
- U.S. Environmental Protection Agency
- Franklin Associates
- U.S. Energy Information Administration
