# Electricity, at eGrid, SRMW, 2010

Dataset: openLCA process, unit process
Category: 22: Utilities/2211: Electric Power Generation, Transmission and Distribution
Geography: Northern America
Time period: 2009-12-31 to 2009-12-31
Allocation method: no allocation
Generated by: Samantha Wascavage
Published in: Chris Goemans, Athena Institute
restrictionsDescription: All information can be accessed by everybody.
copyright: false

## General comment
The methodology used to put together the grid information is outlined in reference 1.

## Technology
Typical

## Geography
SRMW Midwest electricity grid to include eastern Missouri (less SPNO) and Southern Illinois (less RFCW).

## Reference product
- Electricity, at grid [RNA]: 1 kWh

## Inputs from technosphere
- Electricity, bituminous coal, at power plant [RNA]: 0.063613 kWh
  Bituminous Coal BIT, SC, SGC, WC - Anthracite Coal, and Bituminous Coal.
- Electricity, bituminous coal, at power plant [RNA]: 0.686976 kWh
  Subbituminous Coal
- Electricity, natural gas, at power plant [RNA]: 0.022654 kWh
  Natural Gas
- Electricity, hydropower, at power plant, unspecified: 0.010794 kWh
  Hydroelectric WAT – Water (Conventional, Pumped Storage)
- Electricity, residual fuel oil, at power plant [RNA]: 2.1e-5 kWh
  Petroleum (RFO) – Residual Fuel Oil (includes No. 5 and No. 6 Fuel Oils and Bunker C Fuel Oil)
- Electricity, tire derived fuel, at power plant: 0.0001 kWh
  Solid Renewable Fuels (Biomass) TDF, AB, MSB, MSW, OBS, WDS - tires, tire derived fuel
- Electricity, at wind power plant, unspecified: 0.013197 kWh
  Wind
- Electricity, nuclear, at power plant [RNA]: 0.191569 kWh
  Nuclear Fission NUC – Nuclear (Uranium, Plutonium, Thorium)
- Electricity, diesel, at power plant [RNA]: 0.010237 kWh
  Petroleum (DFO, JF, KER) – Distillate Fuel Oil (includes all Diesel and No. 1, No. 2, and No. 4 Fuel Oils)
- Electricity, biomass, gas, landfill, at power plant: 0.000797 kWh
  Gaseous Renewable Fuels (Biomass) LFG, OBG - landfill gas

## Sampling procedure
based on EIA electricity reports for all power plants in the US.

## Sources
- EIA
- EIA
- Statistics Canada
- Statistics Canada
- Chris Goemans, Athena Institute
- EIA
- USEPA
- EIA
- Statistics Canada
- EIA
- Statistics Canada
- EIA
- unspecified
- EIA
- USEPA
- EIA
- EIA
- Statistics Canada
- US DOE
- International Energy Agency
- EIA
