# Scanner, i710 desktop and i730EX desktop

Dataset: openLCA process, unit process
Category: 31-33: Manufacturing/3341: Computer and Peripheral Equipment Manufacturing
Geography: Global
Time period: 2014-12-31 to 2015-12-31
Allocation method: no allocation
Generated by: Roy Wood
Reviewer: Jay Mathewson
Published in: Wood. (2016). Greenhouse Gas Life Cycle Assessment Summary Report - Kodak Alaris i710, i703EX, i940, i1150, i1150WN, i1190,i1190E, i1190WN Scanners, ISO 14044 Protocol
restrictionsDescription: All information can be accessed by everybody.
copyright: false

## General comment
This unit process represents the gate-to-gate production of one Kodak Alaris model i710 desktop scanner (mass = 9.94 kg) or one Kodak Alaris model i730EX desktop scanner (mass = 9.94 kg). The system boundary includes: 1) the transport of raw materials to multiple manufacturing facilities where various subcomponents are produced; 2) the manufacture of subcomponents; 3) the transport of subcomponents to a different manufacturing plant for final assembly; 4) the assembly of subcomponents into a complete scanner; and 5) the transport of generated waste from the manufacturing facilities to a municipal solid waste landfill. The following processes and life cycle phases fall outside of the system boundary: 1) packaging of the completed scanner; 2) all transport downstream of the assembly plant gate; 3) sale of product; 4) product use phase; and 5) end-of-life phase (including recycling).

The use of this unit process for the analysis of similar devices requires professional judgement based on the degree of similarity.

## Technology
The manufacture of a desktop scanner that uses 2016 technology including information storage and processing and energy savings features. The manufacture includes the manufacturing of subcomponents at other facilities and assembly at a central location.

## Geography
Data is representative of a global supply chain.

## Time period
Primary data is valid from 2015 - 2016. Secondary data is valid from 2005 - 2016 (National Renewable Energy Laboratory 2016; Wernet et al. 2016).

## Reference product
- Scanner, i710 desktop and i730EX desktop [GLO]: 1 Item(s)
  The mass of 1 Item is 9.94 kg

## Inputs from technosphere
- Cold rolled sheet, steel, at plant: 4.81 kg; triangle minimum 4.9, mode 4.81, maximum 4.72
- polystyrene, expandable - GLO: 0.225 kg; triangle minimum 0.235, mode 0.225, maximum 0.215
- Acrylonitrile-butadiene-styrene, ABS, copolymer resin, at plant [RNA]: 2.4 kg; triangle minimum 2.5, mode 2.4, maximum 2.6
- polypropylene, granulate - GLO: 0.0056 kg; triangle minimum 0.006, mode 0.0056, maximum 0.005
- Transport, combination truck, average fuel mix [RNA]: 19.2 t*km; triangle minimum 15, mode 19.2, maximum 25
  Transport of raw materials and components
- polyurethane, rigid foam - GLO: 0.032 kg; triangle minimum 0.034, mode 0.032, maximum 0.03
- injection moulding: 3.14 kg; triangle minimum 3, mode 3.14, maximum 3.3
- copper, primary, at refinery: 0.106 kg; triangle minimum 0.1, mode 0.106, maximum 0.112
- glass, for liquid crystal display: 0.18 kg; triangle minimum 0.175, mode 0.18, maximum 0.187
  Based on market
- synthetic rubber: 0.0295 kg; triangle minimum 0.028, mode 0.0295, maximum 0.031
  Based on market
- steel, chromium steel, 18/8 - GLO: 0.508 kg; triangle minimum 0.512, mode 0.508, maximum 0.504
- printed wiring board, through-hole mounted, unspecified, Pb free: 0.66 kg; triangle minimum 0.72, mode 0.66, maximum 0.6
- flat glass, uncoated - GLO: 0.19 kg; triangle minimum 0.2, mode 0.19, maximum 0.181
- glass fiber, at plant - US: 0.13 kg; triangle minimum 0.135, mode 0.13, maximum 0.123
- polycarbonate: 0.58 kg; triangle minimum 0.54, mode 0.58, maximum 0.62
  Based on market
- light emitting diode - GLO: 0.019 kg; triangle minimum 0.02, mode 0.019, maximum 0.018
- natural gas, at consumer (16% shale blend): 2.21 MJ; triangle minimum 2.61, mode 2.21, maximum 1.81
- polyvinyl chloride, bulk polymerised - GLO: 0.106 kg; triangle minimum 0.1, mode 0.106, maximum 0.112
- municipal solid waste landfill, operation: 0.05 kg; triangle minimum 0.06, mode 0.05, maximum 0.04
- transport, passenger, aircraft: 3.3 p*km; triangle minimum 3, mode 3.3, maximum 3.6
- Transport, combination truck, average fuel mix [RNA]: 0.01 t*km; triangle minimum 0.015, mode 0.01, maximum 0.005
  Transport of waste
- Aluminum ingot, production mix, at plant [US]: 0.09 kg; triangle minimum 0.095, mode 0.09, maximum 0.085
- nylon 6-6 - GLO: 0.012 kg; triangle minimum 0.013, mode 0.012, maximum 0.011
- petrol, unleaded: 0.51 kg; triangle minimum 0.36, mode 0.51, maximum 0.66
  Based on market
- electricity, low voltage, at grid: 29.45 MJ; triangle minimum 26.5, mode 29.45, maximum 32.5
- metal product manufacturing, average metal working: 5.54 kg; triangle minimum 5.6, mode 5.54, maximum 5.48
- cast iron - GLO: 0.023 kg; triangle minimum 0.024, mode 0.023, maximum 0.022
- Paper, freesheet, uncoated, average production, at mill [RNA]: 0.088 kg; triangle minimum 0.092, mode 0.088, maximum 0.084; provider Paper, freesheet, uncoated, average production, at mill, 2006

## Sampling procedure
BOUNDARY CONDITIONS
The system boundary includes: 1) the transport of raw materials to multiple manufacturing facilities where various subcomponents are produced; 2) the manufacture of subcomponents; 3) the transport of subcomponents to a different manufacturing plant for final assembly; 4) the assembly of subcomponents into a complete scanner; and 5) the transport of generated waste from the manufacturing facilities to a municipal solid waste landfill. The following processes and life cycle phases fall outside of the system boundary: 1) packaging of the completed scanner; 2) all transport downstream of the assembly plant gate; 3) sale of product; 4) product use phase; and 5) end-of-life phase (including recycling).

DATA COLLECTION
For material inputs, data collection was based on scanner specifications provided by the manufacturer. Other inputs (e.g. energy; waste transport and disposal) were calculated on the basis of quantity of input per kg of scanner produced.

UNCERTAINTY ESTIMATION
Uncertainty was estimated based on engineering judgment. Material inputs had less uncertainty because they were based off of precise engineering specifications. Other inputs (e.g. energy; waste transport and disposal) had more uncertainty.

## Review details
This dataset and its companion report (Wood 2016) were internally reviewed by Jay Mathewson of Kodak Alaris.

## Sources
- Wood. (2012). Life Cycle Assessment Summary Report - Kodak i2800, i2600, i2400 Scanners - ISO 14044 Protocol
- Wood. (2016). Greenhouse Gas Life Cycle Assessment Summary Report - Kodak Alaris i710, i703EX, i940, i1150, i1150WN, i1190,i1190E, i1190WN Scanners, ISO 14044 Protocol
- Institute for Environment and Sustainablility. (2011). General guide for Life Cycle Assessment - Detailed guidance.
- National Renewable Energy Laboratory (2016). U.S. Life Cycle Inventory Database.
- Wernet et al. (2016) The ecoinvent database version 3 (part I): overview and methodology.
