# Railroad tie, hardwood, rough, green, at sawmill, SE

Dataset: openLCA process, unit process
Category: 31-33: Manufacturing/3211: Sawmills and Wood Preservation
Geography: United States
Time period: 1899-12-31 to 1899-12-31
Allocation method: physical allocation
Generated by: Chris Bolin;
Reviewer: Richard Bergmann
Published in: Richard D. Bergman
restrictionsDescription: All information can be accessed by everybody.
copyright: false

## General comment
Allocation based on mass.

## Technology
Average technology. Some data extrapolated from similar processes.

## Geography
NE/NC = Northeast (NE) and Northcentral (NC) United States. The 20 states are Connecticut, Delaware, Illinois, Indiana, Iowa, Maine, Maryland, Massachusetts, Michigan, Minnesota, Missouri, New Hampshire, New Jersey, New York, Ohio, Pennsylvania, Rhode Island, Vermont, West Virginia, Wisconsin.

## Reference product
- Railroad tie; hardwood; rough; green; at sawmill [US]: 1 kg

## Inputs from technosphere
- Gasoline, combusted in equipment [RNA]: 0.000152 l
  transporation on-site for forklifts, haulers, and loaders
- Diesel, combusted in industrial equipment [RNA]: 0.00175 l
  transporation on-site for forklifts, haulers, and loaders
- Roundwood; hardwood; green; at logyard [US]: 0.0019 m3; provider Roundwood, hardwood, green, at logyard, SE
  Surrogate for SE railroad tie production. Weight reported on an ovendry basis. Moisture content (ovendry basis) = 87%
- Natural gas, combusted in industrial equipment, 1.357 m3/kg, 52.13 MJ/kg [RNA]: 7.13e-8 m3; provider Natural gas, combusted in industrial equipment
  transporation on-site for forklifts, haulers, and loaders
- Electricity, at grid [RNA]: 0.025 kWh; provider Electricity, Eastern US, 2014
  Amount of electricity used for making SE railroad tie primary cuts

## Emissions to nature
- Particulate matter [emission, air, troposphere, rural]: 0.002483 kg

## Sampling procedure
Questionnaires from 20 mills (17 companies) from the 20 states of Forest Service (FS) Northeastern (NE) Region. Hardwood sawmills were members of the Hardwood Manufacturer Association (HMA).

## Sources
- Richard D. Bergman
