# Electricity, at eGrid, RMPA, 2008

Dataset: openLCA process, unit process
Category: 22: Utilities/2211: Electric Power Generation, Transmission and Distribution
Geography: Northern America
Time period: 2007-12-31 to 2007-12-31
Allocation method: no allocation
Generated by: Alberta Carpenter
Published in: Chris Goemans, Athena Institute
restrictionsDescription: All information can be accessed by everybody.
copyright: false

## General comment
The methodology used to put together the grid information is outlined in reference 1.

## Technology
Typical

## Geography
RMPA Rockies electricity grid to include Colorado, eastern Wyoming (less NWPP) and small portions of South Dakota, Nebraska and New Mexico

## Reference product
- Electricity, at grid [RNA]: 1 kWh

## Inputs from technosphere
- Electricity, petroleum, waste oil, at power plant: 3.57463e-5 kWh
  Petroleum (Other Fossil) WO – Waste/Other Oil (including Crude Oil, Liquid Butane, Liquid Propane, Oil Waste, Re-Refined Motor Oil, Sludge Oil, Tar Oil, or other petroleum-based liquid wastes)
- Electricity, biomass, gas, unspecified, at power plant: 0.000453101 kWh
  Gaseous Renewable Fuels (Biomass) OBG – Other Biomass Gases (Digester Gas, Methane, and other biomass gases)
- Electricity, biomass, at power plant [RNA]: 1.66411e-6 kWh
  Solid Renewable Fuels (Biomass) WDS – Wood/Wood Waste Solids (Paper Pellets, Railroad Ties, Utility Poles, Wood Chips, and other wood solids)
- Electricity, diesel, at power plant [RNA]: 0.000740087 kWh
  Petroleum (DFO) – Distillate Fuel Oil (includes all Diesel and No. 1, No. 2, and No. 4 Fuel Oils)
- Electricity, other gases, unspecified, at power plant: 0.00016044 kWh
  Other Gases OG – Other Gas (Butane, Coal Processes, Coke-Oven, Refinery, and other processes)
- Electricity, bituminous coal, at power plant [RNA]: 0.467659 kWh
  Subbituminous Coal
- Electricity, at wind power plant, unspecified: 0.0470071 kWh
  Wind
- Electricity, solar, unspecified, at power plant: 0.000226274 kWh
  Solar (Photovoltaic, Thermal)
- Electricity, other fuels, unspecified, at power plant: 0.000404255 kWh
  Other Fuels WH – Waste heat not directly attributed to a fuel source. Note that WH should only be reported where the fuel source for the waste heat is undetermined, and for combined cycle steam turbines that are not supplementary fired
- Electricity, natural gas, at power plant [RNA]: 0.174392 kWh
  Natural Gas
- Electricity, biomass, gas, landfill, at power plant: 0.000103139 kWh
  Gaseous Renewable Fuels (Biomass) LFG - landfill gas
- Electricity, bituminous coal, at power plant [RNA]: 0.277515 kWh
  Bituminous Coal BIT - Anthracite Coal, and Bituminous Coal.
- Electricity, hydropower, at power plant, unspecified: 0.0313026 kWh
  Hydroelectric WAT – Water (Conventional, Pumped Storage)

## Sampling procedure
based on EIA electricity reports for all power plants in the US.

## Sources
- EIA
- EIA
- EIA
- Chris Goemans, Athena Institute
- US DOE
- International Energy Agency
- Statistics Canada
- EIA
- Statistics Canada
- EIA
- EIA
- US DOE
- EIA
- USEPA
- Statistics Canada
- unspecified
- Statistics Canada
- EIA
- EIA
- EIA
- Statistics Canada
- USEPA
- Statistics Canada
- EIA
