# Bucked and debarked log, hardwood, green, at veneer mill, E

Dataset: openLCA process, unit process
Category: 31-33: Manufacturing/3212: Veneer, Plywood, and Engineered Wood Product Manufacturing
Geography: United States
Time period: 2006-12-31 to 2006-12-31
Allocation method: physical allocation
Generated by: Maureen Puettmann
Published in: Richard D. Bergman
restrictionsDescription: All information can be accessed by everybody.
copyright: false

## General comment
All weights given on an ovendry basis. All moisture contents are on an ovendry basis. MC% =(weight of water in wood / weight of oven dry wood) *100. Reference to specific gravities use oven dry mass and volumes at specified moisture contents. Reference to densities use mass and volume at specified moistrue contents. Important note: although most of the data in the US LCI database has undergone some sort of review, the database as a whole has not yet undergone a formal validation process. Please email comments to lci@nrel.gov.

## Technology
Typical

## Geography
E= Eastern US United States. The states included MN, IA, MO, WI, IL, NJ, OH, IN, MI, WV, PA, MD, DW, NJ, NY, ME, VT, NH, RI, MA, CT, VA, KY, AR, LA, MS, AL, FL,GA, NC, SC, and TN

## Reference product
- Bucked and debarked log; hardwood; green; at veneer mill [US]: 1 m3

## By-products
- Bark; hardwood; green; at veneer mill [US]: 24.7482 kg
- Wood fuel; hardwood; green; at veneer mill [US]: 2.43825 kg

## Inputs from technosphere
- Electricity, at grid [RNA]: 36.1222 kWh; provider Electricity, Eastern US, 2014
- Disposal, solid waste, unspecified, to inert material landfill: 0.340135 kg
- Bark; hardwood; green; at mill [US]: 27.1865 kg; provider Roundwood, hardwood, green, at mill, E
- Gasoline, combusted in equipment [RNA]: 0.0348263 l
- Roundwood; hardwood; green; at mill [US]: 1 m3; provider Roundwood, hardwood, green, at mill, E
- Diesel, combusted in industrial equipment [RNA]: 0.284462 l
- Natural gas, combusted in industrial equipment, 1.357 m3/kg, 52.13 MJ/kg [RNA]: 0.000180024 m3; provider Natural gas, combusted in industrial equipment
- Recycling, waste, unspecified: 0.873705 kg

## Allocation factors
- causal, Bucked and debarked log; hardwood; green; at veneer mill, for Diesel, combusted in industrial equipment: 0.949406
- causal, Bark; hardwood; green; at veneer mill, for Recycling, waste, unspecified: 0.0460561
- causal, Bucked and debarked log; hardwood; green; at veneer mill, for Disposal, solid waste, unspecified, to inert material landfill: 0.949406
- causal, Bark; hardwood; green; at veneer mill, for Natural gas, combusted in industrial equipment, 1.357 m3/kg, 52.13 MJ/kg: 0.0460561
- physical, Wood fuel; hardwood; green; at veneer mill: 0.00453755
- causal, Wood fuel; hardwood; green; at veneer mill, for Electricity, at grid: 0.00453755
- economic, Bark; hardwood; green; at veneer mill: 0.0460561
- causal, Bucked and debarked log; hardwood; green; at veneer mill, for Roundwood; hardwood; green; at mill: 0.949406
- causal, Bark; hardwood; green; at veneer mill, for Disposal, solid waste, unspecified, to inert material landfill: 0.0460561
- causal, Bucked and debarked log; hardwood; green; at veneer mill, for Electricity, at grid: 0.949406
- causal, Bark; hardwood; green; at veneer mill, for Gasoline, combusted in equipment: 0.0460561
- causal, Bark; hardwood; green; at veneer mill, for Electricity, at grid: 0.0460561
- causal, Bark; hardwood; green; at veneer mill, for Bark; hardwood; green; at mill: 0.0460561
- physical, Bark; hardwood; green; at veneer mill: 0.0460561
- causal, Bark; hardwood; green; at veneer mill, for Roundwood; hardwood; green; at mill: 0.0460561
- causal, Bucked and debarked log; hardwood; green; at veneer mill, for Bark; hardwood; green; at mill: 0.949406
- causal, Wood fuel; hardwood; green; at veneer mill, for Diesel, combusted in industrial equipment: 0.00453755
- causal, Wood fuel; hardwood; green; at veneer mill, for Gasoline, combusted in equipment: 0.00453755
- causal, Bark; hardwood; green; at veneer mill, for Diesel, combusted in industrial equipment: 0.0460561
- economic, Wood fuel; hardwood; green; at veneer mill: 0.00453755
- causal, Wood fuel; hardwood; green; at veneer mill, for Roundwood; hardwood; green; at mill: 0.00453755
- causal, Bucked and debarked log; hardwood; green; at veneer mill, for Recycling, waste, unspecified: 0.949406
- economic, Bucked and debarked log; hardwood; green; at veneer mill: 0.949406
- physical, Bucked and debarked log; hardwood; green; at veneer mill: 0.949406
- causal, Wood fuel; hardwood; green; at veneer mill, for Bark; hardwood; green; at mill: 0.00453755
- causal, Bucked and debarked log; hardwood; green; at veneer mill, for Natural gas, combusted in industrial equipment, 1.357 m3/kg, 52.13 MJ/kg: 0.949406
- causal, Bucked and debarked log; hardwood; green; at veneer mill, for Gasoline, combusted in equipment: 0.949406
- causal, Wood fuel; hardwood; green; at veneer mill, for Recycling, waste, unspecified: 0.00453755
- causal, Wood fuel; hardwood; green; at veneer mill, for Disposal, solid waste, unspecified, to inert material landfill: 0.00453755
- causal, Wood fuel; hardwood; green; at veneer mill, for Natural gas, combusted in industrial equipment, 1.357 m3/kg, 52.13 MJ/kg: 0.00453755

## Sampling procedure
Questionnaires from 4 veneer mills and 5 flooring plants in the E. United States representing 32 states.

## Intended application
Only mass allocation factors are available for the multi-functional processes (disregard economic allocation factor values-they are mass allocation factors).

## Sources
- Richard D. Bergman
- Maureen Puettmann
