# Electricity, at eGrid, ERCT, 2008

Dataset: openLCA process, unit process
Category: 22: Utilities/2211: Electric Power Generation, Transmission and Distribution
Geography: Northern America
Time period: 2007-12-31 to 2007-12-31
Allocation method: no allocation
Generated by: Alberta Carpenter
Published in: Chris Goemans, Athena Institute
restrictionsDescription: All information can be accessed by everybody.
copyright: false

## General comment
The methodology used to put together the grid information is outlined in reference 1.

## Technology
Typical

## Geography
Texas except for small portions in the panhandle (SPSO), western Texas (AZNM) and eastern Texas (SRMV).

## Reference product
- Electricity, at grid [RNA]: 1 kWh

## Inputs from technosphere
- Electricity, biomass, gas, unspecified, at power plant: 6.91518e-5 kWh
  Gaseous Renewable Fuels (Biomass) OBG - Other Biomass Gases (Digester Gas, Methane, and other biomass gases)
- Electricity, biomass, gas, landfill, at power plant: 0.00121425 kWh
  Gaseous Renewable Fuels (Biomass) LFG - landfill gas
- Electricity, petroleum coke, at power plant: 0.00312838 kWh
  Petroleum (Other Fossil) PC - petroleum coke
- Electricity, hydropower, at power plant, unspecified: 0.00324487 kWh
- Electricity, natural gas, at power plant [RNA]: 0.514209 kWh
- Electricity, biomass, solid, agriculture by-products, at power plant: 4.89833e-5 kWh
  Solid Renewable Fuels (Biomass) AB - Agriculture Crop By-products/ Straw/ Energy Crops
- Electricity, other fuels, unspecified, at power plant: 0.00090482 kWh
  Other Fuels PUR - Purchased Steam
- Electricity, at wind power plant, unspecified: 0.0505479 kWh
- Electricity, bituminous coal, at power plant [RNA]: 0.214787 kWh
  subbituminous coal
- Electricity, residual fuel oil, at power plant [RNA]: 5.93183e-6 kWh
  Petroleum (RFO) - Residual Fuel Oil (includes No. 5 and No. 6 Fuel Oils and Bunker C Fuel Oil)
- Electricity, diesel, at power plant [RNA]: 0.000119682 kWh
  Petroleum (DFO) - Distillate Fuel Oil (includes all Diesel and No. 1, No. 2, and No. 4 Fuel Oils)
- Electricity, other fuels, unspecified, at power plant: 5.44201e-5 kWh
  Other Fuels WH - Waste Heat
- Electricity, nuclear, at power plant [RNA]: 0.13901 kWh
- Electricity, lignite coal, at power plant [RNA]: 0.0644317 kWh
- Electricity, other gases, unspecified, at power plant: 0.00811221 kWh
  Other Gases OG - Other Gas (Butane, Coal Processes, Coke-Oven, Refinery, and other processes)
- Electricity, other fuels, unspecified, at power plant: 0.000110959 kWh
  Other Fuels OTH - Other (Batteries, Chemicals, Coke Breeze, Hydrogen, Pitch, Sulfur, Tar Coal, and miscellaneous technologies)

## Sampling procedure
based on EIA electricity reports for all power plants in the US.

## Sources
- EIA
- EIA
- EIA
- Chris Goemans, Athena Institute
- US DOE
- International Energy Agency
- Statistics Canada
- EIA
- Statistics Canada
- EIA
- EIA
- US DOE
- EIA
- USEPA
- Statistics Canada
- unspecified
- Statistics Canada
- EIA
- EIA
- EIA
- Statistics Canada
- USEPA
- Statistics Canada
- EIA
