# Natural gas, extracted

Dataset: openLCA process, unit process
Category: 21: Mining, Quarrying, and Oil and Gas Extraction/2111: Oil and Gas Extraction
Geography: Northern America
Time period: 2002-12-31 to 2002-12-31
Allocation method: no allocation
Generated by: Franklin Associates
Published in: THE PLASTICS DIVISION OF THE AMERICAN C
restrictionsDescription: All information can be accessed by everybody.
copyright: false

## General comment
This module includes data for natural gas co-extracted with crude oil as well as natural gas produced independently. In cases where data represent both crude oil and natural gas extraction, the data module allocates environmental emissions based on the percent weight of natural gas produced. No allocation was given if the data were specific to the natural gas extraction. The data module also apportions environmental emissions according to the percent share of onshore and offshore extraction. Complete inventory data and metadata are available in full in the final report and appendices, Cradle-to-Gate Life Cycle Inventory of Nine Plastic Resins and Four Polyurethane Precursors. This report has been extensively reviewed within Franklin Associates and has undergone partial critical review by ACC Plastics Division members and is available at: www.americanchemistry.com. Quantities may vary slightly between the reference to main source and and this module due to rounding. Important note: although most of the data in the US LCI database has undergone some sort of review, the database as a whole has not yet undergone a formal validation process. Please email comments to lci@nrel.gov.

## Technology
Onshore and offshore underground well extraction using automated pumps when co-produced with crude oil. An estimated 80 percent of natural gas is extracted onshore and 20 percent is extracted offshore .

## Geography
US

## Reference product
- Natural gas, extracted, 0.7369 kg/m3 [RNA]: 1 kg

## Inputs from technosphere
- Diesel, combusted in industrial equipment [RNA]: 0.00129 l
  Includes diesel fuel and distillate oil amounts.
- Natural gas, combusted in industrial boiler [RNA]: 0.0328 m3
- Disposal, solid waste, unspecified, to sanitary landfill: 0.0247 kg
- Electricity, at grid [RNA]: 0.039 kWh; provider Electricity, at Grid, US, 2010
- Residual fuel oil, combusted in industrial boiler [RNA]: 0.000798 l
- Gasoline, combusted in equipment [RNA]: 0.000684 l

## Inputs from nature
- Natural gas [resource, air, subterranean]: 51.792 MJ
  This weight reflects material loss at extraction.

## Emissions to nature
- Radium-226 [emission, water]: 0.00034077 kBq
- p-Cymene [emission, water]: 1.75e-11 kg
- Lead-210 [emission, water]: 7.42e-5 kBq
- Thallium [emission, water]: 3.05e-9 kg
- Benzenes, alkylated, unspecified [emission, water]: 4.73e-8 kg
- Calcium(II) [emission, water]: 0.000504 kg
- Hexadecane [emission, water]: 1.53e-8 kg
- Chloride [emission, water]: 0.0063 kg
- Copper [emission, water]: 6.72e-8 kg
- Dibenzothiophene [emission, water]: 3.64e-11 kg
- Biphenyl [emission, water]: 3.06e-9 kg
- Cadmium(II) [emission, water]: 7.31e-9 kg
- Boron [emission, water]: 7.98e-7 kg
- Total dissolved solids [emission, water]: 0.00623 kg
- Phenols [emission, water]: 7.4e-8 kg
- 2-Methylnaphthalene [emission, water]: 3.94e-9 kg
- Biological Oxygen Demand [emission, water]: 2.43e-5 kg
- Antimony [emission, water]: 1.4e-8 kg
- Magnesium [emission, water]: 0.000101 kg
- Benzene, pentamethyl- [emission, water]: 1.31e-11 kg
- Fluorene [emission, water]: 1.28e-9 kg
- Chloromethane [emission, water]: 7.06e-12 kg
- Docosane [emission, water]: 1.88e-10 kg
- 2-Hexanone [emission, water]: 1.7e-9 kg
- Benzoic acid [emission, water]: 2.58e-7 kg
- Naphthalenes, alkylated, unspecified [emission, water]: 7.74e-10 kg
- Iron [emission, water]: 4.29e-5 kg
- Sulfate [emission, water]: 1.02e-5 kg
- Methyl isobutyl ketone [emission, water]: 7.4e-10 kg
- o-Cresol [emission, water]: 7.33e-9 kg
- p-Xylene [emission, water]: 2.76e-9 kg
- Phenanthrenes, alkylated, unspecified [emission, water]: 3.21e-10 kg
- Vanadium [emission, water]: 6.79e-9 kg
- Selenium [emission, water]: 2.81e-9 kg
- Zinc [emission, water]: 5.26e-7 kg
- Dodecane [emission, water]: 1.4e-8 kg
- Silver [emission, water]: 3.02e-7 kg
- p-Cresol [emission, water]: 7.9e-9 kg
- Oils, unspecified [emission, water]: 4.5e-6 kg
- Benzene [emission, water]: 2.6e-7 kg
- Beryllium [emission, water]: 2.99e-9 kg
- Phenanthrene [emission, water]: 2.04e-10 kg
- Carbon dioxide [emission, air]: 0.017 kg
- Methane [emission, air]: 0.0034 kg
- Octadecane [emission, water]: 3.8e-9 kg
- Aluminum [emission, water]: 2.3e-5 kg
- Hexanoic acid [emission, water]: 5.35e-8 kg
- Lithium(I) [emission, water]: 0.00015 kg
- Suspended solids, inorganic [emission, water]: 0.00256 kg
- Surfactants, unspecified [emission, water]: 1.24e-7 kg
- Radium-228 [emission, water]: 0.000471 kBq
- Molybdenum [emission, water]: 5.85e-9 kg
- Mercury [emission, water]: 2.54e-10 kg
- Sulfur [emission, water]: 6.48e-7 kg
- Naphthalene [emission, water]: 4.64e-9 kg
- Eicosane [emission, water]: 3.85e-9 kg
- Lead [emission, water]: 1.26e-7 kg
- Chemical Oxygen Demand [emission, water]: 4.02e-5 kg
- m-Xylene [emission, water]: 7.52e-9 kg
- Xylene [emission, water]: 1.12e-7 kg
  Additional unspeciated xylenes
- Hexacosane [emission, water]: 1.17e-10 kg
- Titanium [emission, water]: 2.23e-7 kg
- Fluorenes, alkylated, unspecified [emission, water]: 2.74e-9 kg
- 2,4-Dimethylphenol [emission, water]: 7.13e-9 kg
- Methyl ethyl ketone [emission, water]: 1.41e-11 kg
- Strontium [emission, water]: 1.39e-5 kg
- Chromium [emission, water]: 6.19e-7 kg
- Decane [emission, water]: 7.39e-9 kg
- Yttrium [emission, water]: 1.71e-9 kg
- Barium [emission, water]: 0.00031 kg
- Tin [emission, water]: 5.78e-8 kg
- Toluene [emission, water]: 2.4e-7 kg
- Bromide [emission, water]: 3e-5 kg
- Tetradecane [emission, water]: 6.04e-9 kg
- Nickel [emission, water]: 5.78e-8 kg
- Cobalt [emission, water]: 5.64e-9 kg
- Ethylbenzene [emission, water]: 1.46e-8 kg
- Arsenic(V) [emission, water]: 4.7e-8 kg
- Ammonia [emission, water]: 2.5e-6 kg
- Acetone [emission, water]: 1.8e-9 kg
- o-Xylene [emission, water]: 2.76e-9 kg
- Cyanide [emission, water]: 1.27e-11 kg
- Manganese [emission, water]: 1.42e-7 kg
- Dibenzofuran [emission, water]: 3.33e-11 kg
- 1-Methylfluorene [emission, water]: 2e-11 kg
- Sodium(I) [emission, water]: 0.00143 kg

## Sampling procedure
Data collected from secondary sources.

## Sources
- THE PLASTICS DIVISION OF THE AMERICAN C
