# Transport, single unit truck, long-haul, diesel powered

Dataset: openLCA process, unit process
Category: 48-49: Transportation and Warehousing/4841: General Freight Trucking
Geography: Northern America
Time period: 2009-12-31 to 2009-12-31
Allocation method: no allocation
Generated by: Nathan Hardesty
Published in: U.S. Environmental Protection Agency (EP
restrictionsDescription: All information can be accessed by everybody.
copyright: false

## General comment
This dataset represents the U.S. average airborne emissions for operating a diesel powered, single unit truck in a long-haul manner (trips greater than 200 miles [322 km]). The inventory includes all vehicle operation processes, including off-network and refueling activities.
The refinery-to-pump transportation and distribution data are calculated from Argonne National Laboratory's GREET 1.8d.1 model.
The vehicle operation data are calculated from EPA's MOVES2010a model, using the assumptions described in the corresponding detailed spreadsheet. Emissions factors in MOVES2010a are largely based on EPA's Mobile Source Observation Database, which in turn includes data from a variety of vehicle studies (References 7-9).

## Technology
Combustion of diesel in a single unit, long-haul truck.

## Geography
US

## Reference product
- Transport, single unit truck, long-haul, diesel powered [RNA]: 1 t*km

## Inputs from technosphere
- Transport, pipeline, unspecified petroleum products [RNA]: 0.066 t*km
- Transport, train, diesel powered [RNA]: 0.012 t*km
- Transport, ocean tanker, average fuel mix: 0.045 t*km
- Transport, barge, average fuel mix [RNA]: 0.006 t*km
- Transport, combination truck, average fuel mix [RNA]: 0.007 t*km
- Diesel, at refinery: 0.124772 l; provider Petroleum refining, at refinery

## Emissions to nature
- Particulate matter, ≤ 2.5μm [emission, air]: 1.0043e-6 kg
  PM2.5 from tirewear.
- Sulfur dioxide [emission, air]: 5.02223e-6 kg
- Particulate matter, ≤ 10μm [emission, air]: 2.09795e-5 kg
  PM10 from brakewear.
- Particulate matter, ≤ 2.5μm [emission, air]: 8.82392e-5 kg
  PM2.5 from organic carbon, elemental carbon, and sulfate particulates.
- Hydrocarbons [emission, air]: 0.00020125 kg
- Nitrogen oxides [emission, air]: 0.00153282, 0.00170946 kg (2 entries)
- Ammonia [emission, air]: 7.8434e-6 kg
- Particulate matter, ≤ 10μm [emission, air]: 9.09645e-5 kg
  PM10 from organic carbon, elemental carbon, and sulfate particulates.
- Nitrogen dioxide [emission, air]: 0.00017665 kg
- Volatile organic compounds [emission, air]: 0.000206323 kg
- Particulate matter, ≤ 2.5μm [emission, air]: 5.49201e-6 kg
  PM2.5 from brakewear.
- Nitrous oxide [emission, air]: 9.31339e-7 kg
- Carbon monoxide [emission, air]: 0.000823074 kg
- Particulate matter, ≤ 10μm [emission, air]: 4.18794e-6 kg
  PM10 from tirewear.
- Methane [emission, air]: 1.00012e-5 kg
- Carbon dioxide [emission, air]: 0.323355 kg

## Sources
- Assessment and Standards Division, Offic
- National Institute of Standards and Tech
- Wang, M.
- U.S. Alternative Fuels and Advanced Vehi
- U.S. Environmental Protection Agency (EP
- Eastern Research Group
- Assessment and Standards Division, Offic
- Alam, M.
- Transportation Characteristics Branch, U
- EPA
