# Electricity, at Grid, WECC, 2008

Dataset: openLCA process, unit process
Category: 22: Utilities/2211: Electric Power Generation, Transmission and Distribution
Geography: Northern America
Time period: 2007-12-31 to 2007-12-31
Allocation method: no allocation
Generated by: Alberta Carpenter
Published in: Chris Goemans, Athena Institute
restrictionsDescription: All information can be accessed by everybody.
copyright: false

## General comment
The methodology used to put together the grid information is outlined in reference 1.

## Technology
Typical

## Geography
Washington, Idaho, Montana, Portland, British Columbia, Alberta, California, Utah, Nevada, Arizona, New Mexico, Colorado, and Wyoming and parts of Nebraska, Texas and Mexico.

## Reference product
- Electricity, at grid [RNA]: 1 kWh

## Inputs from technosphere
- Electricity, MSW, non-biogenic, at power plant: 0.000359201 kWh
  MSN - Municipal Solid Waste – Non-biogenic components
- Electricity, bituminous coal, at power plant [RNA]: 0.113298 kWh
  BIT - Anthracite Coal and Bituminous Coal
- Electricity, tire derived fuel, at power plant: 2.60517e-5 kWh
  TDF - Tire-derived Fuels
- Electricity, diesel, at power plant [RNA]: 0.000442735 kWh
  DFO - Distillate Fuel Oil (Diesel, No. 1, No. 2, and No. 4 Fuel Oils)
- Electricity, petroleum, waste oil, at power plant: 0.000130554 kWh
  WO - Waste/Other Oil (including Crude Oil, Liquid Butane, Liquid Propane, Oil Waste, Re-Refined Motor Oil, Sludge Oil, Tar Oil, or other petroleum-based liquid wastes)
- Electricity, biomass, at power plant [RNA]: 0.00681739 kWh
  WDSWood/Wood Waste Solids (paper pellets, railroad ties, utility poles, wood chips, bark, and other wood waste solids)
- Electricity, solar, unspecified, at power plant: 0.00113751 kWh
  SUN - Solar
- Electricity, biomass,liquid, unspecified, at power plant: 0.0010647 kWh
  BLQ - Black Liquor
- Electricity, other gases, unspecified, at power plant: 9.32092e-7 kWh
  PG - Gaseous Propane
- Electricity, biomass, gas, landfill, at power plant: 0.00226212 kWh
  LFG - Landfill Gas
- Electricity, natural gas, at power plant [RNA]: 0.318047 kWh
  NG - Natural Gas
- Electricity, biomass, liquid, sludge, at power plant: 1.57754e-5 kWh
  SLW - Sludge Waste
- Electricity, nuclear, at power plant [RNA]: 0.0939609 kWh
  NUC - Nuclear Fission (Uranium, Plutonium, Thorium)
- Electricity, other fuels, unspecified, at power plant: 0.000375508 kWh
  OTH - Specify in Comments Section
- Electricity, geothermal, unspecified: 0.0193283 kWh
  GEO - Geothermal
- Electricity, residual fuel oil, at power plant [RNA]: 1.25777e-5 kWh
  RFO - Residual Fuel Oil (No. 5, No. 6 Fuel Oils, and Bunker C Fuel Oil)
- Electricity, other fuels, at power plant, unspecified: 0.000544332 kWh
  WH - Waste heat not directly attributed to a fuel source. Note that WH should only be reported where the fuel source for the waste heat is undetermined, and for combined cycle steam turbines that are not supplementary fired
- Electricity, biomass, solid, biogenic MSW, at power plant: 0.000457169 kWh
  MSB - Municipal Solid Waste – Biogenic Component
- Electricity, diesel, at power plant [RNA]: 1.27347e-5 kWh
  JF - Jet Fuel
- Electricity, petroleum coke, at power plant: 0.00262439 kWh
  PC - Petroleum Coke
- Electricity, at wind power plant, unspecified: 0.023501 kWh
  Wind
- Electricity, biomass, solid, agriculture by-products, at power plant: 0.000252276 kWh
  AB - Agricultural Crop Byproducts/Straw/Energy Crops
- Electricity, biomass, gas, unspecified, at power plant: 0.000679987 kWh
  OBG - Other Biomass Gas (includes digester gas, methane, and other biomass gases)
- Electricity, bituminous coal, at power plant [RNA]: 0.000162463 kWh
  SC - Coal-based Synfuel, including briquettes, pellets, or extrusions, which are formed by binding materials or processes that recycle materials
- Electricity, bituminous coal, at power plant [RNA]: 0.000950039 kWh
  WOC - Waste/Other Coal (Anthracite Culm, Bituminous Gob, Fine Coal, Lignite Waste, Waste Coal)
- Electricity, hydropower, at power plant, unspecified: 0.222373 kWh
  WAT - Water at a Conventional Hydroelectric Turbine
- Electricity, other gases, unspecified, at power plant: 0.00302873 kWh
  OG - Other Gas
- Electricity, bituminous coal, at power plant [RNA]: 0.188135 kWh
  SUB - Subbituminous Coal

## Sampling procedure
based on EIA electricity reports for all power plants in the US.

## Sources
- EIA
- EIA
- EIA
- Chris Goemans, Athena Institute
- US DOE
- International Energy Agency
- Statistics Canada
- EIA
- Statistics Canada
- EIA
- EIA
- US DOE
- EIA
- USEPA
- Statistics Canada
- unspecified
- Statistics Canada
- EIA
- EIA
- EIA
- Statistics Canada
- USEPA
- Statistics Canada
- EIA
