# Electricity, at Grid, MRO, 2010

Dataset: openLCA process, unit process
Category: 22: Utilities/2211: Electric Power Generation, Transmission and Distribution
Geography: Northern America
Time period: 2009-12-31 to 2009-12-31
Allocation method: no allocation
Generated by: Samantha Wascavage
Published in: EIA
restrictionsDescription: All information can be accessed by everybody.
copyright: false

## General comment
The methodology used to put together the grid information is outlined in reference 1.

## Technology
Typical

## Geography
Manitoba, Minnesota, Nebraska, North Dakota, Saskatchewan and parts of Illinois, Michigan, South Dakota and Wisconsin.

## Reference product
- Electricity, at grid [RNA]: 1 kWh

## Inputs from technosphere
- Electricity, petroleum coke, at power plant: 0.002912 kWh
  PC, SG, WO – Petroleum Coke
- Electricity, solar, unspecified, at power plant: 7e-6 kWh
  SUN – Solar (Photovoltaic, Thermal)
- Electricity, other fuels, unspecified, at power plant: 0.001601 kWh
  PUR, OTH, MSN, WH – Purchased Steam
- Electricity, diesel, at power plant [RNA]: 0.000981 kWh
  DFO, JF, KER – Distillate Fuel Oil (includes all Diesel and No. 1, No. 2, and No. 4 Fuel Oils)
- Electricity, bituminous coal, at power plant [RNA]: 0.010618 kWh
  BIT, SC, SGC, WC - Anthracite Coal, and Bituminous Coal.
- Electricity, biomass, solid, agriculture by-products, at power plant: 0.006683 kWh
  AB, MSB, MSW, OBS, TDF, WDS – Agriculture Crop By-products / Straw / Energy Crops
- Electricity, biomass,liquid, unspecified, at power plant: 0.004204 kWh
  BLQ, OBL, SLW, WDL – Black Liquor
- Electricity, natural gas, at power plant [RNA]: 0.040596 kWh
  NG – Natural Gas
- Electricity, hydropower, at power plant, unspecified: 0.186962 kWh
  WAT – Water (Conventional, Pumped Storage)
- Electricity, biomass, gas, landfill, at power plant: 0.002017 kWh
  LFG, OBG – Landfill Gas
- Electricity, residual fuel oil, at power plant [RNA]: 3e-5 kWh
  RFO – Residual Fuel Oil (includes No. 5 and No. 6 Fuel Oils and Bunker C Fuel Oil)
- Electricity, other gases, unspecified, at power plant: 0.000136 kWh
  OG, BFG, PG – Other Gas (Butane, Coal Processes, Coke-Oven, Refinery, and other processes)
- Electricity, nuclear, at power plant [RNA]: 0.130285 kWh
  NUC – Nuclear (Uranium, Plutonium, Thorium)
- Electricity, at wind power plant, unspecified: 0.060609 kWh
  WND – Wind
- Electricity, lignite coal, at power plant [RNA]: 0.149493 kWh
  LIG – Lignite Coal
- Electricity, bituminous coal, at power plant [RNA]: 0.402866 kWh
  SUB – Subbituminous Coal

## Sampling procedure
based on EIA electricity reports for all power plants in the US.

## Sources
- EIA
- EIA
- Statistics Canada
- Statistics Canada
- Chris Goemans, Athena Institute
- EIA
- USEPA
- EIA
- Statistics Canada
- EIA
- Statistics Canada
- EIA
- unspecified
- EIA
- USEPA
- EIA
- EIA
- Statistics Canada
- US DOE
- International Energy Agency
- EIA
