# Electricity, at eGrid, RMPA, 2010

Dataset: openLCA process, unit process
Category: 22: Utilities/2211: Electric Power Generation, Transmission and Distribution
Geography: Northern America
Time period: 2009-12-31 to 2009-12-31
Allocation method: no allocation
Generated by: Samantha Wascavage
Published in: Chris Goemans, Athena Institute
restrictionsDescription: All information can be accessed by everybody.
copyright: false

## General comment
The methodology used to put together the grid information is outlined in reference 1.

## Technology
Typical

## Geography
RMPA Rockies electricity grid to include Colorado, eastern Wyoming (less NWPP) and small portions of South Dakota, Nebraska and New Mexico

## Reference product
- Electricity, at grid [RNA]: 1 kWh

## Inputs from technosphere
- Electricity, hydropower, at power plant, unspecified: 0.02885 kWh
  Hydroelectric WAT – Water (Conventional, Pumped Storage)
- Electricity, solar, unspecified, at power plant: 0.000304 kWh
  Solar (Photovoltaic, Thermal)
- Electricity, bituminous coal, at power plant [RNA]: 0.1462 kWh
  Bituminous Coal BIT, SC, SGC, WC - Anthracite Coal, and Bituminous Coal.
- Electricity, natural gas, at power plant [RNA]: 0.159051 kWh
  Natural Gas
- Electricity, at wind power plant, unspecified: 0.051679 kWh
  Wind
- Electricity, bituminous coal, at power plant [RNA]: 0.611767 kWh
  Subbituminous Coal
- Electricity, biomass, at power plant [RNA]: 3.2e-5 kWh
  Solid Renewable Fuels (Biomass) WDS, AB, MSB, MSW, OBS, TDF – Wood/Wood Waste Solids (Paper Pellets, Railroad Ties, Utility Poles, Wood Chips, and other wood solids)
- Electricity, diesel, at power plant [RNA]: 0.000555 kWh
  Petroleum (DFO, JF, KER) – Distillate Fuel Oil (includes all Diesel and No. 1, No. 2, and No. 4 Fuel Oils)
- Electricity, other fuels, unspecified, at power plant: 0.000684 kWh
  Other Fuels WH, OTH, MSN, PUR – Waste heat not directly attributed to a fuel source. Note that WH should only be reported where the fuel source for the waste heat is undetermined, and for combined cycle steam turbines that are not supplementary fired
- Electricity, petroleum, waste oil, at power plant: 4.2e-5 kWh
  Petroleum (Other Fossil) WO, PC, SG – Waste/Other Oil (including Crude Oil, Liquid Butane, Liquid Propane, Oil Waste, Re-Refined Motor Oil, Sludge Oil, Tar Oil, or other petroleum-based liquid wastes)
- Electricity, biomass, gas, landfill, at power plant: 0.000836 kWh
  Gaseous Renewable Fuels (Biomass) LFG, OBG - landfill gas

## Sampling procedure
based on EIA electricity reports for all power plants in the US.

## Sources
- EIA
- EIA
- Statistics Canada
- Statistics Canada
- Chris Goemans, Athena Institute
- EIA
- USEPA
- EIA
- Statistics Canada
- EIA
- Statistics Canada
- EIA
- unspecified
- EIA
- USEPA
- EIA
- EIA
- Statistics Canada
- US DOE
- International Energy Agency
- EIA
