# Hardboard, at hardboard plant

Dataset: openLCA process, unit process
Category: 31-33: Manufacturing/3212: Veneer, Plywood, and Engineered Wood Product Manufacturing
Geography: Northern America
Time period: 2009-12-31 to 2010-12-30
Allocation method: physical allocation
Generated by: Richard Bergman
Reviewer: Maureen Puettmann
Published in: Bergman, R.
restrictionsDescription: All information can be accessed by everybody.
copyright: false

## General comment
Manufacturing hardboard in North America currently uses either a wet or dry production processes to create high-density wood composition panels. The wet and dry processes use a thermo-mechanical processes to reduce the wood chips or raw material to individual fibers. Resins are added to the fibers before or during mat forming and then the (dry or wet) mats are pressed to create the hardboard panel. Final products made from uncoated hardboard commonly called “dealer board” include case-goods, paneling and pegboard. Density for the final products ranges from 800 to 1,100 kg/m3. Hardboard is a panel product developed to utilize industrial wood residue. The production of hardboard falls into the Standard Industrial Classification (SIC) Code 321219—reconstituted wood products—which include other wood composite products such as cellulosic fiberboard, medium density fiberboard, particleboard, and oriented strand board. EWST are composite panels designed and manufactured to perform in applications with the appearance of traditional wood. In addition, all hardboard/EWST plants follow the ‘Eco-certified composite sustainability standard’.

All allocations performed using mass or volume. This sheet sets out each unit process in the production of one cubic meter of cellulosic fiberbaord as produced in the North America. For the year 2012 7 hardboard facilities operated in North America. These seven facilities produced 205 million m2 at 3.2-mm basis equaling 650 thousand m3 of hardboard.

Important note: although most of the data in the US LCI database has undergone some sort of review, the database as a whole has not yet undergone a formal validation process. Please email comments to lci@nrel.gov.; Geography: North America

## Technology
typical

## Geography
North America

## Time period
2010 and after

## Reference product
- Hardboard, at hardboard plant [RNA]: 768 kg

## By-products
- Other, not specified, hardboard, at hardboard plant [RNA]: 15 kg
- Dry sawdust, wood fuel, at hardboard plant [RNA]: 5.9 kg
- Culled boards, wood fuel, at hardboard plant [RNA]: 33.8 kg
- Bag house dust, re-pulped, at hardboard plant [RNA]: 1.4 kg
- Sander dust, wood fuel, at hardboard plant [RNA]: 18.7 kg
- Bag house dust, wood fuel, at hardboard plant [RNA]: 46.7 kg

## Inputs from technosphere
- Electricity, biomass, at power plant [RNA]: 0.78838 kWh
  Feedstock Production;
- Roundwood, hardwood, green, at hardboard plant: 167.87 kg
  Feedstock Production;
- Electricity, bituminous coal, at power plant [RNA]: 338.772 kWh
  Hardboard Production; MEP field change; 11/2015; 51.80% of total electricity
- Slack wax; at plant [US]: 0.306 kg; provider Slack wax, at plant, US SE
  Hardboard Production;
- Natural gas, combusted in industrial boiler, at pulp and paper mill (EXCL.) [RNA]: 8 m3
  Hardboard Production;
- Transport, combination truck, diesel powered [RNA]: 95.6064 t*km
  Feedstock Production; MEP Field change; Nov. 2015; Transportation of roundwood to primary processing
- Recycling, wood waste, unspecified: 0.126011 kg
  Feedstock Production
- Cellulosic fiberboard, uncoated, at plant [RNA]: 1.4211 kg
  Hardboard Production; Final packaging material;
- Polyethylene, linear low density, LLDPE, resin, at plant [RNA]: 0.0592565 kg
  Hardboard Production; Final packaging material; wrapping
- Electricity, fossil, unspecified, at power plant: 1.962 kWh
  Hardboard Production; MEP field change; 11/2015; 0.30% of total electricity
- Gasoline, at refinery: 0.442438 l; provider Petroleum refining, at refinery
  MEP Field change; Hardboard production; hydraulic fluid, 0.382kg. 7.2054 lb/gal
- Wood Combusted, at boiler, at hardboard mill [RNA]: 318 kg
  Hardboard Production; Oven dried weight, 52.4% on-site at non hardboard facility; 318 OD kg
- Electricity, at wind power plant, unspecified: 0.433609 kWh
  Feedstock Production;
- Electricity, bituminous coal, at power plant [RNA]: 0.12816 kWh
  Forestry Operations;
- Electricity, at grid [RNA]: 0.00523 kWh; provider Electricity, at Grid, US, 2010
  MEP Field change; Hardboard Production;
- Residual fuel oil, combusted in industrial boiler [RNA]: 12 l
  Hardboard Production
- Materials for basecoat painting, at plant: 0.00899 m3
  Hardboard Production;
- Slack wax; at plant [US]: 13.6 kg; provider Slack wax, at plant, US SE
  Hardboard production; proxy for parffin wax
- Polyethylene, high density, HDPE, resin, at plant [RNA]: 0.217271 kg
  Hardboard Production; Final packaging material; wrapping
- Gasoline, combusted in equipment, at pulp and paper mill (EXCL.) [RNA]: 0.149 l
  Hardboard Production
- Water, at user: 10.3 kg
  Hardboard Production;
- Electricity, natural gas, at power plant [RNA]: 66.708 kWh
  Hardboard Production; MEP field change; 11/2015; 10.20% of total electricity
- Electricity, natural gas, at power plant [RNA]: 0.00640799 kWh
  Forestry Operations;
- Phenol formaldehyde, at plant [RNA]: 4.18 kg
  Hardboard production; proxy for compregnite
- Zinc Borate: 6.92 kg
  Hardboard Production;
- Ink: 0.006 kg
  Hardboard Production;
- Gasoline, at refinery: 0.0440121 l; provider Petroleum refining, at refinery
  MEP Field change; Hardboard production; oils and grease, 0.0380kg; 7.2054 lb/gal
- Electricity, hydropower, at power plant, unspecified: 41.856 kWh
  Hardboard Production; MEP field change; 11/2015; 6.4% of total electricity
- Diesel, combusted in industrial equipment [RNA]: 5.47799 l
  Forestry Operations;
- Disposal, solid waste, unspecified, to inert material landfill: 42.6 kg
  Hardboard Production;
- Recycled postconsumer PET flake [RNA]: 0.3122 kg
  Hardboard Production; Final packaging material;
- Linseed oil: 0.0857 kg
  Hardboard Production;
- Wood Combusted, at boiler, at hardboard mill [RNA]: 290 kg
  Hardboard Production;Oven dried weight, 47.6% purchased wood fuel; 290 OD kg;
- Disposal, wood waste, to residual material landfill: 0.950975 kg
  Feedstock Production
- Paper, bag and sack, unbleached kraft, average production, at mill [RNA]: 0.217271 kg
  Hardboard Production; Final packaging material; wrapping
- Electricity, residual fuel oil, at power plant [RNA]: 7.848 kWh
  Hardboard Production; MEP field change; 11/2015; 1.20% of total electricity
- Electricity, at wind power plant, unspecified: 7.194 kWh
  Hardboard Production; MEP field change; 11/2015; 1.1% of total electricity
- Electricity, nuclear, at power plant [RNA]: 176.58 kWh
  Hardboard Production; MEP field change; 11/2015; 27% of total electricity
- Transport, combination truck, diesel powered [RNA]: 56.6 t*km
  Hardboard production; total transportation for all feedstocks from primary processing and roundwood directly to hardboard facilities; 56.6 tkm
- Recycling, wood waste, unspecified: 26.5 kg
  Hardboard Production;
- Electricity, hydropower, at power plant, unspecified: 2.52282 kWh
  Feedstock Production;
- Gasoline, at refinery: 0.0277971 l; provider Petroleum refining, at refinery
  MEP Field change; Hardboard production; lubricant oils; 0.24 kg; 7.2054 lb/gal
- Electricity, at wind power plant, unspecified: 0.000915427 kWh
  Forestry Operations;
- Natural gas, combusted in industrial equipment, 1.357 m3/kg, 52.13 MJ/kg [RNA]: 0.0201 m3; provider Natural gas, combusted in industrial equipment
  Hardboard Production; proxy for propane; adjusted for density (7.96*2.52=20.1)
- Potassium sulphate alum, as K2O, hardboard [RNA]: 5.09 kg
  Hardboard Production;
- Electricity, bituminous coal, at power plant [RNA]: 20.419 kWh
  Feedstock Production;
- Electricity, biomass, at power plant [RNA]: 13.08 kWh
  Hardboard Production; MEP field change; 11/2015; 2% of total electricity
- Electricity, nuclear, at power plant [RNA]: 10.6431 kWh
  Feedstock Production;
- Surfaced dried lumber; at planer mill [US]: 6.9739 kg
  Hardboard Production; Final packaging material; stickers
- Gasoline, at refinery: 0.12811 l; provider Petroleum refining, at refinery
  MEP Field change; Forestry Operations; lubricant oils; 0.11061kg; 7.2054 lb/gal
- Gasoline, combusted in equipment, at pulp and paper mill (EXCL.) [RNA]: 0.0571979 l
  Feedstock Production;
- Diesel, combusted in industrial equipment [RNA]: 0.582349 l
  Feedstock Production;
- Electricity, hydropower, at power plant, unspecified: 0.00564513 kWh
  Forestry Operations;
- Liquefied petroleum gas, combusted in industrial boiler [RNA]: 0.0113759 l
  Feedstock Production; proxy for LPG equipment
- Diesel, combusted in industrial equipment [RNA]: 3.56 l
  Hardboard Production; off-road and on-road diesel fuel (1.63+1.93 = 3.56)
- Hot rolled sheet, steel, at plant [RNA]: 0.018 kg
  MEP Field change; Hardboard Production; Final packaging material; Steel strapping
- Electricity, residual fuel oil, at power plant [RNA]: 0.00747599 kWh
  Forestry Operations;
- Electricity, residual fuel oil, at power plant [RNA]: 0.473028 kWh
  Feedstock Production;
- Electricity, natural gas, at power plant [RNA]: 4.02074 kWh
  Feedstock Production;
- Electricity, fossil, unspecified, at power plant: 0.118257 kWh
  Feedstock Production;
- Transport, combination truck, diesel powered [RNA]: 3.2 t*km
  Hardboard production; Transportation for purchased wood fuel
- Release agent, unspecified, at plant: 0.456 kg
  Hardboard Production;
- Electricity, biomass, at power plant [RNA]: 0.00411942 kWh
  Forestry Operations;
- Transport, combination truck, diesel powered [RNA]: 19.7 t*km
  Hardboard production; Total transportation for all additives
- Disposal, solid waste, unspecified, to inert material landfill: 2.44017 kg
  Feedstock Production
- Phenol formaldehyde, at plant [RNA]: 15.3 kg
  Hardboard Production; PF process from USLCI

## Inputs from nature
- Hardwood [resource, biotic]: 523.494 kg
  75.94%
- Water [resource, water]: 34.7767, 4.00653 kg (2 entries)
  Feedstock Production;
- Softwood [resource, biotic]: 130.327 kg
  24.06%
- Wood [resource, biotic]: 843.569 kg
- Water [resource, water]: 11323 kg
  Hardboard Production; surface water
- Carbon [resource, ground]: 1630 kg
  renewable materials from feedstock
- Water [resource, water]: 303 kg
  Hardboard Production; ground water

## Emissions to nature
- Biological Oxygen Demand [emission, water]: 2 kg
  Hardboard Production;
- Benzene [emission, air]: 3.57e-5 kg
  Hardboard Production; Primary
- Water [emission, water]: 14.9123 kg
  Feedstock Production
- Hydrocarbons [emission, air]: 1.99 kg
  Hardboard Production;
- Volatile organic compounds [emission, air]: 0.00579881 kg
  Feedstock Production
- Acrolein [emission, air]: 0.023 kg
  Hardboard Production; Primary
- Suspended solids, inorganic [emission, water]: 3.8 kg
  Hardboard Production;
- .beta.-Pinene [emission, air]: 1.31e-5 kg
  Hardboard Production;
- .alpha.-Pinene [emission, air]: 8.08e-6 kg
  Hardboard Production;
- Limonene [emission, air]: 0.000724 kg
  Hardboard Production;
- Methanol [emission, air]: 0.000149955 kg
  Feedstock Production
- Propionaldehyde [emission, air]: 0.053 kg
  Hardboard Production; proionaldehyde/Primary
- Chloroethane [emission, air]: 1.81e-5 kg
  Hardboard Production;
- Sulfur dioxide [emission, air]: 0.307 kg
  Hardboard Production; Primary
- Chloromethane [emission, air]: 0.000171 kg
  Hardboard Production;
- Formic acid [emission, air]: 0.0785 kg
  Hardboard Production; Primary
- Phenol [emission, air]: 0.0942 kg
  Hardboard Production; Primary
- Xylene [emission, air]: 7.66e-5 kg
  Hardboard Production;
- Particulate matter, ≤ 10μm [emission, air]: 0.0891 kg
  Hardboard Production;
- Particulate matter [emission, air]: 0.147 kg
  Hardboard Production;
- Acetaldehyde [emission, air]: 0.053 kg
  Hardboard Production; Primary data
- Acetaldehyde [emission, air]: 8.78895e-5 kg
  Feedstock Production
- Volatile organic compounds [emission, air]: 1.4 kg
  Hardboard Production; Primary
- Hexaldehyde [emission, air]: 0.0159 kg
  Hardboard Production;
- Particulate matter [emission, air]: 0.411303 kg
  Feedstock Production
- Phenol [emission, air]: 1.55389e-5 kg
  Feedstock Production
- Formaldehyde [emission, air]: 1.30121e-8 kg
  Feedstock Production
- Acetone [emission, air]: 0.0174 kg
  Hardboard Production;
- Acrolein [emission, air]: 1.35457e-7 kg
  Feedstock Production
- Formaldehyde [emission, air]: 0.0693 kg
  Hardboard Production; Primary
- Ethylbenzene [emission, air]: 4.57e-5 kg
  Hardboard Production;
- Methyl ethyl ketone [emission, air]: 0.00341 kg
  Hardboard Production;
- Toluene [emission, air]: 0.00185 kg
  Hardboard Production;
- Cresol [emission, air]: 0.000771 kg
  Hardboard Production;
- Carbon monoxide [emission, air]: 0.206 kg
  Hardboard Production;
- Methanol [emission, air]: 0.308 kg
  Hardboard Production; Primary
- Chemical Oxygen Demand [emission, water]: 7.66 kg
  Hardboard Production;
- Nitrous oxide [emission, air]: 0.004 kg
  Hardboard Production;

## Allocation factors
- causal, Hardboard, at hardboard plant, for Gasoline, at refinery: 0.863406
- causal, Bag house dust, wood fuel, at hardboard plant, for Nitrous oxide: 0.0525014
- causal, Other, not specified, hardboard, at hardboard plant, for Electricity, natural gas, at power plant: 0.0168634
- causal, Hardboard, at hardboard plant, for Chloroethane: 0.863406
- causal, Hardboard, at hardboard plant, for Electricity, bituminous coal, at power plant: 0.863406
- causal, Dry sawdust, wood fuel, at hardboard plant, for Phenol formaldehyde, at plant: 0.00663294
- causal, Bag house dust, wood fuel, at hardboard plant, for Transport, combination truck, diesel powered: 0.0525014
- causal, Other, not specified, hardboard, at hardboard plant, for Formaldehyde: 0.0168634
- causal, Bag house dust, re-pulped, at hardboard plant, for Linseed oil: 0.00157392
- causal, Other, not specified, hardboard, at hardboard plant, for Recycling, wood waste, unspecified: 0.0168634
- causal, Bag house dust, wood fuel, at hardboard plant, for Acrolein: 0.0525014
- causal, Bag house dust, wood fuel, at hardboard plant, for Electricity, natural gas, at power plant: 0.0525014
- causal, Bag house dust, re-pulped, at hardboard plant, for Electricity, fossil, unspecified, at power plant: 0.00157392
- causal, Hardboard, at hardboard plant, for Formaldehyde: 0.863406
- causal, Dry sawdust, wood fuel, at hardboard plant, for Propionaldehyde: 0.00663294
- causal, Bag house dust, wood fuel, at hardboard plant, for .beta.-Pinene: 0.0525014
- causal, Dry sawdust, wood fuel, at hardboard plant, for Water: 0.00663294
- causal, Sander dust, wood fuel, at hardboard plant, for Electricity, hydropower, at power plant, unspecified: 0.021023
- causal, Dry sawdust, wood fuel, at hardboard plant, for Electricity, hydropower, at power plant, unspecified: 0.00663294
- causal, Dry sawdust, wood fuel, at hardboard plant, for Disposal, solid waste, unspecified, to inert material landfill: 0.00663294
- causal, Culled boards, wood fuel, at hardboard plant, for Suspended solids, inorganic: 0.0379989
- causal, Other, not specified, hardboard, at hardboard plant, for Hexaldehyde: 0.0168634
- causal, Bag house dust, wood fuel, at hardboard plant, for Electricity, natural gas, at power plant: 0.0525014
- causal, Other, not specified, hardboard, at hardboard plant, for Materials for basecoat painting, at plant: 0.0168634
- causal, Sander dust, wood fuel, at hardboard plant, for Methyl ethyl ketone: 0.021023
- causal, Bag house dust, re-pulped, at hardboard plant, for Zinc Borate: 0.00157392
- causal, Dry sawdust, wood fuel, at hardboard plant, for Liquefied petroleum gas, combusted in industrial boiler: 0.00663294
- causal, Other, not specified, hardboard, at hardboard plant, for Transport, combination truck, diesel powered: 0.0168634
- causal, Hardboard, at hardboard plant, for Acetaldehyde: 0.863406
- causal, Culled boards, wood fuel, at hardboard plant, for Liquefied petroleum gas, combusted in industrial boiler: 0.0379989
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
## Sampling procedure
Industry survey

## Sources
- Bergman, R.
