# Grinding

Dataset: openLCA process, unit process
Category: 11: Agriculture, Forestry, Fishing and Hunting/1151: Support Activities for Crop Production
Geography: Northern America
Time period: 2008-12-31 to 2008-12-31
Allocation method: no allocation
Generated by: Daniel Inman
Published in: Hsu, D.
restrictionsDescription: All information can be accessed by everybody.
copyright: false

## Technology
average

## Geography
North America

## Time period
2009

## Reference product
- Grinding [RNA]: 2000 kg

## Inputs from technosphere
- Electricity, at grid [RNA]: 61.876 kWh; provider Electricity, at Grid, US, 2010
  From INL design report (4/09), Table 4-9. Includes the conveyor feed electricity
- Agricultural machinery, general, production: 0.822 kg
  8.42 comes from the "chopping, maize" ecoinvent process for 1 ha. converted for 1 short ton of corn.
- Corn wet milling, operations, AP-42 [RNA]: 2000 kg

## Sources
- Hsu, D.
