# Cellulosic fiberboard, uncoated, at plant

Dataset: openLCA process, unit process
Category: 31-33: Manufacturing/3212: Veneer, Plywood, and Engineered Wood Product Manufacturing
Geography: Northern America
Time period: 2009-12-31 to 2010-12-30
Allocation method: physical allocation
Generated by: Richard Bergman
Reviewer: Maureen Puetmann
Published in: Bergman, R.
restrictionsDescription: All information can be accessed by everybody.
copyright: false

## General comment
North American cellulosic fiberboard is used in residential and commercial construction. Various uses and applications for fiberboard include: 1. Sound-deadening board, 2. Structural sheathing, and 3. Roofing substrate (i.e., roof fiberboard). Asphalt is both used internally as a binder to improve strength properties and externally as a coating. Cellulosic fiberboard is a panel product developed to utilize industrial wood residue. Wood residues originate from industrial wood waste such as shavings, sawdust, and chips produced during other wood manufacturing processes and from under-utilized whole trees. Additional feedstock sources include mixed paper and construction wood waste. Cellulosic fiberboard falls into the Standard Industrial Classification of reconstituted wood products. Over the last several decades cellulosic fiberboard has evolved into a highly engineered product designed to meet specific end-use requirements. The most common dimensions of cellulosic fiberboard panels are 0.5 inch (12.7 mm) thick, 4.0 feet (1.22 m) wide and 8.0 (2.44 m) long. However thickness, width, and length can vary to meet end-use requirements.

Base process data presented with allocations to within process co-products noted. Refer to allocation worksheet for specifics. All allocations performed using mass or volume. This sheet sets out each unit process in the production of one cubic meter of cellulosic fiberbaord as produced in the North America.

Important note: although most of the data in the US LCI database has undergone some sort of review, the database as a whole has not yet undergone a formal validation process. Please email comments to lci@nrel.gov.; Geography: North America

## Technology
typical

## Geography
North America

## Time period
2010 and after

## Reference product
- Cellulosic fiberboard, uncoated, at plant [RNA]: 254 kg
  1 m3 of uncoated cellulosic fiberboard

## By-products
- Molasses, at cellulosic fiberboard plant [RNA]: 5.8 kg
- Culled boards, wood fuel, at cellulosic fiberboard plant [RNA]: 1.1 kg
  internal fuel to boiler
- Other, not specified, at cellulosic fiberboard plant [RNA]: 1.5 kg
- Pins and fines, at cellulosic fiberboard plant [RNA]: 1.9 kg

## Inputs from technosphere
- Electricity, nuclear, at power plant [RNA]: 1.50558 kWh
  Chipper; 16%
- Chips; softwood; green; at sawmill [US]: 26.4797 kg
  Feedstock input; updated value 11/2015
- Sodium aluminate, cellulosic fiberboard: 0.15 kg
  No upstream impacts; represents 0.06% of main product by mass
- Electricity, residual fuel oil, at power plant [RNA]: 0.0386 kWh
  Chipper; 0.40%
- Roundwood, hardwood, average, at forest road [RNA]: 0.02567 m3
  Feedstock input; chipped onsite but electricity is embedded in mill usage.
- Polyethylene, high density, HDPE, resin, at plant [RNA]: 0.03626 kg
  Final packaging material; wrapping
- Softwood logs with bark; harvested at average intensity site; at mill [US]: 0.06326, 0.14028 m3 (2 entries)
  Feedstock input
- Construction waste: 31.2177 kg
  Feedstock input updated 11/2015;
- Wood Combusted, at boiler, at cellulosic fiberboard mill [RNA]: 24.8 kg
  Wood boiler process; 2015
- Paper, bag and sack, unbleached kraft, average production, at mill [RNA]: 0.03626 kg
  Final packaging material; wrapping
- Transport, single unit truck, diesel powered [RNA]: 16.6897 t*km
  Feedstock transport; Other residue
- Mixed recyclables, at collection, commercial [RNA]: 6.45 kg
  Fiberboard production
- Gasoline, combusted in equipment, at pulp and paper mill (EXCL.) [RNA]: 0.137 l
  Fiberboard production
- Slack wax; at plant [US]: 2.94 kg; provider Slack wax, at plant, US SE
  Slack wax production process represents 1.1% of main product by mass
- Shavings; softwood; kiln dried; at planer [US]: 29.9936 kg; provider Sawn lumber, softwood, planed, kiln dried, at planer, NE-NC
  Feedstock input; updated 11/2015; original input was "Planer shavings, from dried lumber, at planer mill" CUTOFF replaced with product linked to CORRIM database
- Electricity, biomass, at power plant [RNA]: 2.46 kWh
  Fiberboard production;1.20%
- Other, not specified, at cellulosic fiberboard plant [RNA]: 0.7901 kg; provider Cellulosic fiberboard, uncoated, at plant
  Feedstock input; updated 11/2015;
- Materials for basecoat painting, at plant: 0.000317 m3
  No upstream impacts
- Ink: 0.0305 kg
  No upstream impacts
  <1%
- Electricity, at wind power plant, unspecified: 0.12547 kWh
  Chipper; 1.3%
- Wood chips, at cellulosic fiberboard, NA: 39.59 kg
  Feedstock input; updated 11/2015;
- Natural gas, combusted in industrial boiler [RNA]: 0.00043, 46.66 m3 (2 entries)
  Fiberboard production
- Anthracite coal, combusted in industrial boiler [RNA]: 13.04 kg
  Fiberboard production
- Cardboard - Cellulosic fiberboard: 0.0118 kg
  Final packaging material; <1%
- Transport, single unit truck, diesel powered [RNA]: 3.00048 t*km
  Feedstock transport; 11.2% of wood residue comes from the NE-NC US
- Electricity, nuclear, at power plant [RNA]: 31.98 kWh
  Fiberboard production;16%
- Diesel, combusted in industrial equipment [RNA]: 0.53 l
  Fiberboard production
- Disposal, wood waste, to unspecified treatment: 2.38 kg
  Fiberboard production
- Electricity, bituminous coal, at power plant [RNA]: 3.40687 kWh
  Chipper; 35%
- Electricity, from renewable source, unspecified: 0.41 kWh
  Fiberboard production;0.20%
- Electricity, natural gas, at power plant [RNA]: 23.985 kWh
  Fiberboard production; 12%
- Electricity, hydropower, at power plant, unspecified: 3.31035 kWh
  Chipper; 34%
- Electricity, residual fuel oil, at power plant [RNA]: 0.82 kWh
  Fiberboard production;0.40%
- Recycled postconsumer PET flake [RNA]: 0.0763 kg
  Final packaging material
- Gasoline, at refinery: 0.00331 l; provider Petroleum refining, at refinery
  Fiberboard production; oils and grease
- Electricity, hydropower, at power plant, unspecified: 70.315 kWh
  Fiberboard production;34%
- Carbon black, at plant: 0.44 kg
  No upstream impacts; thermal energy at fiberboard production
- Transport, train, diesel powered [RNA]: 0.23 t*km
  Fiberboard production: coal transport for thermal energy use on-site
- Water, at user: 24.4 kg
  No upstream impacts
- Electricity, biomass, at power plant [RNA]: 0.11581 kWh
  Chipper; 1.20%
- Mixed paper: 4.9745 kg
  Feedstock input;updated 11/2015;
- Sawdust; softwood; kiln dried; at planer [US]: 0.4877 kg
  Feedstock input
- Electricity, at grid [RNA]: 0.66833 kWh; provider Electricity, at Grid, US, 2010
  Starch production
- Sodium aluminate, cellulosic fiberboard: 1.57 kg
  No upstream impacts represents 0.6% of main product by mass
- Gasoline, at refinery: 0.0315 l; provider Petroleum refining, at refinery
  Fiberboard production; lubricant oils
- Electricity, from renewable source, unspecified: 0.0193 kWh
  Chipper; 0.20%
- Electricity, at wind power plant, unspecified: 2.665 kWh
  Fiberboard production;1.30%
- Electricity, natural gas, at power plant [RNA]: 1.12919 kWh
  Chipper; 12%
- Transport, combination truck, average fuel mix [RNA]: 0.39102 t*km
  Starch production
- Natural gas, combusted in industrial boiler [RNA]: 0.16918 m3
  Starch production
- Disposal, solid waste, unspecified, to unspecified treatment: 5.63 kg
  Fiberboard production
- Potato, at field [US]: 15.6408 kg; provider Potato, whole plant, at field
  Starch production
- Surfaced dried lumber; at planer mill [US]: 1.39 kg
  Final packaging material
- Gasoline, combusted in equipment, at pulp and paper mill (EXCL.) [RNA]: 0.34 l
  Fiberboard production; boiler startup
- Polyethylene, linear low density, LLDPE, resin, at plant [RNA]: 0.00989 kg
  Final packaging material; wrapping
- Transport, single unit truck, diesel powered [RNA]: 14.83 t*km
  Feedstock transport; 61.2% of wood residue comes from the SE; three different harvesting intensities; SE US
- Adhesives and binders, at plant: 0.02 kg
  No upstream impacts
- Adhesives and binders, asphalt flake, cellulosic fiberboard: 10.21 kg
  No upstream impacts represents 3.9% of main product by mass
- Chips; softwood; green; at sawmill [US]: 81.0801 kg
  Feedstock input; updated 11/2015;
- Electricity, bituminous coal, at power plant [RNA]: 72.365 kWh
  Fiberboard production;35%
- Natural gas, combusted in industrial equipment, 1.357 m3/kg, 52.13 MJ/kg [RNA]: 0.00109 m3; provider Natural gas, combusted in industrial equipment
  Fiberboard production; proxy for propane
- Wood chips; hardwood; green; at sawmill [US]: 5.9768 kg; provider Sawn lumber, hardwood, rough, green, at sawmill, SE
  Feedstock input; updated 11/2015;
  on the USLCI, but not in Simapro is Chips, hardwood, green, at sawmill, kg / SE_US
- Transport, combination truck, diesel powered [RNA]: 8.71 t*km
  Fiberboard production; total transportation for all additives
- Hot rolled sheet, steel, at plant [RNA]: 0.0043 kg
  Final packaging material
- Gasoline, at refinery: 0.0308 l; provider Petroleum refining, at refinery
  Fiberboard production; hydraulic fluid
- Transport, single unit truck, diesel powered [RNA]: 10.1223 t*km
  Feedstock transport; 27.6% of wood residue comes from Canada

## Inputs from nature
- Carbon [resource, biotic]: 485 kg
  renewable materials
- Water [resource, water]: 353000 kg
  Fiberboard production; municipal
- Water [resource, water]: 14870.7 kg
  Starch production
- Water [resource, water, subterranean]: 1230 kg
  Fiberboard production; ground water
- Water [resource, water]: 943000 kg
  Fiberboard production; surface water

## Emissions to nature
- Acetaldehyde [emission, air]: 0.0199 kg
  Fiberboard production
- Particulate matter, ≤ 2.5μm [emission, air]: 0.0446 kg
  Fiberboard production
- Methanol [emission, air]: 0.0624 kg
  Fiberboard production
- Limonene [emission, air]: 0.00763 kg
  Fiberboard production
- Suspended solids, inorganic [emission, water]: 1.113 kg
  Fiberboard production; TDS, Total Dissolved Solids
- Volatile organic compounds [emission, air]: 0.21 kg
  Fiberboard production
- Formaldehyde [emission, air]: 0.0164 kg
  Fiberboard production
- Particulate matter [emission, air]: 0.151 kg
  Fiberboard production
- Particulate matter, > 2.5μm and ≤ 10μm [emission, air]: 0.128 kg
  Fiberboard production
- Carbon monoxide [emission, air]: 0.0409 kg
  Fiberboard production
- Cumene [emission, air]: 0.00519 kg
  Fiberboard production
- Mercury [emission, air]: 0 kg
  Fiberboard production
- Methyl ethyl ketone [emission, air]: 0.00202 kg
  Fiberboard production
- Nitrous oxide [emission, air]: 0.0487 kg
  Fiberboard production
- .alpha.-Pinene [emission, air]: 0.11 kg
  Fiberboard production
- Toluene [emission, air]: 0.00111 kg
  Fiberboard production
- Acrolein [emission, air]: 0.00705 kg
  Fiberboard production
- Phenol [emission, air]: 0.00393 kg
  Fiberboard production
- Acetone [emission, air]: 0.00964 kg
  Fiberboard production
- Chemical Oxygen Demand [emission, water]: 0.2029 kg
  Fiberboard production
- Particulate matter, ≤ 10μm [emission, air]: 0.172 kg
  Fiberboard production
- Benzene [emission, air]: 0.000882 kg
  Fiberboard production
- Lead [emission, air]: 2.64e-5 kg
  Fiberboard production
- Biological Oxygen Demand [emission, water]: 0.2712 kg
  Fiberboard production
- Oils, unspecified [emission, water]: 0.01515 kg
  Fiberboard production
- Sulfur dioxide [emission, air]: 0.000276 kg
  Fiberboard production
- Suspended solids, inorganic [emission, water]: 0.223 kg
  Fiberboard production
- Propionaldehyde [emission, air]: 0.014 kg
  Fiberboard production

## Allocation factors
- causal, Other, not specified, at cellulosic fiberboard plant, for Water, at user: 0.00567537
- causal, Cellulosic fiberboard, uncoated, at plant, for Construction waste: 0.961029
- causal, Pins and fines, at cellulosic fiberboard plant, for Construction waste: 0.0071888
- causal, Other, not specified, at cellulosic fiberboard plant, for Sulfur dioxide: 0.00567537
- causal, Other, not specified, at cellulosic fiberboard plant, for Chips; softwood; green; at sawmill: 0.00567537
- causal, Pins and fines, at cellulosic fiberboard plant, for Carbon monoxide: 0.0071888
- causal, Culled boards, wood fuel, at cellulosic fiberboard plant, for Ink: 0.00416194
- causal, Culled boards, wood fuel, at cellulosic fiberboard plant, for Limonene: 0.00416194
- causal, Molasses, at cellulosic fiberboard plant, for Electricity, residual fuel oil, at power plant: 0.0219448
- causal, Pins and fines, at cellulosic fiberboard plant, for Mixed paper: 0.0071888
- causal, Other, not specified, at cellulosic fiberboard plant, for Water: 0.00567537
- causal, Culled boards, wood fuel, at cellulosic fiberboard plant, for Softwood logs with bark; harvested at average intensity site; at mill: 0.00416194
- causal, Culled boards, wood fuel, at cellulosic fiberboard plant, for Water: 0.00416194
- causal, Pins and fines, at cellulosic fiberboard plant, for Electricity, natural gas, at power plant: 0.0071888
- causal, Other, not specified, at cellulosic fiberboard plant, for Water: 0.00567537
- causal, Pins and fines, at cellulosic fiberboard plant, for Natural gas, combusted in industrial equipment, 1.357 m3/kg, 52.13 MJ/kg: 0.0071888
- causal, Culled boards, wood fuel, at cellulosic fiberboard plant, for Sawdust; softwood; kiln dried; at planer: 0.00416194
- physical, Other, not specified, at cellulosic fiberboard plant: 0.00567537
- causal, Other, not specified, at cellulosic fiberboard plant, for Anthracite coal, combusted in industrial boiler: 0.00567537
- causal, Culled boards, wood fuel, at cellulosic fiberboard plant, for Methanol: 0.00416194
- causal, Other, not specified, at cellulosic fiberboard plant, for Electricity, hydropower, at power plant, unspecified: 0.00567537
- economic, Pins and fines, at cellulosic fiberboard plant: 0.0071888
- causal, Molasses, at cellulosic fiberboard plant, for Particulate matter, ≤ 10μm: 0.0219448
- causal, Pins and fines, at cellulosic fiberboard plant, for Natural gas, combusted in industrial boiler: 0.0071888
- causal, Culled boards, wood fuel, at cellulosic fiberboard plant, for Roundwood, hardwood, average, at forest road: 0.00416194
- causal, Molasses, at cellulosic fiberboard plant, for Surfaced dried lumber; at planer mill: 0.0219448
- causal, Pins and fines, at cellulosic fiberboard plant, for Electricity, at wind power plant, unspecified: 0.0071888
- causal, Cellulosic fiberboard, uncoated, at plant, for Electricity, from renewable source, unspecified: 0.961029
- causal, Molasses, at cellulosic fiberboard plant, for Electricity, bituminous coal, at power plant: 0.0219448
- causal, Other, not specified, at cellulosic fiberboard plant, for Transport, single unit truck, diesel powered: 0.00567537
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
## Sampling procedure
Industry survey

## Sources
- Puettmann, et. al.
- Bergman, R.
