# Phenol formaldehyde resin, neat, 47% solids

Dataset: openLCA process, unit process
Category: 31-33: Manufacturing/3252: Resin, Synthetic Rubber, and Artificial and Synthetic Fibers and Filaments Manufacturing
Geography: Northern America
Time period: 2004-12-31 to 2004-12-31
Allocation method: no allocation
Generated by: Maureen Puettmann
Published in: James B. Wilson
restrictionsDescription: All information can be accessed by everybody.
copyright: true

## General comment
PF resin weight given as liquid at 47% solids.

Important note: although most of the data in the US LCI database has
undergone some sort of review, the database as a whole has not yet
undergone a formal validation process.
Please email comments to lci@nrel.gov. This PF process has been reviewed by 6 industry representatives and 2 reviewers from a peer review journal

## Technology
The resin manufacturing processes begin with the conversion of methanol by catalytic oxidation in a reactor vessel to produce an aqueous form of formaldehyde The methanol is first vaporized by warming, mixed with air, and then introduced into a reactor containing a metal catalyst of either silver or molybdenum/iron oxide in very small quantities. Upon exiting the reactor the formaldehyde is cooled and then sent to the absorber where it is absorbed into water to produce an aqueous solution. Heat is recovered during this process, excess steam is captured and used elsewhere in the manufacturing process. Various formaldehyde resins are then produced in a batch reactor by reacting formaldehyde with either urea, melamine, phenol, resorcinol or some combination of these. The process involves heating the mix and controlling the reaction by controlling the temperature, pH, ratio of formaldehyde to urea, phenol, melamine, resorcinol or some combination of these chemicals, and the rate of charging until the desired degree of polymerization is achieved. The reaction is quenched and then cooled. If needed, water is stripped off to provide the desired percentage of resin solids. Most of the process water is recycled and used within the production process. Very little waste is generated by resin production. Some production facilities used regenerative thermal oxidizers (RTOs), regenerative catalytic oxidizers (RCOs) and/or wet scrubbers as emission controllers to reduce the type and percentage of some emissions. RTOs and RCOs require the additional use of electricity and natural gas for their operation. It is noteworthy that essentially all production facilities started with methanol, only a very small amount (<1%) of formaldehyde was purchased for these operations, as such it was not included in the analysis.

## Geography
Average US, United States data

## Reference product
- Phenol formaldehyde resin, neat, 47% solids [RNA]: 1 kg
  neat (liquid) PF resin at 47% solids giving 53% water; the molar ratio of F to P is 2.23

## Inputs from technosphere
- Methanol, at plant, kg: 0.209 kg
  100% solids
- Sodium hydroxide: 0.061 kg
  liquid NaOH at 100% solids (ovendry weight is 0.0612 kg)
- Disposal, solid waste, unspecified, to unspecified landfill: 0.0002 kg
- Phenol, at plant: 0.244 kg
  100% solids
- Natural gas, combusted in industrial boiler [RNA]: 0.00821 m3
- Electricity, at grid [RNA]: 0.0136111 kWh; provider Electricity, at Grid, US, 2010
  for emissions control equipment (RTOs and RCOs)
- Transport, train, diesel powered [RNA]: 0.675 t*km
  Chemical transport, wet weight, phenol = 1,615 km, methanol = 2,025 km
- Transport, combination truck, diesel powered [RNA]: 0.0564 t*km
  Chemical transport, wet weight. Phenol= 230 km, NaOH =297 km
- Electricity, at grid [RNA]: 0.022 kWh; provider Electricity, at Grid, US, 2010
  for processing
- Liquefied petroleum gas, combusted in industrial boiler [RNA]: 2.93e-6 l
  for forklifts

## Inputs from nature
- Water [resource, water, subterranean]: 0.037 kg
- Water [resource, water]: 0.297 kg
- Water [resource, water]: 0.016 kg
  cooling water recycled back into resin production; picked up additional water from condensation reaction, and may have picked up additional water from other resin production

## Emissions to nature
- Formaldehyde [emission, air, troposphere, rural]: 6.69e-6 kg
- Methanol [emission, air, troposphere, rural]: 3.2e-6 kg
- Particulate matter [emission, air, troposphere, rural]: 2.31e-6 kg
- Volatile organic compounds [emission, air, troposphere, rural]: 2.89e-5 kg
  RTOs and RCOs used by some plants in survey to reduce VOC and HAP emissions
- Phenol [emission, air, troposphere, rural]: 2.04e-6 kg
- Dimethyl ether [emission, air, troposphere, rural]: 4.73e-6 kg

## Sampling procedure
U.S. plants were surveyed that represent 62% of produciton for PF resin for the wood composites industry.

## Sources
- James B. Wilson
- James B. Wilson
