# Veneer, hardwood, green, at veneer mill, E

Dataset: openLCA process, unit process
Category: 31-33: Manufacturing/3212: Veneer, Plywood, and Engineered Wood Product Manufacturing
Geography: United States
Time period: 2006-12-31 to 2006-12-31
Allocation method: physical allocation
Generated by: Maureen Puettmann
Published in: Richard D. Bergman
restrictionsDescription: All information can be accessed by everybody.
copyright: false

## General comment
All weights given on an ovendry basis. All moisture contents are on an ovendry basis. MC% =(weight of water in wood / weight of oven dry wood) *100. Reference to specific gravities use oven dry mass and volumes at specified moisture contents. Reference to densities use mass and volume at specified moistrue contents.

Important note: although most of the data in the US LCI database has
undergone some sort of review, the database as a whole has not yet
undergone a formal validation process.
Please email comments to lci@nrel.gov.

## Technology
Typical

## Geography
E= Eastern US United States. The states included MN, IA, MO, WI, IL, NJ, OH, IN, MI, WV, PA, MD, DW, NJ, NY, ME, VT, NH, RI, MA, CT, VA, KY, AR, LA, MS, AL, FL,GA, NC, SC, and TN

## Reference product
- Veneer; hardwood; green; at veneer mill [US]: 1 kg
  Weight reported on an ovendry basis. Moisture content (ovendry basis) = 85%

## By-products
- Wood fuel; hardwood; green; at veneer mill [US]: 0.32965 kg
  Weight reported on an ovendry basis. Moisture content (ovendry basis) = 85%
- Wood chips; hardwood; green; at veneer mill [US]: 0.98158 kg
  Weight reported on an ovendry basis. Moisture content (ovendry basis) = 85%

## Inputs from technosphere
- Gasoline, combusted in equipment [RNA]: 0.00015783 l
  Amount of gasoline consumed during conditioning. Represents 14.3% of mill use of gasoline.
- Conditioned log; hardwood; green; at veneer mill [US]: 0.0045318 m3; provider Conditioned log, hardwood, green, at veneer mill, E
  Based on a weighted average specific gravity 0.510. 2.46 M3 = 1255 KG Moisture content (ovendry basis) = 85%.
- Electricity, at grid [RNA]: 0.24504 kWh; provider Electricity, Eastern US, 2014
  Amount of electricity consumed during conditions. Represents 60% of mill use of electricity.
- Natural gas, combusted in industrial equipment, 1.357 m3/kg, 52.13 MJ/kg [RNA]: 8.1584e-7 m3; provider Natural gas, combusted in industrial equipment
  Amount of natural gas consumed during conditioning. Represents 14.3% of mill use of natural gas; proxy for propane
- Diesel, combusted in industrial equipment [RNA]: 0.00065377 l
  Amount of diesel consumed during conditioning. Represents 5% of mill use of diesel

## Allocation factors
- causal, Veneer; hardwood; green; at veneer mill, for Gasoline, combusted in equipment: 0.43267
- causal, Veneer; hardwood; green; at veneer mill, for Diesel, combusted in industrial equipment: 0.43267
- physical, Wood fuel; hardwood; green; at veneer mill: 0.14263
- causal, Wood fuel; hardwood; green; at veneer mill, for Electricity, at grid: 0.14263
- causal, Wood fuel; hardwood; green; at veneer mill, for Diesel, combusted in industrial equipment: 0.14263
- causal, Veneer; hardwood; green; at veneer mill, for Conditioned log; hardwood; green; at veneer mill: 0.43267
- causal, Wood fuel; hardwood; green; at veneer mill, for Conditioned log; hardwood; green; at veneer mill: 0.14263
- physical, Wood chips; hardwood; green; at veneer mill: 0.4247
- economic, Wood fuel; hardwood; green; at veneer mill: 0.14263
- causal, Veneer; hardwood; green; at veneer mill, for Natural gas, combusted in industrial equipment, 1.357 m3/kg, 52.13 MJ/kg: 0.43267
- causal, Veneer; hardwood; green; at veneer mill, for Electricity, at grid: 0.43267
- causal, Wood chips; hardwood; green; at veneer mill, for Natural gas, combusted in industrial equipment, 1.357 m3/kg, 52.13 MJ/kg: 0.4247
- causal, Wood chips; hardwood; green; at veneer mill, for Electricity, at grid: 0.4247
- physical, Veneer; hardwood; green; at veneer mill: 0.43267
- causal, Wood chips; hardwood; green; at veneer mill, for Gasoline, combusted in equipment: 0.4247
- causal, Wood fuel; hardwood; green; at veneer mill, for Gasoline, combusted in equipment: 0.14263
- causal, Wood chips; hardwood; green; at veneer mill, for Diesel, combusted in industrial equipment: 0.4247
- causal, Wood chips; hardwood; green; at veneer mill, for Conditioned log; hardwood; green; at veneer mill: 0.4247
- economic, Veneer; hardwood; green; at veneer mill: 0.43267
- economic, Wood chips; hardwood; green; at veneer mill: 0.4247
- causal, Wood fuel; hardwood; green; at veneer mill, for Natural gas, combusted in industrial equipment, 1.357 m3/kg, 52.13 MJ/kg: 0.14263

## Sampling procedure
Questionnaires from 4 veneer mills and 5 flooring plants in the E. United States representing 32 states.

## Intended application
Only mass allocation factors are available for the multi-functional processes (disregard economic allocation factor values-they are mass allocation factors).

## Sources
- Richard D. Bergman
