# Sawn lumber, hardwood, rough, green, at sawmill, SE

Dataset: openLCA process, unit process
Category: 31-33: Manufacturing/3211: Sawmills and Wood Preservation
Geography: United States
Time period: 2004-12-31 to 2005-12-31
Allocation method: physical allocation
Generated by: Maureen Puettmann
Published in: Richard D. Bergman
restrictionsDescription: All information can be accessed by everybody.
copyright: false

## General comment
Allocation based on mass.
Important note: although most of the data in the US LCI database has
undergone some sort of review, the database as a whole has not yet
undergone a formal validation process.
Please email comments to lci@nrel.gov.

## Technology
Average technology. Some data extrapolated from similar processes.

## Geography
SE = Southeast United States. The 8 states are Arkansas, Louisiana, Mississippi, Alabama, Tennessee, North Carolina, South Carolina, Georgia.

## Reference product
- Sawn lumber; hardwood; rough; green; at sawmill [US]: 1 kg
  oven-dried weight. Green lumber, wood specific gravity of 0.528 and 85%MC dry basis ; 1.45m3 rough green lumber =1 m3 planed dry lumber

## By-products
- Hogged fuel; hardwood; green; at sawmill [US]: 0.16732 kg
  Oven-dried weight.
- Bark; hardwood; green; at sawmill [US]: 0.035294 kg
  Oven-dried weight. 100%MC dry basis; roughly half of bark is burned for fuel (49%) and the rest is for mulch (51%)
- Wood fuel; hardwood; green; at sawmill [US]: 0.1268 kg
  Oven-dried weight. sawdust =30%, hogged fuel= 43%, bark =27%.
- Wood chips; hardwood; green; at sawmill [US]: 0.37124 kg
  Oven-dried weight.
- Sawdust; hardwood; green; at sawmill [US]: 0.054902 kg
  Oven-dried weight.

## Inputs from technosphere
- Disposal, solid waste, unspecified, to inert material landfill: 0.0011373 kg
  weighted for 5 mills that reported value
- Bark; hardwood; green; at logyard [US]: 0.028235 kg; provider Roundwood, hardwood, green, at logyard, SE
  Wood specific gravity of 0.558 and 100%MC dry basis weight of the bark; bark is used both as fuel (49%) and mulch (51%)
- Diesel, combusted in industrial equipment [RNA]: 0.0011059 l
  20% of mill use for onsite transportation
- Roundwood; hardwood; green; at logyard [US]: 0.0031895 m3; provider Roundwood, hardwood, green, at logyard, SE
  Wood specific gravity of 0.528 and 85%MC dry basis weight of the wood
- Recycling, wood waste, unspecified: 0.00046667 kg
  weighted for 4 mills that reported value
- Natural gas, combusted in industrial equipment, 1.357 m3/kg, 52.13 MJ/kg [RNA]: 9.1503e-6 l; provider Natural gas, combusted in industrial equipment
  20% of mill use for onsite transportation; proxy for propane
- Electricity, at grid [RNA]: 0.097778 kWh; provider Electricity, Eastern US, 2014
  45% of total electricity is used for sawing
- Electricity; onsite boiler; hardwood mill; average [US]: 0.0054641 kWh; provider Heat, onsite boiler, hardwood mill, average, SE
  45% of total electricity is used for sawing
- Gasoline, combusted in equipment [RNA]: 0.00011503 l
  20% of mill use for onsite transportation

## Allocation factors
- causal, Hogged fuel; hardwood; green; at sawmill, for Electricity, at grid: 0.0953088
- economic, Sawn lumber; hardwood; rough; green; at sawmill: 0.56962
- causal, Hogged fuel; hardwood; green; at sawmill, for Bark; hardwood; green; at logyard: 0.0953088
- causal, Sawdust; hardwood; green; at sawmill, for Electricity; onsite boiler; hardwood mill; average: 0
- causal, Wood chips; hardwood; green; at sawmill, for Recycling, wood waste, unspecified: 0
- causal, Bark; hardwood; green; at sawmill, for Roundwood; hardwood; green; at logyard: 0.0201042
- causal, Sawdust; hardwood; green; at sawmill, for Natural gas, combusted in industrial equipment, 1.357 m3/kg, 52.13 MJ/kg: 0
- causal, Wood fuel; hardwood; green; at sawmill, for Electricity, at grid: 0
- causal, Wood fuel; hardwood; green; at sawmill, for Roundwood; hardwood; green; at logyard: 0
- economic, Wood fuel; hardwood; green; at sawmill: 0
- causal, Wood chips; hardwood; green; at sawmill, for Natural gas, combusted in industrial equipment, 1.357 m3/kg, 52.13 MJ/kg: 0
- causal, Bark; hardwood; green; at sawmill, for Electricity, at grid: 0.0201042
- causal, Wood fuel; hardwood; green; at sawmill, for Bark; hardwood; green; at logyard: 0
- causal, Wood chips; hardwood; green; at sawmill, for Electricity, at grid: 0
- causal, Hogged fuel; hardwood; green; at sawmill, for Electricity; onsite boiler; hardwood mill; average: 0.0953088
- causal, Sawn lumber; hardwood; rough; green; at sawmill, for Electricity, at grid: 0.56962
- causal, Wood chips; hardwood; green; at sawmill, for Diesel, combusted in industrial equipment: 0
- causal, Bark; hardwood; green; at sawmill, for Natural gas, combusted in industrial equipment, 1.357 m3/kg, 52.13 MJ/kg: 0.0201042
- physical, Sawn lumber; hardwood; rough; green; at sawmill: 0.56962
- economic, Sawdust; hardwood; green; at sawmill: 0
- causal, Sawn lumber; hardwood; rough; green; at sawmill, for Bark; hardwood; green; at logyard: 0.56962
- causal, Sawdust; hardwood; green; at sawmill, for Disposal, solid waste, unspecified, to inert material landfill: 0
- causal, Sawdust; hardwood; green; at sawmill, for Roundwood; hardwood; green; at logyard: 0
- physical, Sawdust; hardwood; green; at sawmill: 0
- causal, Hogged fuel; hardwood; green; at sawmill, for Roundwood; hardwood; green; at logyard: 0.0953088
- causal, Bark; hardwood; green; at sawmill, for Disposal, solid waste, unspecified, to inert material landfill: 0.0201042
- causal, Wood fuel; hardwood; green; at sawmill, for Electricity; onsite boiler; hardwood mill; average: 0
- causal, Wood chips; hardwood; green; at sawmill, for Electricity; onsite boiler; hardwood mill; average: 0
- causal, Sawdust; hardwood; green; at sawmill, for Diesel, combusted in industrial equipment: 0
- economic, Wood chips; hardwood; green; at sawmill: 0
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
## Sampling procedure
Questionnaires from 12 mills from the 8 states of southeast region. Hardwood sawmills were members of the Hardwood Manufacturer Association (HMA).

## Intended application
Only mass allocation factors are available for the multi-functional processes (disregard economic allocation factor values-they are mass allocation factors).

## Sources
- Forest Products Laboratory
- Forest Products Laboratory
- Richard D. Bergman
- Andrew J. Baker
- Maureen Puettmann
- NHLA
