# Propylene, at plant

Dataset: openLCA process, unit process
Category: 31-33: Manufacturing/3241: Petroleum and Coal Products Manufacturing
Geography: Northern America
Time period: 2002-12-31 to 2002-12-31
Allocation method: no allocation
Generated by: Franklin Associates
Published in: THE PLASTICS DIVISION OF THE AMERICAN C
restrictionsDescription: All information can be accessed by everybody.
copyright: false

## General comment
Numerous coproduct streams are produced during this process. Fuel gas and off-gas were two of the coproducts produced that were exported to another process for fuel use. When these fuel coproducts are exported from the hydrocracker, they carry with them the allocated share of the inputs and outputs for their production. The ratio of the mass of the exported fuel over the total mass output was removed from the total inputs and outputs of the hydrocracker, and the remaining inputs and outputs are allocated over the material hydrocracker products. No energy credit is applied for the exported fuels, since both the inputs and outputs for the exported fuels have been removed from the data set. Complete inventory data and metadata are available in full in the final report and appendices, Cradle-to-Gate Life Cycle Inventory of Nine Plastic Resins and Four Polyurethane Precursors. This report has been extensively reviewed within Franklin Associates and has undergone partial critical review by ACC Plastics Division members and is available at: www.americanchemistry.com. Quantities may vary slightly between the reference to main source and and this module due to rounding. Important note: although most of the data in the US LCI database has undergone some sort of review, the database as a whole has not yet undergone a formal validation process. Please email comments to lci@nrel.gov.

## Technology
Steam cracking of hydrocarbons (including natural gas liquids and petroleum liquids)

## Geography
North America (US and Canada)

## Reference product
- Propylene, at plant [RNA]: 1 kg

## By-products
- Recovered energy [RNA]: 0.00534971 MJ
  Credit for steam or heat co-product sold externally.

## Inputs from technosphere
- Transport, train, diesel powered [RNA]: 0.0240892 t*km
- Natural gas, processed, for olefins production, at plant, material use: 0.642682 kg
  Specific raw materials from oil refining and natural gas processing include ethane, propane, liquid feed, heavy raffinate, and DNG
- Electricity, at grid [RNA]: 0.10193 kWh; provider Electricity, at Grid, US, 2010
- Transport, pipeline, unspecified petroleum products [RNA]: 0.145951 t*km
- Disposal, solid waste, unspecified, to waste-to-energy: 4.37487e-6 kg
- Electricity, at cogen, for natural gas turbine [US]: 0.047119 kWh
- Transport, barge, residual fuel oil powered [RNA]: 0.07719 t*km
- Disposal, solid waste, unspecified, to sanitary landfill: 0.000362141 kg
- Transport, combination truck, diesel powered [RNA]: 0.0308268 t*km
- Natural gas, combusted in industrial boiler, at hydrocracker, for propylene [RNA]: 0.1098 m3
- Gasoline, combusted in equipment [RNA]: 1.71253e-5 l
- Transport, pipeline, natural gas [RNA]: 1.22308 t*km
- Transport, barge, diesel powered [RNA]: 0.023215 t*km
- Petroleum refining, for olefins production, at plant, internal offgas use: 0.06624 kg
  A portion of the material feed combusts within the hydrocracker and produces an offgas, which provides an internal energy source.
- Petroleum refining, for olefins production, at plant, material use: 0.357112 kg
  (same comment as for Natural gas, processed, for olefins production, at plant, material use)
- Disposal, solid waste, unspecified, to municipal incineration: 0.00559549 kg
- Natural gas, processed, for olefins production, at plant, internal offgas use: 0.120507 kg
  (same comment as for Petroleum refining, for olefins production, at plant, internal offgas )
- Diesel, combusted in industrial equipment [RNA]: 1.4872e-5 l
  Includes diesel fuel and distillate oil amounts.

## Inputs from nature
- Water [resource, water]: 0.609612 kg
  Consumptive use includes: water incorporated into the product, water evaporated during the process, and/or water used and released to a body other than that from which it was drawn.

## Emissions to nature
- Chemical Oxygen Demand [emission, water]: 1e-5 kg
  This emission was reported by fewer than three companies. To indicate known emissions while protecting the confidentiality of individual company responses, the emission is reported only by order of magnitude.
- HCFC-22 [emission, air]: 1e-9 kg
  (same comment as for Chemical Oxygen Demand)
- Carbon monoxide [emission, air]: 1e-6 kg
  (same comment as for Chemical Oxygen Demand)
- Chlorine [emission, air]: 1e-7 kg
  (same comment as for Chemical Oxygen Demand)
- Toluene [emission, water]: 1e-7 kg
  (same comment as for Chemical Oxygen Demand)
- Methane [emission, air]: 1e-6 kg
  (same comment as for Chemical Oxygen Demand)
- Suspended solids, inorganic [emission, water]: 4.80162e-6 kg
- Ethylbenzene [emission, water]: 1e-8 kg
  (same comment as for Chemical Oxygen Demand)
- Organic compounds [emission, air]: 1e-6 kg
  (same comment as for Chemical Oxygen Demand)
- Benzene [emission, water]: 1e-8 kg
  (same comment as for Chemical Oxygen Demand)
- Styrene [emission, water]: 1e-9 kg
  (same comment as for Chemical Oxygen Demand)
- Volatile organic compounds [emission, air]: 0.000105932 kg
- Biological Oxygen Demand [emission, water]: 6.36638e-7 kg
- Total Organic Carbon [emission, water]: 1e-6 kg
  (same comment as for Chemical Oxygen Demand)
- Particulate matter [emission, air]: 8.22987e-6 kg
- Hydrochloric acid [emission, air]: 1e-9 kg
  (same comment as for Chemical Oxygen Demand)
- Xylene [emission, water]: 1e-9 kg
  (same comment as for Chemical Oxygen Demand)
- Volatile organic compounds [emission, air]: 1e-5 kg
  (same comment as for Chemical Oxygen Demand)
- Hydrogen [emission, air]: 0.000740681 MJ
- Particulate matter, > 2.5μm and ≤ 10μm [emission, air]: 0.0001 kg
  (same comment as for Chemical Oxygen Demand)
- Acetone [emission, water]: 1e-11 kg
  (same comment as for Chemical Oxygen Demand)
- Sulfur oxides [emission, air]: 4.06436e-6 kg
- Naphthalene [emission, water]: 1e-11 kg
  (same comment as for Chemical Oxygen Demand)
- Phenols [emission, water]: 1e-6 kg
  (same comment as for Chemical Oxygen Demand)

## Allocation factors
- physical, Recovered energy: 0
- causal, Propylene, at plant, for Toluene: 1
- causal, Recovered energy, for Methane: 0
- causal, Recovered energy, for Styrene: 0
- causal, Recovered energy, for Gasoline, combusted in equipment: 0
- causal, Recovered energy, for Transport, train, diesel powered: 0
- causal, Recovered energy, for Volatile organic compounds: 0
- economic, Recovered energy: 0
- causal, Propylene, at plant, for Transport, pipeline, natural gas: 1
- physical, Propylene, at plant: 1
- causal, Propylene, at plant, for Styrene: 1
- causal, Propylene, at plant, for Biological Oxygen Demand: 1
- causal, Propylene, at plant, for Transport, combination truck, diesel powered: 1
- causal, Propylene, at plant, for Disposal, solid waste, unspecified, to sanitary landfill: 1
- causal, Propylene, at plant, for Electricity, at grid: 1
- causal, Propylene, at plant, for Acetone: 1
- causal, Propylene, at plant, for Particulate matter, > 2.5μm and ≤ 10μm: 1
- causal, Propylene, at plant, for Volatile organic compounds: 1
- causal, Recovered energy, for Petroleum refining, for olefins production, at plant, internal offgas use: 0
- causal, Propylene, at plant, for Chemical Oxygen Demand: 1
- causal, Propylene, at plant, for Carbon monoxide: 1
- causal, Propylene, at plant, for Transport, train, diesel powered: 1
- causal, Recovered energy, for HCFC-22: 0
- causal, Recovered energy, for Naphthalene: 0
- causal, Propylene, at plant, for Transport, pipeline, unspecified petroleum products: 1
- causal, Propylene, at plant, for Ethylbenzene: 1
- causal, Propylene, at plant, for Petroleum refining, for olefins production, at plant, internal offgas use: 1
- causal, Recovered energy, for Suspended solids, inorganic: 0
- causal, Recovered energy, for Transport, pipeline, natural gas: 0
- causal, Recovered energy, for Total Organic Carbon: 0
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
## Sampling procedure
Data collected from primary sources.

## Sources
- THE PLASTICS DIVISION OF THE AMERICAN C
- Franklin Associates (2020) ACC Olefins
