# Polystyrene, expanded, EPS, virgin resin; batch suspension polymerization; industry average, at plant

Dataset: openLCA process, unit process
Category: 31-33: Manufacturing/3252: Resin, Synthetic Rubber, and Artificial and Synthetic Fibers and Filaments Manufacturing
Geography: Northern America
Time period: 2014-12-31 to 2016-12-30
Allocation method: physical allocation
Generated by: Franklin Associates, A Division of ERG
Owner: EPS Industry Alliance (EPS-IA)
Reviewer: Melissa Huff
Published in: Franklin Associates. (2016). EPS-IA Cradle-to-Gate Life Cycle Analysis of Expanded Polystyrene Resin
restrictionsDescription: DATA USE DISCLAIMER AGREEMENT (“Agreement”)
These U.S. LCI Database Project data ("Data") are provided by the National Renewable Energy Laboratory ("NREL"), operated by the Alliance for Sustainable Energy, LLC ("Alliance") for the U.S. Department Of Energy ("DOE") under Contract No. DE-AC36-08GO28308. The United States Government (the "Government") retains and the user acknowledges that the Government retains a non-exclusive, paid-up, irrevocable, worldwide license to publish or reproduce the published form of these data, or allow others to do so, for Government purposes.
Access to and use of these Data shall impose the following obligations on the user, as set forth in this Agreement. The user is granted the right, without any fee or cost, to use, copy, modify, alter, enhance and distribute these Data for any purpose whatsoever, provided that this entire notice appears in all copies of the Data. Any modification, alteration or enhancement of these data shall be identified and documented by the user. Further, the user agrees to credit the DOE/NREL/Alliance in any publication that results from the use of these Data. The names DOE/NREL/Alliance, however, may not be used in any advertising or publicity to endorse or promote any products or commercial entities unless specific written permission is obtained from DOE/NREL/Alliance. The user also understands that DOE/NREL/Alliance is not obligated to provide the user with any support, consulting, training or assistance of any kind with regard to the use of these Data or to provide the user with any updates, revisions or new versions of these Data.
YOU AGREE TO INDEMNIFY THE GOVERNMENT AND DOE/NREL/ALLIANCE, AND ITS SUBSIDIARIES, AFFILIATES, OFFICERS, AGENTS, AND EMPLOYEES AGAINST ANY CLAIM OR DEMAND, INCLUDING REASONABLE ATTORNEYS' FEES, RELATED TO YOUR USE OF THESE DATA. THESE DATA ARE PROVIDED BY DOE/NREL/ALLIANCE "AS IS" AND ANY EXPRESS OR IMPLIED WARRANTIES, INCLUDING BUT NOT LIMITED TO, THE IMPLIED WARRANTIES OF MERCHANTABILITY AND FITNESS FOR A PARTICULAR PURPOSE ARE DISCLAIMED. IN NO EVENT SHALL THE GOVERNMENT OR DOE/NREL/ALLIANCE BE LIABLE FOR ANY SPECIAL, INDIRECT OR CONSEQUENTIAL DAMAGES OR ANY DAMAGES WHATSOEVER, INCLUDING BUT NOT LIMITED TO CLAIMS ASSOCIATED WITH THE LOSS OF DATA OR PROFITS, WHICH MAY RESULT FROM AN ACTION IN CONTRACT, NEGLIGENCE OR OTHER TORTIOUS CLAIM THAT ARISES OUT OF OR IN CONNECTION WITH THE ACCESS, USE OR PERFORMANCE OF THESE DATA.
copyright: false

## General comment
This unit process represents the gate-to-gate production of 1000 kg of expanded polystyrene (EPS) resin using average technologies for North America in 2015 and 2016. Additional details on the technologies used in this process are available in the Technology description field at the bottom of this section.

The system boundary includes: 1) raw material transport to plant processing; 2) plant processing; 3) space conditioning (e.g., overhead lighting, heating, cooling, etc.) at plant; and 4) solid waste and emissions. The following processes and life cycle phases fall outside of the system boundary: 1) miscellaneous materials and additives which total less than one percent by weight of the net process inputs and not found to be resource-intensive or high-toxicity chemicals or additives; 2) capital equipment, facilities, and infrastructure; 3) support personnel requirements; 4) packaging 5) final product shipping; 6) product use; and 7) product end-of-life. Additional details regarding system boundaries are available in the Modeling and validation section in the Sampling Procedure field.

## Technology
The technologies described in this process are representative of average technologies in use in North America in 2015 and 2016.

Plant operations include production of EPS resin by suspension polymerization. Suspension polymerization utilizes an aqueous system with the monomer in a dispersed phase which results in a dispersed solid phase polymer. This dispersion is maintained through the use of agitation and water soluble stabilizers. The product from suspension polymerization is a bead polymer impregnated with a blowing agent. A flame retardant is generally added to the EPS resin production.

The polymerization data used in this dataset are for a batch suspension polymerization and were obtained directly from EPS resin manufacturers in North America.

## Geography
This unit process is reflective of North American production.

## Time period
This unit process is representative of operations in 2015 and 2016.

## Reference product
- Polystyrene, exapnded, EPS, virgin resin; batch suspension polymerization; industry average, at plant [RNA]: 1000 kg

## Inputs from technosphere
- Transport, barge, average fuel mix [RNA]: 731 t*km
- Transport, train, diesel powered [RNA]: 1619 t*km
- Flame retardant, decaBDE: 4.49 kg
  Surrogate for flame retardant. Included even though this input is less than 1% of total material inputs because it may contain hazardous chemicals that will significantly affect overall envir. profile.
- Nitrogen, liquid, at plant: 29.4 kg
  Liquid N - Ancillary material used for packaging and conveying.
- Transport, combination truck, diesel powered [RNA]: 30.6 t*km
- Pentane: 68.3 kg
- Natural gas, combusted in industrial boiler [RNA]: 76.7 m3
  This amount includes a confidential amount of landfill gas. Landfill gas is used by less than the three EPS resin plants and so to keep the amount confidential has been included in the natural gas amount.
- Ethylbenzene styrene, EB, at plant [RNA]: 944 kg
- Transport, pipeline, unspecified petroleum products [RNA]: 0.18 t*km
- Electricity, at grid [RNA]: 202 kWh; provider Electricity, at Grid, US, 2010
  Due to the use of cogeneration electricity by less than the three EPS resin plants, the cogeneration electricity has been included with the electricity produced from the average US grid for the purposes of confidentiality.

## Inputs from nature
- Water [resource, water]: 826 kg

## Waste to treatment
- Disposal, hazardous waste, to incineration with energy recovery: 0.01 kg
  This data was reported by fewer than three companies. To indicate known waste while protecting the confidentiality of individual company responses, the waste is reported only by order of magnitude.
- Disposal, solid waste, process, to sanitary landfill: 1 kg
  (same comment as for Disposal, hazardous waste, to incineration with energy recovery)
- Recycling, solid waste, to recycling or reuse: 0.9 kg
- Disposal, solid waste, to incineration without energy recovery: 1 kg
  (same comment as for Disposal, hazardous waste, to incineration with energy recovery)
- Disposal, hazardous waste, to incineration without energy recovery: 0.1 kg
  This data was reported by fewer than three companies. To indicate known waste while protecting the confidentiality of individual company responses, the waste is reported only by order of magnitude
- Disposal, hazardous waste, to unspecified hazardous waste landfill: 0.01 kg
  (same comment as for Disposal, hazardous waste, to incineration without energy recovery)

## Emissions to nature
- Volatile organic compounds [emission, air]: 0.01 kg
  Process emission.
- Carbon dioxide [emission, air]: 10 kg
  Process emission.
- Pentane [emission, air]: 5.29 kg
  Process emission.
- Suspended solids, inorganic [emission, water]: 0.01 kg
  Process emission. This data was reported by fewer than three companies. To indicate known emissions while protecting the confidentiality of individual company responses, the emission is reported only by order of magnitude.
- Styrene [emission, air]: 0.13 kg
  Process emission.
- Orthophosphate [emission, water]: 0.001 kg
  (same comment as for Suspended solids, inorganic)
- Chemical Oxygen Demand [emission, water]: 0.1 kg
  (same comment as for Suspended solids, inorganic)
- Particulate matter [emission, air]: 0.087 kg
  Process emission.
- Biological Oxygen Demand [emission, water]: 0.01 kg
  (same comment as for Suspended solids, inorganic)

## Completeness
1) TREATMENT OF MISSING INTERMEDIATE FLOW DATA
Intermediate flows such as catalysts, pigments, or other additives which total less than one percent by weight of the net process inputs are typically not included in the assessment. For EPS resin, no use of resource-intensive or high-toxicity chemicals or additives was identified. Therefore, the results for EPS resin are not expected to be understated by any significant amount due to substances that may be used in small amounts. Capital equipment, facilities, and infrastructure are not included in this unit process.

2) TREATMENT OF MISSING DATA TO OR FROM THE ENVIRONMENT
Less than three companies provided data for some atmospheric/waterborne emissions in this dataset. In this case, an order of magnitude was preserved to conceal confidential data.

3) MASS BALANCE
The mass imbalance for this unit process is less than 1%.

## Data treatment
Primary data were collected from one facility each for three EPS resin manufacturers in North America, weighted per production amounts and modeled using the appropriate flows.

## Data collection
Primary data represent the year 2015 with the exception of atmospheric and waterborne emissions data from one data provider which are for the year 2016.

## Sampling procedure
BOUNDARY CONDITIONS
The system boundary includes: 1) raw material transport to plant processing; 2) plant processing; 3) space conditioning (e.g., overhead lighting, heating, cooling, etc.) at plant; and 4) solid waste and emissions. EPS resin manufacture includes batch suspension polymerization. Suspension polymerization utilizes an aqueous system with the monomer in a dispersed phase which results in a dispersed solid phase polymer. This dispersion is maintained through the use of agitation and water soluble stabilizers. The product from suspension polymerization is a bead polymer impregnated with a blowing agent. A flame retardant is generally added to the EPS resin production. This process includes inputs of raw materials, ancillary materials, water, energy/fuel, and outputs of solid waste and atmospheric and waterborne emissions. The following processes and life cycle phases fall outside of the system boundary: 1) miscellaneous materials and additives which total less than one percent by weight of the net process inputs and not found to be resource-intensive or high-toxicity chemicals or additives; 2) capital equipment, facilities, and infrastructure; 3) support personnel requirements; 4) packaging 5) final product shipping; 6) product use; and 7) product end-of-life.

DATA COLLECTION
Primary data were collected for the manufacture of EPS resin. These data are based on North American production for the year 2015 for each data provider with the exception of atmospheric and waterborne emissions data from one data provider which are for the year 2016. Data were collected from three companies from one facility each. The data were specific to North America.

UNCERTAINTY ESTIMATION
Uncertainty was not quantified.

## Review details
An internal review of this dataset and life cycle assessment study was performed by Melissa Huff of Franklin Associates, A Division of ERG, and by EPS Industry Alliance (EPS-IA).

Neither this dataset nor the life cycle assessment study from which it was based have undergone external critical review.

## Intended application
The intended application for this unit process is for "Accounting" purposes as described in Situation C2 from the Institute for Environment and Sustainability (2011:3). As such, it describes the gate-to-gate production of EPS virgin resin "without being interested in any potential consequences on other parts of the economy" (Institute for Environment and Sustainability, 2011:3) and without consideration of potential benefits from recycling the material at the end of its useful life.

## Sources
- Franklin Associates. (2016). EPS-IA Cradle-to-Gate Life Cycle Analysis of Expanded Polystyrene Resin
- Institute for Environment and Sustainablility. (2011). General guide for Life Cycle Assessment - Detailed guidance.
