# Electricity, at eGrid, NYCW, 2008

Dataset: openLCA process, unit process
Category: 22: Utilities/2211: Electric Power Generation, Transmission and Distribution
Geography: Northern America
Time period: 2007-12-31 to 2007-12-31
Allocation method: no allocation
Generated by: Alberta Carpenter
Published in: Chris Goemans, Athena Institute
restrictionsDescription: All information can be accessed by everybody.
copyright: false

## General comment
The methodology used to put together the grid information is outlined in reference 1.

## Technology
Typical

## Geography
New York City and Westchester County, NY

## Reference product
- Electricity, at grid [RNA]: 1 kWh

## Inputs from technosphere
- Electricity, nuclear, at power plant [RNA]: 0.453479 kWh
  Nuclear Fission NUC - – Nuclear (Uranium, Plutonium, Thorium)
- Electricity, natural gas, at power plant [RNA]: 0.517079 kWh
  Natural Gas
- Electricity, biomass, solid, biogenic MSW, at power plant: 0.00584673 kWh
  Solid Renewable Fuels (Biomass) MSB – Municipal Solid Waste – Biogenic Component
- Electricity, hydropower, at power plant, unspecified: 7.92063e-5 kWh
  Hydroelectric WAT – Water (Conventional, Pumped Storage)
- Electricity, diesel, at power plant [RNA]: 0.000822217 kWh
  Petroleum (DFO) KER - kerosene
- Electricity, MSW, non-biogenic, at power plant: 0.00459405 kWh
  Other Fuels MSN – Municipal Solid Waste – Non-biogenic components
- Electricity, diesel, at power plant [RNA]: 0.00272449 kWh
  Petroleum (DFO) - DFO – Distillate Fuel Oil (includes all Diesel and No. 1, No. 2, and No. 4 Fuel Oils)
- Electricity, residual fuel oil, at power plant [RNA]: 0.0153754 kWh
  Petroleum (RFO) – Residual Fuel Oil (includes No. 5 and No. 6 Fuel Oils and Bunker C Fuel Oil)

## Sampling procedure
based on EIA electricity reports for all power plants in the US.

## Sources
- EIA
- EIA
- EIA
- Chris Goemans, Athena Institute
- US DOE
- International Energy Agency
- Statistics Canada
- EIA
- Statistics Canada
- EIA
- EIA
- US DOE
- EIA
- USEPA
- Statistics Canada
- unspecified
- Statistics Canada
- EIA
- EIA
- EIA
- Statistics Canada
- USEPA
- Statistics Canada
- EIA
