# Paraxylene, at plant, kg

Dataset: openLCA process, unit process
Category: 31-33: Manufacturing/3241: Petroleum and Coal Products Manufacturing
Geography: Northern America
Time period: 2014-12-31 to 2015-11-30
Allocation method: no allocation
Generated by: Franklin Associates, A Division of ERG
Owner: NAPCOR
Reviewer: Franklin Associates, A Division of ERG
Published in: Franklin Associates (2019) Cradle-to-Resin LCA PET for NAPCOR
copyright: false

## General comment
Includes material and energy requirements and environmental emissions for one kilogram of paraxylene. Reformate feedstock rich in xylenes is fractionated to obtain a stream rich in the para-isomer. The ortho isomer is first separated off by distillation. A crystallization unit is then used to separate the meta and para isomers using adsorption of the paraxylene isomer on a molecular sieve adsorbent. The paraxylene isomer is collected on the adsorbent while the metaxylene passes through the adsorbent bed and is collected. The paraxylene is then stripped of the adsorbent using diethylbenzene isomers. The meta and para isomers can also be separated using crystallization and then centrifuged for purification. LCI data for the production of Paraxylene (PX) was collected from three producers (3 plants) in North America – all in the United States. Not all plants were able to provide data for 2015. One plant provided 2013 data and one provided 2016 data. These variances were due to plant issues (e.g. shut downs/updates/temporary maintenance shut downs) during 2015 that may have skewed the average. Coproducts include a number of aromatics, carbon dioxide, and some fuels. For the coproducts sold for material use in other processes, mass basis was used to allocate the credit for the coproduct. For coproducts sold for fuel use in other processes, these were treated as an avoided fuel product and were given credits based on the fuel they would replace. The average paraxylene datasets were reviewed and accepted respectively by each paraxylene data provider.

## Technology
Paraxylene production at plant, US

## Reference product
- Paraxylene, at plant, kg: 1 kg

## Avoided products
- Natural gas, combusted in industrial boiler [RNA]: 0.00889 m3
  Excess offgas used in some other process. Off-gas sold as a credit.

## Inputs from technosphere
- Electricity, at cogen, for natural gas turbine [US]: 0.11 kWh
- Transport, barge, average fuel mix [RNA]: 0.696 t*km
- Electricity, at grid [RNA]: 0.13 kWh; provider Electricity, at Grid, US, 2010
- Transport, combination truck, diesel powered [RNA]: 7.7e-5 t*km
- Transport, pipeline, unspecified petroleum products [RNA]: 0.077 t*km
- Nitrogen, liquid, at plant: 0.0043 kg
  Ancillary material
- Fuel gas, produced onsite, at cracker, m3: 0.00411 m3
  Use for incoming fuel gas from other units
- Transport, ocean freighter, diesel powered [US]: 0.102 t*km
- Natural gas, combusted in industrial boiler [RNA]: 0.0628 m3
- Xylenes, mixed, at plant, kg: 0.996 kg; provider Xylenes, mixed, produced from naphtha, at plant, kg
  inputs that become physical outputs
- Petroleum refining coproduct, at refinery [RNA]: 0.016 kg; provider Petroleum refining, at refinery
  Material component to internal offgas created in process

## Inputs from nature
- Water [resource, water]: 0.041 kg

## Waste to treatment
- Disposal, hazardous waste, to incineration without energy recovery: 1e-6 kg
  Hazardous waste to incineration
- Recycling, solid waste, to recycling or reuse: 1e-5 kg
  Solid waste to recycling/reuse
- Disposal, solid waste, process, to sanitary landfill: 0.0001 kg
  Solid waste to landfill

## Emissions to nature
- Aluminum [emission, water]: 1e-9 kg
  This data was reported by fewer than three companies. To indicate known emissions while protecting the confidentiality of individual company responses, the emission is reported only by order of magnitude.
- Biological Oxygen Demand [emission, water]: 1e-6 kg
  (same comment as for Aluminum)
- Octane [emission, air]: 1e-8 kg
  (same comment as for Aluminum)
- Propylene [emission, air]: 1e-7 kg
  (same comment as for Aluminum)
- Particulate matter [emission, air]: 1e-5 kg
  (same comment as for Aluminum)
- Ammonia [emission, water]: 1e-9 kg
  (same comment as for Aluminum)
- Chromium [emission, water]: 1e-11 kg
  (same comment as for Aluminum)
- Benzene [emission, air]: 1e-6 kg
  (same comment as for Aluminum)
- Propane [emission, air]: 1e-5 kg
  (same comment as for Aluminum)
- Oils, unspecified [emission, water]: 1e-6 kg
  (same comment as for Aluminum)
- Pentane [emission, air]: 1e-7 kg
  (same comment as for Aluminum)
- Formaldehyde [emission, air]: 1e-8 kg
  (same comment as for Aluminum)
- Zinc [emission, water]: 1e-10 kg
  (same comment as for Aluminum)
- Toluene [emission, air]: 1e-7 kg
  (same comment as for Aluminum)
- Ethane [emission, air]: 1e-6 kg
  (same comment as for Aluminum)
- Iron [emission, water]: 1e-10 kg
  (same comment as for Aluminum)
- Cobalt [emission, water]: 1e-8 kg
  (same comment as for Aluminum)
- Nitrogen oxides [emission, air]: 1e-5 kg
  (same comment as for Aluminum)
- Trimethylbenzene [emission, air]: 1e-8 kg
  (same comment as for Aluminum)
- Cumene [emission, air]: 1e-8 kg
  (same comment as for Aluminum)
- Methane [emission, air]: 0.001 kg
  (same comment as for Aluminum)
- Manganese [emission, water]: 1e-8 kg
  (same comment as for Aluminum)
- Carbon monoxide [emission, air]: 1e-5 kg
  (same comment as for Aluminum)
- Mercury [emission, water]: 1e-11 kg
  (same comment as for Aluminum)
- Heptane [emission, air]: 1e-8 kg
  (same comment as for Aluminum)
- 1,3-Butadiene [emission, air]: 1e-7 kg
  (same comment as for Aluminum)
- Hexane [emission, air]: 1e-7 kg
  (same comment as for Aluminum)
- Carbon dioxide [emission, air]: 0.0001, 0.1 kg (2 entries)
  (same comment as for Aluminum)
- Methanol [emission, air]: 0.0001 kg
  (same comment as for Aluminum)
- Ethylene [emission, air]: 1e-6 kg
  (same comment as for Aluminum)
- Chemical Oxygen Demand [emission, water]: 1e-5 kg
  (same comment as for Aluminum)
- Nickel [emission, water]: 1e-10 kg
  (same comment as for Aluminum)
- Suspended solids, inorganic [emission, water]: 1e-6 kg
  (same comment as for Aluminum)
- 1-Butene [emission, air]: 1e-7 kg
  (same comment as for Aluminum)
- Butane [emission, air]: 1e-6 kg
  (same comment as for Aluminum)
- Xylene [emission, air]: 1e-5 kg
  (same comment as for Aluminum)
- Methyl bromide [emission, air]: 1e-8 kg
  (same comment as for Aluminum)
- Nonane [emission, air]: 1e-8 kg
  (same comment as for Aluminum)
- Ethylbenzene [emission, air]: 1e-6 kg
  (same comment as for Aluminum)
- Sulfide [emission, water]: 1e-7 kg
  (same comment as for Aluminum)
- Sulfur oxides [emission, air]: 1e-7 kg

## Inventory method
Attributional. Compatible with TRACI

## Modelling constants
Coproducts include a number of aromatics, carbon dioxide, and some fuels. For the coproducts sold for material use in other processes, mass basis was used to allocate the credit for the coproduct. For coproducts sold for fuel use in other processes, these were treated as an avoided fuel product and were given credits based on the fuel they would replace. Mass allocation was used to allocate all inputs and outputs to each product and co-products.

## Completeness
TREATMENT OF MISSING ENVIRONMENTAL DATA: Elementary flows are cut-off at less than 1% based on environmental relevance.
TREATMENT OF MISSING TECHNOSPHERE DATA: Intermediate flows are cut-off is at 1% based on environmental relevance.
MASS BALANCE: For primary data the mass balance was calculated by a straight comparison of inputs and outputs

## Data treatment
A weighted average was calculated from the data collected and used to develop the LCA model. The weighting used production amounts provided by the plants.

## Data collection
Not all plants were able to provide data for 2015. One plant provided 2013 data and one provided 2016 data. These variances were due to plant issues (e.g. shut downs/updates/temporary maintenance shut downs) during 2015 that may have skewed the average if used.

## Sampling procedure
BOUNDARY CONDITIONS: The system boundary includes (1) raw material extraction (e.g., extraction of petroleum and natural gas as feedstocks for paraxylenes production), (2) incoming transportation for each process, and (3) manufacturing of paraxylenes, including incoming transportation for each material.
DATA COLLECTION: LCI data for the production of Paraxylene (PX) was collected from three producers (3 plants) in the United States. A weighted average was calculated from the data collected and used to develop the LCA model. Supporting background data were drawn from credible, widely used databases including the US LCI database, GREET, and Ecoinvent.
UNCERTAINTY ESTIMATION: All data received were carefully discussed with current producer(s) and evaluated before modeling the data sets, used to generate results. No uncertainty analysis was carried out due to the lack of uncertainty data or probability distributions for key parameters, which are often only available as single point estimates from the producers.

## Review details
Internal review of data entry proofreading, mass balance verification and data documentation.

## Intended application
"Accounting, with system-external interactions" - The intended application is a purely descriptive accounting / documentation of the analysed system including existing interactions with other systems in the LCI model. These data are an update to a previously published dataset which is a generic unit process data.

## Sources
- Franklin Associates (2019) Cradle-to-Resin LCA PET for NAPCOR
