# Electricity, at Grid, SPP, 2010

Dataset: openLCA process, unit process
Category: 22: Utilities/2211: Electric Power Generation, Transmission and Distribution
Geography: Northern America
Time period: 2009-12-31 to 2009-12-31
Allocation method: no allocation
Generated by: Samantha Wascavage
Published in: Chris Goemans, Athena Institute
restrictionsDescription: All information can be accessed by everybody.
copyright: false

## General comment
The methodology used to put together the grid information is outlined in reference 1.

## Technology
Typical

## Geography
Kansas and Oklahoma, and parts of Arkansas, Louisiana, Missouri, New Mexico, and Texas.

## Reference product
- Electricity, at grid [RNA]: 1 kWh

## Inputs from technosphere
- Electricity, nuclear, at power plant [RNA]: 0.04479 kWh
  NUC – Nuclear (Uranium, Plutonium, Thorium)
- Electricity, biomass, solid, agriculture by-products, at power plant: 0.002676 kWh
  AB, MSB, MSW, OBS, TDF, WDS – Agriculture Crop By-products / Straw / Energy Crops
- Electricity, bituminous coal, at power plant [RNA]: 0.013536 kWh
  BIT, SC, SGC, WC - Anthracite Coal, and Bituminous Coal.
- Electricity, other gases, unspecified, at power plant: 0.001647 kWh
  OG, BFG, PG – Other Gas (Butane, Coal Processes, Coke-Oven, Refinery, and other processes)
- Electricity, diesel, at power plant [RNA]: 0.009051 kWh
  DFO, JF, KER – Distillate Fuel Oil (includes all Diesel and No. 1, No. 2, and No. 4 Fuel Oils)
- Electricity, bituminous coal, at power plant [RNA]: 0.404528 kWh
  SUB – Subbituminous Coal
- Electricity, residual fuel oil, at power plant [RNA]: 2.7e-5 kWh
  RFO – Residual Fuel Oil (includes No. 5 and No. 6 Fuel Oils and Bunker C Fuel Oil)
- Electricity, lignite coal, at power plant [RNA]: 0.044636 kWh
  LIG – Lignite Coal
- Electricity, biomass,liquid, unspecified, at power plant: 0.006898 kWh
  BLQ, OBL, SLW, WDL – Black Liquor
- Electricity, biomass, gas, landfill, at power plant: 0.000108 kWh
  LFG, OBG – Landfill Gas
- Electricity, natural gas, at power plant [RNA]: 0.320146 kWh
  NG – Natural Gas
- Electricity, at wind power plant, unspecified: 0.035529 kWh
  WND – Wind
- Electricity, petroleum coke, at power plant: 0.008298 kWh
  PC, SG, WO – Petroleum Coke
- Electricity, hydropower, at power plant, unspecified: 0.030338 kWh
  WAT – Water (Conventional, Pumped Storage)

## Sampling procedure
based on EIA electricity reports for all power plants in the US.

## Sources
- EIA
- EIA
- Statistics Canada
- Statistics Canada
- Chris Goemans, Athena Institute
- EIA
- USEPA
- EIA
- Statistics Canada
- EIA
- Statistics Canada
- EIA
- unspecified
- EIA
- USEPA
- EIA
- EIA
- Statistics Canada
- US DOE
- International Energy Agency
- EIA
