# Mixed recyclables, at collection, commercial

Dataset: openLCA process, unit process
Category: 56: Administrative and Support and Waste Management and Remediation Services/5621: Waste Collection
Geography: Northern America
Time period: 2006-12-31 to 2007-12-31
Allocation method: no allocation
Generated by: Franklin Associates
restrictionsDescription: All information can be accessed by everybody.
copyright: false

## General comment
Important note: although most of the data in the US LCI database has
undergone some sort of review, the database as a whole has not yet
undergone a formal validation process.
Please email comments to lci@nrel.gov.

## Technology
Typical

## Geography
United States

## Reference product
- Mixed recyclables, at collection, commercial [RNA]: 1 kg
  Applies to one kg of any material collected from a commercial location

## Inputs from technosphere
- Transport, combination truck, diesel powered [RNA]: 1.15848 t*km
  Fuel use per kg of material collected from commercial locations
- Mixed recyclables, at source: 1 kg
  Based on wastes removed at MRF, the collected material contains about 0.087 kg waste per kg of usable material.

## Sources
- THE PLASTICS DIVISION OF THE AMERICAN CH
