# Soy-based resin, at plant

Dataset: openLCA process, unit process, infrastructure
Category: 31-33: Manufacturing/3252: Resin, Synthetic Rubber, and Artificial and Synthetic Fibers and Filaments Manufacturing
Geography: Northern America
Time period: 2007-12-31 to 2007-12-31
Allocation method: no allocation
Generated by: Anne Landfield Greig
Published in: Omni Tech International
restrictionsDescription: All information can be accessed by everybody.
copyright: false

## General comment
1. CARBON SEQUESTRATION should be accounted for after the product is built in its LCA model, and should be included depending on the use of end of life fate of that product.
REFINED SOY OIL: 80.6% C --> 2.955 kg CO2/kg refined soy oil
2. The system boundary is cradle to facility gate of this material. The data set is fully aggregated except for the input of refined soy oil, electricity, and natural gas used for energy, in order to protect company-specific proprietary data. The LCA practitioner must link these three inputs to complete the cradle to gate system.
3. The study (Main Data Source) underwent external peer review prior to this submission to the US LCI database.

## Technology
Data from 1 company but represents current technology

## Geography
US

## Reference product
- Soy-based resin, at plant [RNA]: 1 kg

## Inputs from technosphere
- Soy oil, refined, at plant [RNA]: 0.12 kg
- Electricity, at grid [RNA]: 0.258 kWh; provider Electricity, at Grid, US, 2010
- Natural gas, combusted in industrial boiler [RNA]: 0.091 m3
- Disposal, solid waste, unspecified, to unspecified landfill: 0.171 kg

## Inputs from nature
- Potassium chloride [resource, ground]: 0.00162 kg
- Sodium chloride [resource, ground]: 0.00169 kg
- Coal, lignite [resource, ground]: 0.00154062 MJ
- Water [resource, water]: 37700 kg
- Uranium [resource, ground]: 0.000991 kg
- Natural gas [resource, air, subterranean]: 34.8691 MJ
- Calcium carbonate [resource, ground]: 0.000161 kg
- Crude oil [resource, water, subterranean]: 18.6331 MJ
- Coal, bituminous [resource, ground]: 6.82 MJ
- Carbon dioxide [resource, air]: 0.331 kg
  This biomass carbon comes from a biobased ingredient other than (in addition to) the soy oil

## Emissions to nature
- Suspended solids, inorganic [emission, water]: 0.188 kg
  SS from soybean crushing is sent to a WWTP; SS from agriculture is discharged to surface water.
- Magnesium [emission, water]: 0.00243 kg
- Ethylene [emission, air]: 1.94e-5 kg
  C2H4
- Metals [emission, water]: 9.43e-5 kg
- Acid compounds [emission, water]: 1.32e-5 kg
- Atrazine [emission, air]: 9.06e-6 kg
  C8H14ClN5
- Sulfur [emission, water]: 1.04e-5 kg
- Nitrate [emission, water]: 3.46e-6 kg
  NO3-
- Carbon monoxide [emission, air]: 0.00546 kg
  CO
- Total Organic Carbon [emission, water]: 0.00589 kg
- Aldehydes, unspecified [emission, air]: 1.32e-5 kg
- Lead [emission, water]: 1.79e-6 kg
- Propylene [emission, air]: 0.000165 kg
  CH2CHCH3
- Hydrocarbons [emission, air]: 0.00433 kg
  26% excludes methane
- Sulfate [emission, water]: 0.000576 kg
- Magnesium [emission, air]: 1.45e-6 kg
- Particulate matter, > 10μm [emission, air]: 0.00035 kg
- Potassium [emission, water]: 1.68e-6 kg
- Calcium [emission, water]: 0.0124 kg
- Propane [emission, air]: 1.29e-5 kg
  C3H8
- Boron [emission, water]: 1.22e-5 kg
  B III
- Nitrous oxide [emission, air]: 0.000141 kg
- Ammonia [emission, air]: 0.000249 kg
  NH3
- Propylene [emission, water]: 0.000396 kg
  CH2CHCH3
- Sodium(I) [emission, water]: 0.124 kg
- Hydrocarbons [emission, water]: 2.76e-5 kg
- Toluene [emission, water]: 6.39e-6 kg
  C6H5CH3
- Ethane [emission, air]: 3.24e-6 kg
  C2H6
- Biological Oxygen Demand [emission, water]: 0.03 kg
- Methane [emission, air]: 0.0127 kg
  CH4
- Hydrofluoric acid [emission, air]: 1.92e-5 kg
  HF
- Iron [emission, water]: 0.000438 kg
- Phosphorus [emission, water]: 8.49e-6 kg
- Carbon dioxide [emission, air]: 3.94 kg
- Toluene [emission, air]: 4.47e-5 kg
  C6H5CH3
- Xylene [emission, air]: 4.4e-5 kg
  C6H4(CH3)2
- Orthophosphate [emission, water]: 8.67e-5 kg
- Nitrogen dioxide [emission, air]: 0.0108 kg
- Chlorine [emission, air]: 0.000275 kg
- Phenol [emission, water]: 2.32e-6 kg
  C6H5OH
- Total dissolved solids [emission, water]: 0.172 kg
- Xylene [emission, water]: 3.15e-6 kg
  C6H4(CH3)2
- Chloride [emission, water]: 0.414 kg
- Sulfur dioxide [emission, air]: 0.0193 kg
- Butane [emission, air]: 2.21e-5 kg
  C4H10
- Ethanol [emission, air]: 0.0773 kg
  C2H5OH
- Nickel [emission, air]: 2.06e-6 kg
- Hydrogen sulfide [emission, air]: 1.3e-6 kg
  H2S
- Hexane [emission, air]: 6.47e-6 kg
  C6H14
- Heptane [emission, air]: 3.23e-6 kg
  C7H16
- Organic compounds [emission, air]: 2.49e-5 kg
- Particulate matter, ≤ 10μm [emission, air]: 1.41e-5 kg
- Pentane [emission, air]: 1.62e-5 kg
  C5H12
- Nitrogen [emission, water]: 0.000465, 6e-5 kg (2 entries)
- Aromatics [emission, air]: 1.45e-5 kg
- Benzene [emission, air]: 4.86e-5 kg
  C6H6
- Aluminum [emission, water]: 0.000198 kg
- Mercaptans [emission, air]: 3.07e-6 kg
- Fluoride [emission, water]: 0.000116 kg
- Chemical Oxygen Demand [emission, water]: 0.0623 kg
- Barium [emission, water]: 0.00275 kg
- Hydrochloric acid [emission, air]: 0.000176 kg
  HCl
- Ethylbenzene [emission, air]: 4.3e-5 kg
  C6H5C2H5
- Particulate matter [emission, air]: 0.000978 kg
- Chromium compounds [emission, water]: 5.47e-6 kg
- Strontium [emission, water]: 0.000211 kg
- Formaldehyde [emission, air]: 1.42e-6 kg
  CH2O
- Dissolved Organic Matter [emission, water]: 2.75e-6 kg
- Hydrogen [emission, air]: 0.00071 MJ
- Ethylene oxide [emission, air]: 1.55e-6 kg
  C2H4O
- Benzene [emission, water]: 6.48e-6 kg
  C6H6
- Carbonate [emission, water]: 2.75e-5 kg
- Oils, unspecified [emission, water]: 0.000115 kg

## Sources
- Ashland Composite Polymers
- Omni Tech International
