# Tillage, reduce, corn production

Dataset: openLCA process, unit process
Category: 11: Agriculture, Forestry, Fishing and Hunting/1151: Support Activities for Crop Production
Geography: Northern America
Time period: 2004-12-31 to 2009-12-30
Allocation method: no allocation
Generated by: Daniel Inman
Published in: Hsu, D.
restrictionsDescription: All information can be accessed by everybody.
copyright: false

## General comment
This process involves all operations associated with reduced tillage on one hectare of US average corn. Reduce tillage is defined as operations leaving between 15 and 30% residue on the soil surface. The field is left as-is between harvest and planting.

## Technology
Modern technology

## Geography
North America

## Time period
2005-2009

## Reference product
- Tillage, reduce, corn production [RNA]: 1 m2
  Rolling is used for seedbed preparation following reduced tillage

## Inputs from technosphere
- Tillage, rolling: 1 m2
  Chisel plow is a conservation tillage operation.
- Tillage, cultivating, chiselling: 1 m2
- Fertilising, by broadcaster: 1 m2
- Tillage, rotary cultivator: 1 m2
  fertilizers applied with cultivator "side dressing"

## Sources
- Conservation Tech Info Ctr, Univ Purdue
- USDA NASS
- Hsu, D.
