# Automotive painting, electrocoating, per vehicle

Dataset: openLCA process, unit process
Category: 31-33: Manufacturing/3362: Motor Vehicle Body and Trailer Manufacturing
Geography: Northern America
Time period: 2004-12-31 to 2004-12-31
Allocation method: no allocation
Generated by: James Littlefield, Franklin Associates
Published in: VRP (Vehicle Recycling Partnership)
restrictionsDescription: All information can be accessed by everybody.
copyright: false

## General comment
Data are shown on 2 bases: 1) per 1,000 m2 of surface area and 2) per 1,000 vehicles., This unit process is on the basis of 1 vehicle.
Important note: although most of the data in the US LCI database has
undergone some sort of review, the database as a whole has not yet
undergone a formal validation process.
Please email comments to lci@nrel.gov.

## Technology
Representative of current industry practices

## Geography
North America

## Reference product
- Automotive painting, electrocoating, per vehicle [RNA]: 1 Item(s)

## Inputs from technosphere
- Disposal, carbon black, to wastewater treatment: 3.5e-6 kg
- Disposal, carbon black, to residual material landfill: 0.00201 kg
- Water, at user: 1120 kg
- Electrocoat resin, at plant: 0.00481 m3
- Treatment, electrocoating wastewater, unspecified treatment: 1060 l
- Electricity, at grid [RNA]: 24.9 kWh; provider Electricity, at Grid, US, 2010
- Pigment, at plant: 0.000409 m3

## Emissions to nature
- Volatile organic compounds [emission, air]: 0.0633 kg
  From resin
- Volatile organic compounds [emission, air]: 0.00638 kg
  From pigment

## Sources
- VRP (Vehicle Recycling Partnership)
