# Transport, light commercial truck, gasoline powered, Northeast

Dataset: openLCA process, unit process
Category: 48-49: Transportation and Warehousing/4841: General Freight Trucking
Geography: Northern America
Time period: 2009-12-31 to 2009-12-31
Allocation method: no allocation
Generated by: Nathan Hardesty
Published in: U.S. Environmental Protection Agency (EP
restrictionsDescription: All information can be accessed by everybody.
copyright: false

## General comment
This dataset represents the Northeastern U.S. (CT, DC, DE, ME, MD, MA, NH, NJ, NY, PA, RI, VT (Reference 10)) average airborne emissions for operating a gasoline powered light commercial truck. The inventory includes all vehicle operation processes, including off-network and refueling activities.
The refinery-to-pump transportation and distribution data are calculated from Argonne National Laboratory's GREET 1.8d.1 model.
The vehicle operation data are calculated from EPA's MOVES2010a model, using the assumptions described in the corresponding detailed spreadsheet. Emissions factors in MOVES2010a are largely based on EPA's Mobile Source Observation Database, which in turn includes data from a variety of vehicle studies (References 6-8).
MOVES2010a acknowledges sources of uncertainty in the model structure, the population and acitivty data, and other model parameters. As of July 2011, the uncertainty calculation function of the model has not been activated.

## Technology
Combustion of gasoline in a light commercial truck.

## Geography
US

## Reference product
- Transport, light commercial truck, gasoline powered [RNA]: 1 t*km

## Inputs from technosphere
- Transport, barge, average fuel mix [RNA]: 0.0438739 t*km
- Transport, ocean freighter, average fuel mix [RNA]: 0.578982 t*km
- Transport, pipeline, unspecified petroleum products [RNA]: 0.664713 t*km
- Transport, train, diesel powered [RNA]: 0.126435 t*km
- Gasoline, at refinery: 0.232556 l; provider Petroleum refining, at refinery
- Transport, combination truck, average fuel mix [RNA]: 0.0677198 t*km

## Emissions to nature
- Carbon dioxide [emission, air]: 0.540788 kg
- Particulate matter, ≤ 10μm [emission, air]: 6.16184e-6 kg
  PM10 from tirewear.
- Particulate matter, ≤ 10μm [emission, air]: 3.06261e-5 kg
  PM10 from organic carbon, elemental carbon, and sulfate particulates.
- Volatile organic compounds [emission, air]: 0.0012307 kg
- Nitrogen oxides [emission, air]: 0.00156084, 0.00173241 kg (2 entries)
- Nitrogen dioxide [emission, air]: 0.000171568 kg
- Nitrous oxide [emission, air]: 4.07928e-5 kg
- Particulate matter, ≤ 2.5μm [emission, air]: 5.58446e-6 kg
  PM2.5 from brakewear.
- Carbon monoxide [emission, air]: 0.0157266 kg
- Particulate matter, ≤ 2.5μm [emission, air]: 1.47766e-6 kg
  PM2.5 from tirewear.
- Methane [emission, air]: 6.44761e-5 kg
- Ammonia [emission, air]: 3.96074e-5 kg
- Particulate matter, ≤ 10μm [emission, air]: 2.13326e-5 kg
  PM10 from brakewear.
- Sulfur dioxide [emission, air]: 1.0557e-5 kg
- Hydrocarbons [emission, air]: 0.00119732 kg
- Particulate matter, ≤ 2.5μm [emission, air]: 2.82008e-5 kg
  PM2.5 from organic carbon, elemental carbon, and sulfate particulates.

## Sources
- Assessment and Standards Division, Offic
- National Institute of Standards and Tech
- Wang, M.
- National Climatic Data Center, National
- U.S. Alternative Fuels and Advanced Vehi
- U.S. Environmental Protection Agency (EP
- Eastern Research Group
- Assessment and Standards Division, Offic
- Transportation Characteristics Branch, U
- EPA
