# Ethanol, denatured, at refueling station, 2022

Dataset: openLCA process, unit process
Category: 31-33: Manufacturing/3251: Basic Chemical Manufacturing
Geography: Northern America
Time period: 2021-12-31 to 2021-12-31
Allocation method: no allocation
Generated by: Garvin Heath
Published in: Hsu, D.
restrictionsDescription: All information can be accessed by everybody.
copyright: false

## General comment
The ethanol was denatured at the conversion facility, so is 95.25v% ethanol and 4.75v% gasoline (3.95w% denaturant). Data for this process is mainly drawn from Reynolds, 2006 (aka DAI, 2006). It is assumed that the DAI report covers the transport the ethanol to the blending terminal (the "destination" of the report); distance for the subsequent transport to refueling station is included in this process as the author's own estimate. In the modeling of ethanol distribution, the transport of E10 and E85 to the refueling station is counted separately for each component (denatured ethanol and petrol/gasoline). Transport of the ethanol is included in this step; transport of gasoline is accounted by using the ecoinvent "petrol, at regional storage" process which includes transport to refueling station as well as the operation of the refueling station. The process of blending (and its energy use) is included in separate processes, as well as the infrastructure for additional terminals and blending apparatus, "E10, at blending terminal" and "E85, at blending terminal". Infrastructure for refueling stations are included in the processes "E10, pumped into vehicle" and "E85, pumped into vehicle." [Infrastructure for additional transportation equipment required to distribute EISA volumes of ethanol is NOT included in this process since we are using the ecoinvent "transport" process which includes infrastructure.]
The production of ethanol utilized in this process assigns inputs to co-products (e.g., wheat kernals and straw, corn grain and stover) based on activities and inputs that are required for the growth and harvest and preprocessing of, e.g., wheat straw, and none that of the activities or inputs that would normally be used to produce, harvest and preprocess, e.g., wheat kernals (so-called "incremental allocation").

## Technology
Modern

## Geography
North America

## Time period
2022

## Reference product
- Ethanol, denatured, at refueling station [RNA]: 1 kg

## Inputs from technosphere
- Transport, ocean freighter, diesel powered [US]: 0.0508 t*km
  tertiary shipment of 1 kg of ethanol from intermediate terminal to intermediate terminal. Reynolds (2006). Emission mandates in 2022 will undoubtedly be lower so this will be an overestimate of impacts. This is an ocean-going vessel, which Reynolds says is most likely to be ocean barge. No ocean barge in SimaPro library. Assumes backhauling of gasoline (i.e., no attributable empty return trip)
- Transport, barge, diesel powered [RNA]: 0.106 t*km
  primary shipments of 1 kg of ethanol directly from conversion plant to "destination" (assumed to mean blending terminal). Reynolds (2006). Emission mandates in 2022 will undoubtedly be lower so this will be an overestimate of impacts. Assumes backhauling of gasoline (i.e., no attributable empty return trip)
- Ethanol, denatured, mixed feedstocks, at conversion facility [RNA]: 1 kg; provider Ethanol, denatured, mixed feedstocks, at conversion facility, 2022
- Transport, combination truck, diesel powered [RNA]: 0.0194 t*km
  secondary shipment of 1 kg of ethanol from intermediate terminal to "destination" (blending terminal). Reynolds (2006). Using most stringent EURO emission standard though emission mandates in 2022 will undoubtedly be lower. Assumes backhauling of gasoline (i.e., no attributable empty return trip)
- Transport, train, diesel powered [RNA]: 0.18 t*km
  secondary shipment of 1 kg of ethanol from conversion plant to intermediate terminal. based on Reynolds (2006) and Morrow et al., 2006. Emission mandates in 2022 will undoubtedly be lower so this will be an overestimate of impacts. Assumes backhauling of gasoline (i.e., no attributable empty return trip)
- Transport, combination truck, diesel powered [RNA]: 0.0324 t*km
  primary shipments of 1 kg of ethanol directly from conversion plant to "destination" (assumed to mean blending terminal). Reynolds (2006). Using most stringent EURO emission standard though emission mandates in 2022 will undoubtedly be lower.Assumes backhauling of gasoline (i.e., no attributable empty return trip)
- Transport, combination truck, diesel powered [RNA]: 0.049 t*km
  transports the ethanol portion of blended E10 and E85 to refueling station from blending terminal. Since the ecoinvent process used for gasoline that's blended with ethanol includes this transport step as well as operations of refueling stations, I'm including this post-blending transport step here as opposed to in the subsequent blending process step. Assumes backhauling of gasoline (i.e., no attributable empty return trip)
- Transport, ocean freighter, diesel powered [US]: 0.00564 t*km
  secondary shipment of 1 kg of ethanol from intermediate terminal to "destination" (blending terminal). based on Reynolds (2006). Emission mandates in 2022 will undoubtedly be lower so this will be an overestimate of impacts. Reynolds specified for this leg an ocean-going vessel, which he says is most likely to be ocean barge. SimaPro library does not differentiate between inland waterway and ocean barge. Assumes backhauling of gasoline (i.e., no attributable empty return trip)
- Transport, train, diesel powered [RNA]: 0.0432 t*km
  primary shipments of 1 kg of ethanol directly from conversion plant to "destination" (assumed to mean blending terminal). based on Reynolds (2006) and Morrow et al., 2006. Emission mandates in 2022 will undoubtedly be lower so this will be an overestimate of impacts. Assumes backhauling of gasoline (i.e., no attributable empty return trip)
- Transport, barge, diesel powered [RNA]: 0.174 t*km
  secondary shipment of 1 kg of ethanol from conversion plant to intermediate terminal. based on Reynolds (2006). Emission mandates in 2022 will undoubtedly be lower so this will be an overestimate of impacts. Assumes backhauling of gasoline (i.e., no attributable empty return trip)

## Sources
- Hsu, D.
