# Open molding, rigid composites part, at plant

Dataset: openLCA process, unit process
Category: 31-33: Manufacturing/3261: Plastics Product Manufacturing
Geography: Northern America
Time period: 2010-12-31 to 2011-12-31
Allocation method: no allocation
Generated by: Franklin Associates
Published in: American Composites Manufacturers Assn.
restrictionsDescription: All information can be accessed by everybody.
copyright: false

## General comment
For each kilogram of composite part fabrication, the amount of incoming corrugated box material is equivalent to that coming out of the process as it is purchased to be used as shipping packaging. An average of 0.011 kg of rigid composite part scrap is produced for every kilogram of open molded parts produced; this scrap is sold for recycling. The packaging inputs in this data set represent the average reported per kilogram of output across a range of products produced at manufacturing facilities. Possible differences in the mass balance include ancillary materials, incoming packaging (including wood), and other unspecified process wastes that are thrown out but not accounted for as inputs in the LCI. Complete inventory data and metadata are shown in full in the final report, Life Cycle Inventory of Polymer Composites. The report is not publicly available. This report has been extensively reviewed within Franklin Associates by Rebe Feraldi, Anne Marie Molen, and Melissa Huff and has undergone partial critical review by ACMA members. Important note: although most of the data in the US LCI database has undergone some sort of review, the database as a whole has not yet undergone a formal validation process. Please email comments to lci@nrel.gov.

## Technology
Fabrication of rigid composite parts by open molding.

## Geography
US

## Reference product
- Open molding, rigid composites part, at plant [RNA]: 1 kg

## By-products
- Composite scrap, from composites open molding, at plant [RNA]: 0.011 kg
- Corrugate packaging, from open molding, for shipping [RNA]: 0.02 kg
- Surfaced dried lumber, from open molding, for shipping [RNA]: 0.008 kg
- Plywood, from open molding, for shipping [RNA]: 0.031 kg

## Inputs from technosphere
All rows: lognormal geomSd 1
- E-glass, at plant [US]: 0.09 kg
- Transport, combination truck, diesel powered [RNA]: 1.712 t*km
- Initiator, MEKP, at plant: 0.011 kg
- Disposal, solid waste, unspecified, to municipal incineration: 0.005 kg
- Transport, train, diesel powered [RNA]: 0.20016 t*km
- Gelcoat, UPR & styrene-based, at plant: 0.065, 0.015 kg (2 entries)
- Continuous strand mat, glass fiber based, at plant: 0.12 kg
- Acetone from butane, at plant. RER: 0.0046 kg
- Surfaced dried lumber; at planer mill [US]: 0.01 kg
- Converted corrugated box, with average bleaching, at plant: 0.02 kg
- Liquefied petroleum gas, combusted in industrial boiler [RNA]: 0.024114 l
- Plywood, at plywood plant [RNA]: 0.039 kg
- Diesel, combusted in industrial equipment [RNA]: 0.0015019 l
- Limestone, at mine [RNA]: 0.2 kg
- Disposal, solid waste, unspecified, to waste-to-energy: 0.0025 kg
- Cold rolled sheet, steel, at plant: 0.025 kg
- Ethanol, denatured, corn stover, biochemical: 0.0017522 l
- Disposal, solid waste, unspecified, to sanitary landfill: 0.17 kg
- Transport, ocean freighter, average fuel mix [RNA]: 1.033 t*km
- Natural gas, combusted in industrial boiler [RNA]: 0.0017542 m3
- Electricity, at grid [RNA]: 1.0957 kWh; provider Electricity, at Grid, US, 2010
- Unsaturated polyester, resin, at plant [US]: 0.52 kg

## Inputs from nature
- Water [resource, water]: 7.4011 kg; lognormal geomSd 1

## Emissions to nature
- Particulate matter, ≤ 10μm [emission, air]: 0.00036 kg; lognormal geomSd 1
- Methyl methacrylate [emission, air]: 0.00016 kg; lognormal geomSd 1
- Styrene [emission, air]: 0.037 kg; lognormal geomSd 1
- Volatile organic compounds [emission, air]: 0.012 kg; lognormal geomSd 1

## Allocation factors
- causal, Plywood, from open molding, for shipping, for Cold rolled sheet, steel, at plant: 0
- causal, Surfaced dried lumber, from open molding, for shipping, for Electricity, at grid: 0
- causal, Plywood, from open molding, for shipping, for Gelcoat, UPR & styrene-based, at plant: 0
- causal, Open molding, rigid composites part, at plant, for Transport, ocean freighter, average fuel mix: 1
- causal, Composite scrap, from composites open molding, at plant, for Plywood, at plywood plant: 0
- causal, Composite scrap, from composites open molding, at plant, for Transport, combination truck, diesel powered: 0
- causal, Corrugate packaging, from open molding, for shipping, for Electricity, at grid: 0
- causal, Open molding, rigid composites part, at plant, for Volatile organic compounds: 1
- causal, Plywood, from open molding, for shipping, for Transport, ocean freighter, average fuel mix: 0
- causal, Plywood, from open molding, for shipping, for Electricity, at grid: 0
- causal, Open molding, rigid composites part, at plant, for Surfaced dried lumber; at planer mill: 1
- causal, Open molding, rigid composites part, at plant, for Gelcoat, UPR & styrene-based, at plant: 1
- causal, Corrugate packaging, from open molding, for shipping, for Disposal, solid waste, unspecified, to sanitary landfill: 0
- causal, Corrugate packaging, from open molding, for shipping, for Natural gas, combusted in industrial boiler: 0
- causal, Plywood, from open molding, for shipping, for Disposal, solid waste, unspecified, to waste-to-energy: 0
- causal, Open molding, rigid composites part, at plant, for Styrene: 1
- causal, Plywood, from open molding, for shipping, for Unsaturated polyester, resin, at plant: 0
- causal, Open molding, rigid composites part, at plant, for Methyl methacrylate: 1
- causal, Surfaced dried lumber, from open molding, for shipping, for Unsaturated polyester, resin, at plant: 0
- causal, Surfaced dried lumber, from open molding, for shipping, for Cold rolled sheet, steel, at plant: 0
- causal, Open molding, rigid composites part, at plant, for Gelcoat, UPR & styrene-based, at plant: 1
- causal, Composite scrap, from composites open molding, at plant, for Volatile organic compounds: 0
- physical, Composite scrap, from composites open molding, at plant: 0
- causal, Open molding, rigid composites part, at plant, for Continuous strand mat, glass fiber based, at plant: 1
- causal, Composite scrap, from composites open molding, at plant, for Limestone, at mine: 0
- causal, Plywood, from open molding, for shipping, for Surfaced dried lumber; at planer mill: 0
- causal, Plywood, from open molding, for shipping, for Disposal, solid waste, unspecified, to sanitary landfill: 0
- physical, Corrugate packaging, from open molding, for shipping: 0
- causal, Corrugate packaging, from open molding, for shipping, for Styrene: 0
- causal, Plywood, from open molding, for shipping, for Methyl methacrylate: 0
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
## Sampling procedure
Data are from primary sources. The composites fabricators who provided data for this module verified that the characteristics of their plants are representative of North American composites fabrication facilities producing open molded composite parts. The representativeness of the composites fabrication processes are unknown, but estimated to be less than 10% of the US production volume.

## Sources
- American Composites Manufacturers Assn.
