# Anthracite coal, at mine

Dataset: openLCA process, unit process
Category: 21: Mining, Quarrying, and Oil and Gas Extraction/2121: Coal Mining
Geography: Northern America
Allocation method: no allocation
Generated by: Jeff Hernbloom
Published in: Franklin Associates
restrictionsDescription: All information can be accessed by everybody.
copyright: false

## General comment
Important note: although most of the data in the US LCI database has
undergone some sort of review, the database as a whole has not yet
undergone a formal validation process.
Please email comments to lci@nrel.gov.

## Geography
North America

## Reference product
- Anthracite coal, at mine [RNA]: 1 kg

## Inputs from technosphere
- Natural gas, combusted in industrial boiler [RNA]: 0.000232 m3
- Diesel, combusted in industrial boiler [RNA]: 0.00364 l
- Anthracite coal, combusted in industrial boiler [RNA]: 0.17 kg
- Electricity, at grid [RNA]: 0.0212 kWh; provider Electricity, at Grid, US, 2010
- Gasoline, combusted in equipment [RNA]: 0.000268 l
- Disposal, solid waste, unspecified, to unspecified treatment: 0.271 kg
- Residual fuel oil, combusted in industrial boiler [RNA]: 0.00134 l

## Inputs from nature
- Coal, anthracite [resource, ground]: 38.989 MJ

## Emissions to nature
- Manganese [emission, water]: 1.48e-5 kg
- Iron [emission, water]: 2.22e-5 kg
- Particulate matter [emission, air]: 0.0021 kg
- Methane [emission, air]: 0.00159 kg
- Suspended solids, inorganic [emission, water]: 0.000259 kg
- Volatile organic compounds [emission, air]: 3.18e-5 kg

## Sources
- Energy Information Administration
- Franklin Associates
- J.G. Speight
- D.A. Kirchgessner
- Energy Information Administration
- Energy Information Administration
- U.S. EPA
- U.S. Census Bureau
- Energy Information Administration
- unspecified
- USDA/ERS
- unspecified
- Hong, B.D
- U.S. EPA
- unspecified
- USDA/NCRS
- U.S. Department of Energy
