# Skidding, wheeled cable skidder, 120-160 HP

Dataset: openLCA process, unit process
Category: 11: Agriculture, Forestry, Fishing and Hunting/1133: Logging
Geography: Northern America
Time period: 2002-12-31 to 2002-12-31
Allocation method: no allocation
Generated by: Maureen Puetmann
Published in: Elaine Oneil
restrictionsDescription: All information can be accessed by everybody.
copyright: true

## General comment
Important note: although most of the data in the US LCI database has
undergone some sort of review, the database as a whole has not yet
undergone a formal validation process.
Please email comments to lci@nrel.gov.

## Technology
Average technology. Some data extrapolated from similar processes.

## Geography
Northeast/North Central (NE/NC) region of the US : Connecticut, Delaware, Illinois, Indiana, Iowa, Maine, Maryland, Massachusetts, Michigan, Minnesota, Missouri, New Hampshire, New Jersey, New York, Ohio, Pennsylvania, Rhode Island, Vermont, West Virginia, and Wisconsin.

## Reference product
- Skidding, wheeled cable skidder, 120-160 HP [RNA]: 1 d
  Ground Skidding Equipment

## Inputs from technosphere
- Diesel, combusted in industrial equipment [RNA]: 15.0097 l
  fuel per smhr
- Lubricants, unspecified, at plant: 0.232263 kg
  Proxy for hydraulic fluids

## Sampling procedure
Fuel consumption data for the selected harvesting systems is generally based on the horsepower of the machines used within those systems. The fuel consumption calculations show consistency across the range of equipment used and should have a fairly high degree of reliability. Lubricant consumption was calculated as a percent of fuel consumption. This assumption generalizes the consumption rate and fails to distinguish between individual equipment characteristics.

## Sources
- Maureen Puettmann
- Elaine Oneil
