# Electricity, at eGrid, RFCM, 2008

Dataset: openLCA process, unit process
Category: 22: Utilities/2211: Electric Power Generation, Transmission and Distribution
Geography: Northern America
Time period: 2007-12-31 to 2007-12-31
Allocation method: no allocation
Generated by: Alberta Carpenter
Published in: Chris Goemans, Athena Institute
restrictionsDescription: All information can be accessed by everybody.
copyright: false

## General comment
The methodology used to put together the grid information is outlined in reference 1.

## Technology
Typical

## Geography
RFC Michigan electricity grid to include most of Michigan less the upper pennisula and a small south west portion of lower peninsula.

## Reference product
- Electricity, at grid [RNA]: 1 kWh

## Inputs from technosphere
- Electricity, biomass, solid, biogenic MSW, at power plant: 0.00209135 kWh
  Solid Renewable Fuels (Biomass) MSB – Municipal Solid Waste – Biogenic Component
- Electricity, nuclear, at power plant [RNA]: 0.110791 kWh
  Nuclear Fission NUC – Nuclear (Uranium, Plutonium, Thorium)
- Electricity, natural gas, at power plant [RNA]: 0.102724 kWh
  Natural Gas
- Electricity, bituminous coal, at power plant [RNA]: 0.202843 kWh
  Bituminous Coal
- Electricity, MSW, non-biogenic, at power plant: 0.0016432 kWh
  Other Fuels MSN – Municipal Solid Waste – Non-biogenic components
- Electricity, at wind power plant, unspecified: 0.00162707 kWh
  Wind
- Electricity, biomass, at power plant [RNA]: 0.0119766 kWh
  Solid Renewable Fuels (Biomass) WDS – Wood/Wood Waste Solids (Paper Pellets, Railroad Ties, Utility Poles, Wood Chips, and other wood solids)
- Electricity, other fuels, unspecified, at power plant: 5.57727e-5 kWh
  Other Fuels OTH – Other (Batteries, Chemicals, Coke Breeze, Hydrogen, Pitch, Sulfur, Tar Coal, and miscellaneous technologies)
- Electricity, biomass, liquid, sludge, at power plant: 1.5063e-5 kWh
  Liquid Renewable Fuels (Biomass) SLW - sludge waste
- Electricity, bituminous coal, at power plant [RNA]: 0.554564 kWh
  Subbituminous Coal
- Electricity, petroleum coke, at power plant: 0.0019755 kWh
  Petroleum (Other Fossil) PC - petroleum coke
- Electricity, biomass,liquid, unspecified, at power plant: 7.20532e-7 kWh
  Liquid Renewable Fuels (Biomass) OBL – Other Biomass Liquid (Ethanol, Fish Oil, Liquid Acetonitrile Waste, Medical Waste, Tall Oil, Waste Alcohol, and other Biomass not specified)
- Electricity, hydropower, at power plant, unspecified: -0.00420187 kWh
  Hydroelectric WAT – Water (Conventional, Pumped Storage)
- Electricity, residual fuel oil, at power plant [RNA]: 0.00138471 kWh
  Petroleum (RFO) – Residual Fuel Oil (includes No. 5 and No. 6 Fuel Oils and Bunker C Fuel Oil)
- Electricity, tire derived fuel, at power plant: 0.00159343 kWh
  Solid Renewable Fuels (Biomass) TDF - tires, tire derived fuel
- Electricity, biomass, gas, landfill, at power plant: 0.00641576 kWh
  Gaseous Renewable Fuels (Biomass) LFG - landfill gas
- Electricity, diesel, at power plant [RNA]: 0.00145309 kWh
  Petroleum (DFO) – Distillate Fuel Oil (includes all Diesel and No. 1, No. 2, and No. 4 Fuel Oils)
- Electricity, other gases, unspecified, at power plant: 0.0030472 kWh
  Other Gases BFG - blast furnace gas

## Sampling procedure
based on EIA electricity reports for all power plants in the US.

## Sources
- EIA
- EIA
- EIA
- Chris Goemans, Athena Institute
- US DOE
- International Energy Agency
- Statistics Canada
- EIA
- Statistics Canada
- EIA
- EIA
- US DOE
- EIA
- USEPA
- Statistics Canada
- unspecified
- Statistics Canada
- EIA
- EIA
- EIA
- Statistics Canada
- USEPA
- Statistics Canada
- EIA
