# Electricity, at eGrid, NYUP, 2010

Dataset: openLCA process, unit process
Category: 22: Utilities/2211: Electric Power Generation, Transmission and Distribution
Geography: Northern America
Time period: 2009-12-31 to 2009-12-31
Allocation method: no allocation
Generated by: Samantha Wascavage
Published in: Chris Goemans, Athena Institute
restrictionsDescription: All information can be accessed by everybody.
copyright: false

## General comment
The methodology used to put together the grid information is outlined in reference 1.

## Technology
Typical

## Geography
Upstate NY electricity grid to include most of NY state less Long Island, Westchester County and New York City

## Reference product
- Electricity, at grid [RNA]: 1 kWh

## Inputs from technosphere
- Electricity, biomass, solid, biogenic MSW, at power plant: 0.006537 kWh
  Solid Renewable Fuels (Biomass) MSB, AB, MSW, OBS, TDF, WDS – Municipal Solid Waste – Biogenic Component
- Electricity, residual fuel oil, at power plant [RNA]: 0.001847 kWh
  Petroleum (RFO) – Residual Fuel Oil (includes No. 5 and No. 6 Fuel Oils and Bunker C Fuel Oil)
- Electricity, nuclear, at power plant [RNA]: 0.272587 kWh
  Nuclear Fission – Nuclear (Uranium, Plutonium, Thorium)
- Electricity, bituminous coal, at power plant [RNA]: 0.029426 kWh
  Bituminous Coal BIT, SC, SGC, WC - Anthracite Coal, and Bituminous Coal.
- Electricity, lignite coal, at power plant [RNA]: 0.000303 kWh
  LIG – Lignite Coal
- Electricity, diesel, at power plant [RNA]: 0.035143 kWh
  Petroleum (DFO, JF, KER) – Distillate Fuel Oil (includes all Diesel and No. 1, No. 2, and No. 4 Fuel Oils)
- Electricity, bituminous coal, at power plant [RNA]: 0.044136 kWh
  Subbituminous Coal
- Electricity, petroleum coke, at power plant: 0.004785 kWh
  Petroleum (Other Fossil) PC, SG, WO - petroleum coke
- Electricity, biomass,liquid, unspecified, at power plant: 0.001557 kWh
  Liquid Renewable Fuels (Biomass) BLQ, OBL, SLW, WDL - black liquor
- Electricity, at wind power plant, unspecified: 0.017669 kWh
  Wind
- Electricity, hydropower, at power plant, unspecified: 0.389353 kWh
  Hydroelectric WAT – Water (Conventional, Pumped Storage)
- Electricity, biomass, gas, landfill, at power plant: 0.003927 kWh
  Gaseous Renewable Fuels (Biomass) LFG, OBG - landfill gas
- Electricity, MSW, non-biogenic, at power plant: 0.001907 kWh
  Other Fuels MSN, OTH, PUR, WH – Municipal Solid Waste – Non-biogenic components
- Electricity, natural gas, at power plant [RNA]: 0.193878 kWh
  Natural Gas

## Sampling procedure
based on EIA electricity reports for all power plants in the US.

## Sources
- EIA
- EIA
- Statistics Canada
- Statistics Canada
- Chris Goemans, Athena Institute
- EIA
- USEPA
- EIA
- Statistics Canada
- EIA
- Statistics Canada
- EIA
- unspecified
- EIA
- USEPA
- EIA
- EIA
- Statistics Canada
- US DOE
- International Energy Agency
- EIA
