# Sulfur, at plant

Dataset: openLCA process, unit process
Category: 21: Mining, Quarrying, and Oil and Gas Extraction/2111: Oil and Gas Extraction
Geography: Northern America
Time period: 1983-12-31 to 2003-12-31
Allocation method: no allocation
Generated by: Franklin Associates
Published in: THE PLASTICS DIVISION OF THE AMERICAN C
restrictionsDescription: All information can be accessed by everybody.
copyright: false

## General comment
Heat is a coproduct released from cooling during the exothermic reaction. Complete inventory data and metadata are available in full in the final report and appendices, Cradle-to-Gate Life Cycle Inventory of Nine Plastic Resins and Four Polyurethane Precursors. This report has been extensively reviewed within Franklin Associates and has undergone partial critical review by ACC Plastics Division members and is available at: www.americanchemistry.com. Quantities may vary slightly between the reference to main source and and this module due to rounding. Important note: although most of the data in the US LCI database has undergone some sort of review, the database as a whole has not yet undergone a formal validation process. Please email comments to lci@nrel.gov.

## Technology
Recovery from petroleum refining and natural gas sweetening via the Claus process

## Geography
North America (US and Canada)

## Reference product
- Sulfur, at plant [RNA]: 1 kg

## By-products
- Recovered energy [RNA]: 6 MJ
  Credit for steam or heat co-product sold externally.

## Inputs from technosphere
- Natural gas, combusted in industrial boiler [RNA]: 0.113 m3
- Disposal, solid waste, unspecified, to sanitary landfill: 0.0328 kg
- Residual fuel oil, combusted in industrial boiler [RNA]: 0.00101 l
- Diesel, combusted in industrial equipment [RNA]: 0.00164 l
  Includes diesel fuel and distillate oil amounts.
- Electricity, at grid [RNA]: 0.159 kWh; provider Electricity, at Grid, US, 2010
- Gasoline, combusted in equipment [RNA]: 0.000866 l

## Emissions to nature
- Iron [emission, water]: 5.04e-5 kg
- Xylene [emission, water]: 1.46e-7 kg
- Benzene, pentamethyl- [emission, water]: 6.16e-12 kg
- Decane [emission, water]: 8.27e-9 kg
- p-Cresol [emission, water]: 8.89e-9 kg
- Beryllium [emission, water]: 3.65e-9 kg
- Selenium [emission, water]: 3.27e-9 kg
- Benzene [emission, water]: 3.3e-7 kg
- Tin [emission, water]: 6.66e-8 kg
- Titanium [emission, water]: 2.6e-7 kg
- Cyanide [emission, water]: 5.93e-12 kg
- Sodium(I) [emission, water]: 0.00186 kg
- Copper(I) [emission, water]: 7.9e-8 kg
- Eicosane [emission, water]: 4.3e-9 kg
- Chromium [emission, water]: 7.21e-7 kg
- Naphthalene [emission, water]: 5.14e-9 kg
- Yttrium [emission, water]: 1.92e-9 kg
- Oils, unspecified [emission, water]: 5.44e-6 kg
- Total dissolved solids [emission, water]: 0.00815 kg
- Biological Oxygen Demand [emission, water]: 3.18e-5 kg
- Cobalt [emission, water]: 6.34e-9 kg
- Ethylbenzene [emission, water]: 1.83e-8 kg
- Methane [emission, air]: 0.00634 kg
- Biphenyl [emission, water]: 3.57e-9 kg
- Lithium(I) [emission, water]: 2.87e-5 kg
- Sulfate [emission, water]: 1.33e-5 kg
- Sulfur [emission, water]: 6.89e-7 kg
- Lead-210 [emission, water]: 8.344e-5 kBq
- Chemical Oxygen Demand [emission, water]: 5.26e-5 kg
- Silver [emission, water]: 3.92e-7 kg
- Phenanthrene [emission, water]: 2.28e-10 kg
- 2,4-Dimethylphenol [emission, water]: 2.07e-8 kg
- Arsenic(V) [emission, water]: 5.88e-8 kg
- Fluorenes, alkylated, unspecified [emission, water]: 3.19e-9 kg
- p-Xylene [emission, water]: 3.03e-9 kg
- Magnesium [emission, water]: 0.000126 kg
- 1-Methylfluorene [emission, water]: 9.36e-12 kg
- Acetone [emission, water]: 8.31e-10 kg
- Chloride [emission, water]: 0.00773 kg
- Phenanthrenes, alkylated, unspecified [emission, water]: 3.75e-10 kg
- Surfactants [emission, water]: 1.54e-7 kg
- Bromide [emission, water]: 3.92e-5 kg
- Phenol [emission, water]: 7.92e-8 kg
- Tetradecane [emission, water]: 6.59e-9 kg
- Radium-228 [emission, water]: 0.00053 kBq
- Calcium(II) [emission, water]: 0.000635 kg
- Aldehydes, unspecified [emission, air]: 8.9e-5 kg
- Dodecane [emission, water]: 1.57e-8 kg
- Dibenzothiophene [emission, water]: 1.27e-11 kg
- Aluminum [emission, water]: 2.7e-5 kg
- Molybdenum [emission, water]: 6.57e-9 kg
- Benzoic acid [emission, water]: 2.91e-7 kg
- Hexadecane [emission, water]: 1.72e-8 kg
- o-Cresol [emission, water]: 8.78e-9 kg
- Methyl isobutyl ketone [emission, water]: 3.46e-10 kg
- Radium-226 [emission, water]: 0.0003848 kBq
- Mercury [emission, water]: 2.96e-10 kg
- Hexanoic acid [emission, water]: 6.02e-8 kg
- 2-Methylnaphthalene [emission, water]: 4.31e-9 kg
- Antimony [emission, water]: 1.68e-8 kg
- 2-Hexanone [emission, water]: 1.88e-9 kg
- Strontium [emission, water]: 1.56e-5 kg
- Barium [emission, water]: 0.000365 kg
- Methyl ethyl ketone [emission, water]: 6.62e-12 kg
- Boron [emission, water]: 8.95e-7 kg
- Benzenes, alkylated, unspecified [emission, water]: 5.51e-8 kg
- m-Xylene [emission, water]: 8.17e-9 kg
- Zinc [emission, water]: 6.15e-7 kg
- Hexacosane [emission, water]: 5.49e-11 kg
- Manganese [emission, water]: 1.84e-7 kg
- Octadecane [emission, water]: 4.27e-9 kg
- Suspended solids, inorganic [emission, water]: 0.00298 kg
- Vanadium [emission, water]: 7.45e-9 kg
- Toluene [emission, water]: 3.06e-7 kg
- Carbon dioxide [emission, air]: 0.214 kg
- Cadmium(II) [emission, water]: 9.03e-9 kg
- Dibenzofuran [emission, water]: 1.56e-11 kg
- p-Cymene [emission, water]: 8.22e-12 kg
- Thallium [emission, water]: 3.56e-9 kg
- Fluorine [emission, water]: 1.48e-9 kg
- Nickel [emission, water]: 6.9e-8 kg
- Ammonia [emission, water]: 3.46e-6 kg
- o-Xylene [emission, water]: 3.03e-9 kg
- Lead [emission, water]: 1.51e-7 kg
- Naphthalenes, alkylated, unspecified [emission, water]: 9.03e-10 kg
- Docosane [emission, water]: 8.8e-11 kg
- Chloromethane [emission, water]: 3.31e-12 kg

## Allocation factors
- causal, Sulfur, at plant, for Ammonia: 1
- causal, Recovered energy, for Iron: 0
- causal, Sulfur, at plant, for Hexanoic acid: 1
- causal, Recovered energy, for Boron: 0
- causal, Sulfur, at plant, for Hexadecane: 1
- causal, Sulfur, at plant, for Manganese: 1
- causal, Sulfur, at plant, for Xylene: 1
- causal, Sulfur, at plant, for Suspended solids, inorganic: 1
- causal, Sulfur, at plant, for Hexacosane: 1
- causal, Recovered energy, for Suspended solids, inorganic: 0
- causal, Recovered energy, for Surfactants: 0
- causal, Recovered energy, for Barium: 0
- causal, Sulfur, at plant, for Chemical Oxygen Demand: 1
- causal, Recovered energy, for Ethylbenzene: 0
- causal, Recovered energy, for Lead: 0
- causal, Recovered energy, for Copper(I): 0
- causal, Recovered energy, for Radium-228: 0
- causal, Sulfur, at plant, for Yttrium: 1
- causal, Sulfur, at plant, for o-Cresol: 1
- causal, Recovered energy, for Total dissolved solids: 0
- causal, Sulfur, at plant, for Cyanide: 1
- causal, Recovered energy, for Chloromethane: 0
- causal, Sulfur, at plant, for Phenanthrene: 1
- causal, Sulfur, at plant, for Gasoline, combusted in equipment: 1
- causal, Sulfur, at plant, for Biphenyl: 1
- causal, Recovered energy, for Beryllium: 0
- causal, Sulfur, at plant, for Magnesium: 1
- causal, Recovered energy, for Mercury: 0
- causal, Recovered energy, for Lead-210: 0
- causal, Recovered energy, for p-Cresol: 0
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
## Sampling procedure
Data are from secondary sources.

## Sources
- THE PLASTICS DIVISION OF THE AMERICAN C
