# Electricity, biomass, at power plant

Dataset: openLCA process, unit process
Category: 22: Utilities/2211: Electric Power Generation, Transmission and Distribution
Geography: Northern America
Time period: 1996-12-31 to 1996-12-31
Allocation method: no allocation
Generated by: Franklin Associates
Published in: Franklin Associates
restrictionsDescription: All information can be accessed by everybody.
copyright: false

## General comment
Biomass production is represented by a poplar tree crop with a seven-year growing cycle. Electricity generation is accomplished by gasification of biomass followed by a gas turbine. Biomass is produced within the boundaries of this system and is thus not shown as a fuel input. This is cradle-to-gate data, spanning the extraction of fuels and raw materials through the production of electricity. Infrastructure requirments for biomass production, biomass gasification, and biomass electricity generation are also included. Process and fuel emissions are reported together in the original data source and cannot be separated.,
Important note: although most of the data in the US LCI database has
undergone some sort of review, the database as a whole has not yet
undergone a formal validation process.
Please email comments to lci@nrel.gov.

## Technology
Biomass production is represented by a poplar tree plantation with a seven-year growing cycle. Electricity generation is accomplished by gasification of biomass followed by a gas turbine.

## Geography
United States

## Reference product
- Electricity, biomass, at power plant [RNA]: 1 kWh

## By-products
- Tar [RNA]: 1.0397e-11, 7.2682e-10 kg (2 entries)
  Includes process and fuel emissions from biomass production and biomass gasification/combustion.

## Inputs from technosphere
- Transport, train, diesel powered [RNA]: 0.010545 t*km
  Represents transportation from biomass production to powerplant.
- Disposal, solid waste, unspecified, to unspecified treatment: 0.00059859 kg
  (same comment as for Tar)
- Transport, combination truck, average fuel mix [RNA]: 0.024604 t*km
  Represents transportation from biomass production to powerplant.

## Inputs from nature
- Carbon dioxide [resource, air]: 0.84323 kg

## Emissions to nature
- Fluoride [emission, water]: 6.5387e-9 kg
  (same comment as for Tar)
- Phenol [emission, water]: 1.2916e-10 kg
  (same comment as for Tar)
- Ammonia [emission, air]: 3.5133e-5 kg
  (same comment as for Tar)
- Suspended solids, inorganic [emission, water]: 1.0491e-9, 2.2612e-7 kg (2 entries)
  (same comment as for Tar)
- Carbon dioxide [emission, air]: 0.040356 kg
  (same comment as for Tar)
- Sulfate [emission, water]: 7.8222e-10 kg
  (same comment as for Tar)
- Nitric acid [emission, water]: 4.1263e-7 kg
  (same comment as for Tar)
- Nitrogen oxides [emission, air]: 0.00065865 kg
  (same comment as for Tar)
- Sulfur oxides [emission, air]: 0.00029479 kg
  (same comment as for Tar)
- Sodium(I) [emission, water]: 7.766e-10 kg
  (same comment as for Tar)
- Carbon dioxide [emission, air]: 0.84323 kg
- Sulfide [emission, water]: 8.4867e-11 kg
  (same comment as for Tar)
- Fluoride [emission, air]: 8.0566e-9 kg
  (same comment as for Tar)
- Volatile organic compounds [emission, air]: 0.00058674 kg
  (same comment as for Tar)
- Hydrocarbons [emission, water]: 5.2153e-11 kg
  (same comment as for Tar)
- Total dissolved solids [emission, water]: 4.1395e-5 kg
  (same comment as for Tar)
- Chloride [emission, air]: 6.4622e-10 kg
  (same comment as for Tar)
- Nitrate compounds [emission, water]: 1.8396e-10 kg
  (same comment as for Tar)
- Iron [emission, water]: 1.5025e-12 kg
  (same comment as for Tar)
- Particulate matter [emission, air]: 3.8155e-5 kg
  (same comment as for Tar)
- Metals [emission, air]: 2.3963e-12 kg
  (same comment as for Tar)
- Aldehydes, unspecified [emission, air]: 1.378e-7 kg
  (same comment as for Tar)
- Isoprene [emission, air]: 0.021181 kg
  (same comment as for Tar)
- Acid compounds [emission, water]: 1.3574e-8 kg
  (same comment as for Tar)
- Metals [emission, water]: 6.3676e-10 kg
  (same comment as for Tar)
- Carbon monoxide [emission, air]: 7.2228e-5 kg
  (same comment as for Tar)
- Oils, unspecified [emission, water]: 8.4302e-7 kg
  (same comment as for Tar)
- Nitrate [emission, water]: 4.5692e-12 kg
  (same comment as for Tar)
- Chemical Oxygen Demand [emission, water]: 8.9751e-7 kg
  (same comment as for Tar)
- Hydrochloric acid [emission, air]: 2.0154e-9 kg
  (same comment as for Tar)
- Hydrogen sulfide [emission, air]: 2.0888e-11 kg
  (same comment as for Tar)
- Nitrogen [emission, water]: 6.817e-9 kg
  (same comment as for Tar)
- Chloride [emission, water]: 4.7096e-9 kg
  (same comment as for Tar)
- Nitrous oxide [emission, air]: 9.3122e-6 kg
  (same comment as for Tar)
- Methane [emission, air]: 4.8527e-6 kg
  (same comment as for Tar)
- Ammonia [emission, water]: 7.4433e-6 kg
  (same comment as for Tar)
- Dissolved Organic Matter [emission, water]: 4.1681e-11 kg
  (same comment as for Tar)
- Biological Oxygen Demand [emission, water]: 3.0016e-7 kg
  (same comment as for Tar)
- Hydrofluoric acid [emission, air]: 3.681e-10 kg
  (same comment as for Tar)
- Organic compounds [emission, air]: 1.0146e-6 kg
  (same comment as for Tar)
- Cyanide [emission, water]: 4.2482e-11 kg
  (same comment as for Tar)

## Allocation factors
- causal, Electricity, biomass, at power plant, for Volatile organic compounds: 1
- causal, Electricity, biomass, at power plant, for Carbon dioxide: 1
- causal, Tar, for Methane: 0
- causal, Electricity, biomass, at power plant, for Fluoride: 1
- causal, Tar, for Metals: 0
- causal, Tar, for Carbon dioxide: 0
- causal, Tar, for Fluoride: 0
- causal, Tar, for Dissolved Organic Matter: 0
- causal, Electricity, biomass, at power plant, for Ammonia: 1
- causal, Electricity, biomass, at power plant, for Sulfide: 1
- causal, Tar, for Sulfate: 0
- causal, Electricity, biomass, at power plant, for Isoprene: 1
- causal, Electricity, biomass, at power plant, for Metals: 1
- causal, Tar, for Organic compounds: 0
- causal, Electricity, biomass, at power plant, for Aldehydes, unspecified: 1
- causal, Tar, for Iron: 0
- causal, Electricity, biomass, at power plant, for Nitric acid: 1
- causal, Electricity, biomass, at power plant, for Methane: 1
- causal, Tar, for Nitric acid: 0
- causal, Tar, for Hydrogen sulfide: 0
- causal, Electricity, biomass, at power plant, for Sulfate: 1
- causal, Tar, for Carbon dioxide: 0
- causal, Tar, for Oils, unspecified: 0
- causal, Tar, for Hydrofluoric acid: 0
- causal, Electricity, biomass, at power plant, for Organic compounds: 1
- causal, Tar, for Isoprene: 0
- physical, Tar: 0
- causal, Electricity, biomass, at power plant, for Cyanide: 1
- causal, Electricity, biomass, at power plant, for Transport, combination truck, average fuel mix: 1
- causal, Tar, for Hydrocarbons: 0
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
## Sources
- Franklin Associates
- Margaret K. Mann
