# Polylactide, PLA, biopolymer resin, at plant

Dataset: openLCA process, unit process
Category: 31-33: Manufacturing/3252: Resin, Synthetic Rubber, and Artificial and Synthetic Fibers and Filaments Manufacturing
Geography: Northern America
Time period: 2008-12-31 to 2008-12-31
Allocation method: no allocation
Generated by: Erwin Vink
Published in: E.T.H. Vink
restrictionsDescription: All information can be accessed by everybody.
copyright: false

## General comment
Data has been peer reviewed by Dr. I. Boustead from Boustead Consulting, UK. Data only represents Ingeo polylactide (PLA) resin production by NatureWorks LLC in Blair Nebraska and cannot be used for PLA production in general. Final review report is attached to the Data Module Report.

## Technology
Ingeo Polylactide polymer production technology developed by NatureWorks LLC

## Geography
North America

## Reference product
- Polylactide, PLA, biopolymer resin, at plant [RNA]: 1 kg

## Inputs from technosphere
- Transport, combination truck, diesel powered [RNA]: 0.12676 t*km
- Disposal, chemical waste, unspecified, to residual materials landfill: 0.000623442 kg
- Natural gas, combusted in industrial boiler [RNA]: 0.224 m3
  Used to produce steam (38.8MJ/m3 NG)
- Disposal, mineral waste, underground deposit: 0.0169396 kg
  See Data Module report for further clarification
- Ferromanganese, at furnace: 5.06453e-8 kg
- Disposal, inert solid waste, to inert material landfill: 0.00166456 kg
- Disposal, chemical waste, unspecified, to sanitary landfill: 0.00101101 kg
- Disposal, tailings waste, underground deposit: 0.00125867 kg
- Disposal, mining waste, underground deposit: 0.00338058 kg
- Electricity, at grid [RNA]: 1.627 MJ; provider Electricity, at Grid, US, 2010
- Natural gas, combusted in industrial equipment, 1.357 m3/kg, 52.13 MJ/kg [RNA]: 0.154 m3; provider Natural gas, combusted in industrial equipment
  Used for heating oil (38.8MJ/m3 NG)
- Disposal, slags & ash waste, unspecified reuse: 0.0014171 kg

## Inputs from nature
- Calcium carbonate [resource, ground, subterranean]: 0.101051 kg
- Olivine group [resource, ground, subterranean]: 5.23111e-7 kg
- Orthophosphate [resource, ground, subterranean]: 0.00322101 kg
- Nitrogen [resource, air]: 0.00111139 kg
- Land use [resource, ground, human-dominated, agricultural]: 0.421632, 0.266112 m2*a (2 entries)
- Gravel [resource, ground, subterranean]: 2.05726e-7 kg
- Coal, bituminous [resource, ground, subterranean]: 0.429849, 0.000617908 MJ (2 entries)
- Crude oil [resource, water, subterranean]: 1.11805 MJ
- Water [resource, water, fresh water body, river]: 16.1269 kg
  Net quantity of water used in processes such as the corn wet mill, the lactic acid production plant and the steam boiler.
- Land use [resource, ground, human-dominated, agricultural]: 1.0368 m2*a
  net land use / kg PLA resin
- Oxygen [resource, air]: 0.000172927 kg
- Iron [resource, ground, subterranean]: 5.57605e-5 kg
- Barite [resource, ground, subterranean]: 7.25393e-5 kg
- Sulfur [resource, ground, subterranean]: 0.00775471, 0.0328869 kg (2 entries)
- Copper [resource, ground, subterranean]: 1.71958e-11 kg
- Calcium sulfate [resource, ground, subterranean]: 2.68607e-8 kg
- Shale [resource, ground, subterranean]: 7.60429e-8 kg
- Limestone [resource, ground, subterranean]: 0.0343806 kg
- Lead [resource, ground, subterranean]: 3.15293e-7 kg
- Coal, lignite [resource, ground, subterranean]: 0.000358109 MJ
- Potassium chloride [resource, ground, subterranean]: 0.0148016 kg
- Bauxite [resource, ground, subterranean]: 5.03887e-6 kg
- Fluorite [resource, ground, subterranean]: 9.17236e-8 kg
- Dolomite [resource, ground, subterranean]: 6.9287e-7 kg
- Air [resource, air]: 0.254319 kg
- Water [resource, water, subterranean]: 20.015 kg
  Water used for corn irrigation in East Nebraska and West Iowa.: 96% is ground, 4% is surface water (river).
- Water [resource, water, fresh water body, river]: 0.833957 kg
  (same comment as for Water)
- Zinc [resource, ground, subterranean]: 1.14967e-8 kg
- Sand [resource, ground, subterranean]: 0.00444607 kg
- Sodium chloride [resource, ground, subterranean]: 0.0814531 kg
- Bentonite [resource, ground, subterranean]: 5.33666e-6 kg
- Carbon dioxide [emission, air]: 1.833 kg
  CO2 taken from air during corn production and stored in polymer
- Water [resource, water, fresh water body, river]: 10.7445 kg
  This is the sum of make up water of cooling towers ( = the water to offset losses by evaporation, drift and blowdown) + the water used in once-though cooling water systems.
- Natural gas [resource, air, subterranean]: 2.51022 MJ

## Emissions to nature
- Nicosulfuron [emission, ground]: 3.11483e-7 kg
- Phostebupirim [emission, ground]: 1.18936e-6 kg
- Prosulfuron [emission, ground]: 2.54851e-8 kg
- Pendimethalin [emission, ground]: 2.91656e-6 kg
- Biomass [emission, air, troposphere, rural]: 7.63641e-5 kg
- Hydrogen cyanide [emission, air, troposphere, rural]: 1.64641e-35 kg
- Hydrogen sulfide [emission, air, troposphere, rural]: 1.34617e-7 kg
- Molybdenum [emission, water]: 1.30743e-11 kg
- Cyanide compounds [emission, air, troposphere, rural]: 1.18674e-10 kg
- Sulfuric acid [emission, air, troposphere, rural]: 1.37649e-8 kg
- Manganese [emission, air, troposphere, rural]: 7.14057e-11 kg
- Chlorine [emission, water]: 1.79574e-9 kg
- Strontium [emission, water]: 3.65596e-9 kg
- Fluoride [emission, water]: 5.04559e-7 kg
- 2-[4,6-Bis(difluoromethoxy)pyrimidin-2-ylcarbamoylsulfamoyl]benzoic acid [emission, ground]: 1.41586e-7 kg
- Dicamba [emission, ground]: 2.03878e-6 kg
- Methane [emission, air, troposphere, rural]: 0.00130205 kg
- Particulate matter, > 10μm [emission, air, troposphere, rural]: -0.000138748 kg
- Zinc compounds [emission, water]: 4.7956e-10 kg
- Metolachlor [emission, ground]: 5.04783e-5 kg
- Flumetsulam [emission, ground]: 3.96437e-7 kg
- Beryllium [emission, air, troposphere, rural]: 1.00571e-12 kg
- Fipronil [emission, ground]: 3.39805e-7 kg
- Barium compounds [emission, water]: 1.00471e-9 kg
- Cadmium compounds [emission, water]: 2.66438e-11 kg
- Acetamide [emission, ground]: 1.18936e-6 kg
- Imazethapyr [emission, ground]: 1.98218e-8 kg
- Arsenic compounds [emission, water]: 7.64825e-11 kg
- Chloride [emission, water]: 0.00125328 kg
- Chlorine [emission, air, troposphere, rural]: 1.60324e-7 kg
- Particulate matter, > 2.5μm and ≤ 10μm [emission, air, troposphere, rural]: -0.000124712 kg
- Nitrate [emission, water]: 0.00122687 kg
- Bromine [emission, air, troposphere, rural]: 5.47109e-10 kg
- Particulate matter [emission, air, troposphere, rural]: 0.000239591 kg
- Titanium [emission, air, troposphere, rural]: 1.10629e-11 kg
- Bromate [emission, water]: 2.63954e-10 kg
- Simazine [emission, ground]: 2.85997e-6 kg
- Vanadium compounds [emission, water]: 5.02857e-12 kg
- Mercury compounds [emission, air, troposphere, rural]: 1.36585e-10 kg
- Nickel compounds [emission, water]: 3.41341e-10 kg
- Copper compounds [emission, water]: 3.94397e-10 kg
- Strontium [emission, air, troposphere, rural]: 4.02286e-12 kg
- Total dissolved solids [emission, water]: 3.44394e-6, 2.3697e-7 kg (2 entries)
- Ammonium [emission, water]: 3.50664e-7 kg
- Silver compounds [emission, water]: 4.42514e-11 kg
- Tefluthrin [emission, ground]: 9.34448e-7 kg
- Magnesium [emission, water]: 9.48453e-7 kg
- Sulfur dioxide [emission, air, troposphere, rural]: 0.0013644 kg
- Molybdenum [emission, air, troposphere, rural]: 1.00571e-11 kg
- Beta Cypermethrin [emission, ground]: 4.41291e-8 kg
- Zinc compounds [emission, air, troposphere, rural]: 2.62416e-10 kg
- Rimsulfuron [emission, ground]: 1.41586e-7 kg
- Phenol [emission, water]: 6.7606e-9 kg
- Ammonia [emission, air, troposphere, rural]: 4.78711e-6 kg
- Tin [emission, air, troposphere, rural]: 6.336e-11 kg
- Diflufenzopyr-sodium [emission, ground]: 2.26529e-7 kg
- Hydrofluoric acid [emission, air, troposphere, rural]: 3.73865e-7 kg
- Particulate matter, ≤ 2.5μm [emission, air, troposphere, rural]: 1.93097e-6 kg
- Fluorine [emission, water]: 1.5488e-10 kg
- Carbon monoxide [emission, air, troposphere, rural]: 0.0013073 kg
- Fluoride [emission, air, troposphere, rural]: 2.112e-11 kg
- Selenium compounds [emission, air, troposphere, rural]: 6.03429e-11 kg
- Acetochlor [emission, ground]: 6.99424e-5 kg
- Titanium [emission, water]: 2.01143e-12 kg
- Mercury compounds [emission, water]: 1.18858e-11 kg
- Nitrogen oxides [emission, air, troposphere, rural]: 0.00536225 kg
- Iron [emission, air, troposphere, rural]: 2.92663e-10 kg
- Imazapyr [emission, ground]: 5.66333e-9 kg
- Carbon dioxide [emission, air, troposphere, rural]: 0.265033 kg
- Glyphosate [emission, ground]: 2.318e-5 kg
- Barium [emission, air, troposphere, rural]: 4.54583e-8 kg
- Nitrogen [emission, water]: 0.000133134 kg
- 2,4-D [emission, ground]: 3.58255e-6 kg
- Vanadium compounds [emission, air, troposphere, rural]: 1.55886e-9 kg
- Lead compounds [emission, air, troposphere, rural]: 1.33711e-10 kg
- Bifenthrin [emission, ground]: 2.54851e-7 kg
- Calcium(II) [emission, water]: 0.000251693 kg
- Bromoxynil [emission, ground]: 7.64552e-7 kg
- Potassium [emission, water]: 1.71885e-7 kg
- Glufosinate [emission, ground]: 1.40163e-6 kg
- Foramsulfuron [emission, ground]: 4.24747e-8 kg
- Carbon disulfide [emission, air, troposphere, rural]: 6.03564e-12 kg
- Copper compounds [emission, air, troposphere, rural]: 4.73166e-11 kg
- Nickel compounds [emission, air, troposphere, rural]: 4.23492e-10 kg
- Lead compounds [emission, water]: 5.62488e-11 kg
- Chlorate [emission, water]: 5.96615e-8 kg
- Carbonate [emission, water]: 2.47814e-7 kg
- Paraquat [emission, ground]: 7.22075e-7 kg
- Phosphorus compounds [emission, water]: 1.21758e-5 kg
- Biological Oxygen Demand [emission, water, saline water body, ocean]: 2.70364e-6 kg
- Orthophosphate [emission, water]: 3.14789e-8 kg
- Suspended solids, inorganic [emission, water]: 0.00236903 kg
- Calcium [emission, water]: 0.000128375 kg
- .lambda.-Cyhalothrin [emission, ground]: 2.83161e-8 kg
- Chemical Oxygen Demand [emission, water]: 0.00489455 kg
- Mesotrione [emission, ground]: 1.84063e-6 kg
- Organochlorine pesticides [emission, air, troposphere, rural]: 1.02268e-5 kg
- Particulate matter, ≤ 2.5μm [emission, air, troposphere, rural]: -1.32399e-5 kg
  come with credit for avoided mined gypsum
- Detergents, unspecified [emission, water]: 4.70073e-8 kg
- Total Organic Carbon [emission, water]: 1.11714e-5 kg
- Hydrogen [emission, air, troposphere, rural]: 0.0128933 MJ
- Hydrocarbons [emission, water]: 2.36527e-7 kg
- Volatile organic compounds [emission, air, troposphere, rural]: 0.000743247 kg
- Sodium [emission, water]: 0.000616064 kg
- Permethrin [emission, ground]: 1.27419e-7 kg
- Terbufos [emission, ground]: 3.17142e-6 kg
- Nitrous oxide [emission, air, troposphere, rural]: 0.000370702 kg
- Alachlor [emission, ground]: 4.87051e-6 kg
- Antimony compounds [emission, air, troposphere, rural]: 3.24156e-11 kg
- Hydrochloric acid [emission, air, troposphere, rural]: 9.81554e-6 kg
- Cyfluthrin [emission, ground]: 5.94655e-8 kg
- Chlorpyrifos [emission, ground]: 5.66333e-6 kg
- Chromium compounds [emission, air, troposphere, rural]: 3.92919e-11 kg
- Isoxaflutole [emission, ground]: 6.79598e-7 kg
- Cadmium compounds [emission, air, troposphere, rural]: 3.09673e-11 kg
- Ethylene [emission, air, troposphere, rural]: 3.82858e-12 kg
- Sulfate [emission, water]: 0.000137111 kg
- Cyanide [emission, water]: 6.25388e-11 kg
- Iron [emission, water]: 1.25568e-5 kg
- Chromium(VI) [emission, water]: 6.43657e-11 kg
- Arsenic compounds [emission, air, troposphere, rural]: 1.22697e-10 kg
- Barium compounds [emission, air, troposphere, rural]: 6.55726e-10 kg
- Chromium(III) [emission, water]: 9.98674e-10 kg
- Atrazine [emission, ground]: 0.00010884 kg
- Selenium [emission, water]: 2.01143e-12 kg
- Aluminum [emission, water]: 1.27556e-8 kg
- Dimethenamid [emission, ground]: 5.9182e-6 kg
- Cobalt compounds [emission, air, troposphere, rural]: 2.61486e-11 kg
- Manganese compounds [emission, water]: 3.62277e-9 kg
- Helium [emission, air, troposphere, rural]: 4.93806e-8 kg

## Sources
- E.T.H. Vink
- H. Shapouri
- E.T.H. Vink
- E.T.H. Vink
- I. Boustead
- E.T.H. Vink
- P. Gruber
