# Ethylbenzene styrene, EB, at plant

Dataset: openLCA process, unit process
Category: 31-33: Manufacturing/3251: Basic Chemical Manufacturing
Geography: Northern America
Time period: 1992-12-31 to 2002-12-31
Allocation method: no allocation
Generated by: Franklin Associates
Published in: THE PLASTICS DIVISION OF THE AMERICAN C
restrictionsDescription: All information can be accessed by everybody.
copyright: false

## General comment
Various coproduct streams are produced during this process. The energy requirements and environmental emissions for the production of styrene including the production of ethylbenzene. Various coproduct streams are produced during this process. A mass basis was used to partition the credit for these coproducts. CO2 atmospheric emissions may be overstated by an unknown amount of CO2 from fuel-based emissions included with reported process-based CO2. Complete inventory data and metadata are available in full in the final report and appendices, Cradle-to-Gate Life Cycle Inventory of Nine Plastic Resins and Four Polyurethane Precursors. This report has been extensively reviewed within Franklin Associates and has undergone partial critical review by ACC Plastics Division members and is available at: www.americanchemistry.com. Quantities may vary slightly between the reference to main source and and this module due to rounding. Important note: although most of the data in the US LCI database has undergone some sort of review, the database as a whole has not yet undergone a formal validation process. Please email comments to lci@nrel.gov.

## Technology
Ethylbenzene is produced by the alkylation of benzene with ethylene followed by dehydrogenation of ethylbenzene to yield styrene

## Geography
North America (US and Canada)

## Reference product
- Ethylbenzene styrene, EB, at plant [RNA]: 1 kg

## Inputs from technosphere
- Ethylene, at plant, kg: 0.293 kg; provider Ethylene, materials production, organic compound, at plant, kg
- Benzene, at plant [RNA]: 0.783 kg
- Electricity, at grid [RNA]: 0.16358 kWh; provider Electricity, at Grid, US, 2010
- Natural gas, combusted in industrial boiler [RNA]: 0.426689 m3
- Disposal, solid waste, unspecified, to sanitary landfill: 0.00161 kg
- Disposal, solid waste, unspecified, to municipal incineration: 0.00044 kg
- Electricity, cogenerated, at plant: 0.000220459 kWh
- Transport, pipeline, unspecified petroleum products [RNA]: 0.0578323 t*km
- Transport, barge, diesel powered [RNA]: 0.0334988 t*km
- Transport, barge, residual fuel oil powered [RNA]: 0.111384 t*km

## Emissions to nature
- Volatile organic compounds [emission, air]: 9.3e-6, 1e-5 kg (2 entries)
- Suspended solids, inorganic [emission, water]: 1e-5 kg
- Nitrogen oxides [emission, air]: 0.0001 kg
- Carbon monoxide [emission, air]: 0.00027 kg
- Ethylbenzene [emission, water]: 1e-6 kg
- Styrene [emission, water]: 1e-6 kg
- Carbon dioxide [emission, air]: 0.261 kg
  Atmospheric carbon dioxide emissions may be overstated by an unknown amount due to the fact that fuel-based emissions were included with reported process-based carbon dioxide.
- Sulfur oxides [emission, air]: 1e-7 kg
- Particulate matter [emission, air]: 1e-5 kg

## Sampling procedure
Data are from primary sources.

## Sources
- THE PLASTICS DIVISION OF THE AMERICAN C
