# Acetic acid, at plant

Dataset: openLCA process, unit process
Category: 31-33: Manufacturing/3251: Basic Chemical Manufacturing
Geography: Northern America
Time period: 2002-12-31 to 2002-12-31
Allocation method: no allocation
Generated by: Franklin Associates
Published in: THE PLASTICS DIVISION OF THE AMERICAN CH
restrictionsDescription: All information can be accessed by everybody.
copyright: false

## General comment
100% of elementary flows and inputs from the technosphere were allocated to acetic acid, and 0% to recovered heat
Important note: although most of the data in the US LCI database has
undergone some sort of review, the database as a whole has not yet
undergone a formal validation process.
Please email comments to lci@nrel.gov.

## Technology
Carbonylation of methanol

## Geography
North America (US and Canada)

## Reference product
- Acetic acid, at plant [RNA]: 1 kg

## By-products
- Recovered energy, at acetic acid production [RNA]: 0.18841 MJ

## Inputs from technosphere
- Methanol, at plant, kg: 0.539 kg
- Natural gas, processed, at plant, 1.357 m3/kg [RNA]: 0.4411 m3; provider Natural gas, processed, at plant
- Electricity, at grid [RNA]: 0.021826 kWh; provider Electricity, at Grid, US, 2010
- Transport, pipeline, natural gas [RNA]: 0.49246 t*km
  Represents inbound transport of processed natural gas. Original data expressed thus: 500 tonmiles/1000lb natural gas
- Transport, combination truck, diesel powered [RNA]: 0.0049246 t*km
  Represents inbound transport of processed natural gas. Original data expressed thus: 5 tonmiles/1000lb natural gas
- Transport, pipeline, unspecified petroleum products [RNA]: 0.00086744 t*km
  Represents inbound transport of methanol
- Natural gas, combusted in industrial boiler [RNA]: 0.22355 m3
- Transport, barge, residual fuel oil powered [RNA]: 0.03383 t*km
  Represents inbound transport of methanol
- Transport, train, diesel powered [RNA]: 0.0049246 t*km
  (same comment as for Transport, combination truck, diesel powered)
- Electricity, at cogen, for natural gas turbine [US]: 0.0020503 kWh
- Disposal, solid waste, unspecified, to sanitary landfill: 0.00056 kg
- Transport, barge, diesel powered [RNA]: 0.0095418 t*km
  Represents inbound transport of methanol

## Emissions to nature
- Ammonia [emission, air]: 0.00057 kg
- Ammonia [emission, water]: 5.2e-5 kg
- Total Organic Carbon [emission, air]: 0.00217 kg
- Carbon dioxide [emission, air]: 0.00176 kg
- Acid compounds [emission, water]: 0.00096 kg
- Methanol [emission, air]: 4e-5 kg
- Carbon monoxide [emission, air]: 0.00397 kg

## Allocation factors
- causal, Recovered energy, at acetic acid production, for Transport, barge, diesel powered: 0
- causal, Recovered energy, at acetic acid production, for Electricity, at grid: 0
- causal, Acetic acid, at plant, for Ammonia: 1
- causal, Recovered energy, at acetic acid production, for Transport, train, diesel powered: 0
- causal, Recovered energy, at acetic acid production, for Methanol: 0
- causal, Acetic acid, at plant, for Natural gas, combusted in industrial boiler: 1
- causal, Acetic acid, at plant, for Carbon dioxide: 1
- causal, Acetic acid, at plant, for Transport, pipeline, unspecified petroleum products: 1
- causal, Recovered energy, at acetic acid production, for Disposal, solid waste, unspecified, to sanitary landfill: 0
- causal, Acetic acid, at plant, for Methanol: 1
- causal, Acetic acid, at plant, for Carbon monoxide: 1
- causal, Recovered energy, at acetic acid production, for Methanol, at plant, kg: 0
- causal, Recovered energy, at acetic acid production, for Transport, pipeline, natural gas: 0
- causal, Acetic acid, at plant, for Transport, barge, diesel powered: 1
- causal, Recovered energy, at acetic acid production, for Natural gas, combusted in industrial boiler: 0
- causal, Recovered energy, at acetic acid production, for Transport, combination truck, diesel powered: 0
- causal, Acetic acid, at plant, for Total Organic Carbon: 1
- causal, Acetic acid, at plant, for Electricity, at grid: 1
- causal, Acetic acid, at plant, for Transport, train, diesel powered: 1
- causal, Recovered energy, at acetic acid production, for Ammonia: 0
- economic, Acetic acid, at plant: 1
- physical, Acetic acid, at plant: 1
- causal, Recovered energy, at acetic acid production, for Transport, barge, residual fuel oil powered: 0
- causal, Acetic acid, at plant, for Acid compounds: 1
- physical, Recovered energy, at acetic acid production: 0
- causal, Recovered energy, at acetic acid production, for Electricity, at cogen, for natural gas turbine: 0
- causal, Acetic acid, at plant, for Transport, combination truck, diesel powered: 1
- causal, Acetic acid, at plant, for Transport, pipeline, natural gas: 1
- causal, Acetic acid, at plant, for Natural gas, processed, at plant, 1.357 m3/kg: 1
- causal, Acetic acid, at plant, for Electricity, at cogen, for natural gas turbine: 1
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
## Sources
- THE PLASTICS DIVISION OF THE AMERICAN CH
