# Electricity, at cogen, for natural gas turbine

Dataset: openLCA process, unit process
Category: 22: Utilities/2211: Electric Power Generation, Transmission and Distribution
Geography: Northern America
Time period: 2002-12-31 to 2002-12-31
Allocation method: no allocation
Generated by: Franklin Associates
Published in: THE PLASTICS DIVISION OF THE AMERICAN C
restrictionsDescription: All information can be accessed by everybody.
copyright: false

## General comment
This unit process shows the amount of natural gas required to generate 1 kWh of electricity from the natural gas-fired cogeneration of electricity and steam. The input energy requirements for cogenerated electricity are estimated to be 6,826 Btu/kWh, which is based a thermal to electrical conversion efficiency of 50 percent. This unit process does not include the fuel requirements for the coproduced steam because the steam produced from cogeneration is exported outside system boundaries; if any coproduct steam from cogeneration is used within system boundaries (i.e., coproduct steam is used for the same process as the coproduct electricity) a more complicated allocation method is necessary in which the fraction of steam used within system boundaries must be known. Complete inventory data and metadata are available in full in the final report and appendices (A-34), Cradle-to-Gate Life Cycle Inventory of Nine Plastic Resins and Four Polyurethane Precursors. This report has been extensively reviewed within Franklin Associates and has undergone partial critical review by ACC Plastics Division members and is available at: www.americanchemistry.com. Quantities may vary slightly between the reference to main source and and this module due to rounding. Important note: although most of the data in the US LCI database has undergone some sort of review, the database as a whole has not yet undergone a formal validation process. Please email comments to lci@nrel.gov.

## Technology
The majority of data providers for petrochemical production report natural gas as the fuel used for cogeneration and, according to 2003 industry statistics, natural gas accounted for 59 percent of industrial cogeneration, while coal and waste gases accounted for 28 percent and 13 percent, respectively. This unit process provides data for production of 1 kWh of cogenerated electricity by combustion of natural gas in industrial boiler at 6826 Btu of natural gas per kWh of cogenerated electricity.

## Geography
North America (US and Canada)

## Reference product
- Electricity, at cogen, for natural gas turbine [US]: 1 kWh

## Inputs from technosphere
- Natural gas, combusted in industrial boiler [RNA]: 0.1875 m3
  6826 Btu/kWh cogenerated electricity = 7.20 MJ natural gas/kWh cogenerated electricity; 1031 Btu/scf natural gas = 38.4 MJ/m3; 7.20 MJ natural gas * (1 m3/38.4 MJ) * 1 kWh = 0.1875 m3/1 kWh

## Sampling procedure
Data are from primary sources

## Sources
- THE PLASTICS DIVISION OF THE AMERICAN C
