# Electricity, at eGrid, SRMW, 2008

Dataset: openLCA process, unit process
Category: 22: Utilities/2211: Electric Power Generation, Transmission and Distribution
Geography: Northern America
Time period: 2007-12-31 to 2007-12-31
Allocation method: no allocation
Generated by: Alberta Carpenter
Published in: Chris Goemans, Athena Institute
restrictionsDescription: All information can be accessed by everybody.
copyright: false

## General comment
The methodology used to put together the grid information is outlined in reference 1.

## Technology
Typical

## Geography
SRMW Midwest electricity grid to include eastern Missouri (less SPNO) and Southern Illinois (less RFCW).

## Reference product
- Electricity, at grid [RNA]: 1 kWh

## Inputs from technosphere
- Electricity, diesel, at power plant [RNA]: 7.073e-8 kWh
  Petroleum (DFO) JF - jet fuel
- Electricity, at wind power plant, unspecified: 0.0117051 kWh
  Wind
- Electricity, bituminous coal, at power plant [RNA]: 0.00357245 kWh
  Bituminous Coal WC - Waste/Other Coal (Anthracite Culm, Bituminous Gob, Fine Coal, Lignite Waste, Waste Coal) .
- Electricity, hydropower, at power plant, unspecified: 0.00696067 kWh
  Hydroelectric WAT – Water (Conventional, Pumped Storage)
- Electricity, nuclear, at power plant [RNA]: 0.21677 kWh
  Nuclear Fission NUC – Nuclear (Uranium, Plutonium, Thorium)
- Electricity, residual fuel oil, at power plant [RNA]: 2.57173e-5 kWh
  Petroleum (RFO) – Residual Fuel Oil (includes No. 5 and No. 6 Fuel Oils and Bunker C Fuel Oil)
- Electricity, diesel, at power plant [RNA]: 0.000768938 kWh
  Petroleum (DFO) – Distillate Fuel Oil (includes all Diesel and No. 1, No. 2, and No. 4 Fuel Oils)
- Electricity, biomass, at power plant [RNA]: 1.31125e-5 kWh
  Solid Renewable Fuels (Biomass) WDS – Wood/Wood Waste Solids (Paper Pellets, Railroad Ties, Utility Poles, Wood Chips, and other wood solids)
- Electricity, natural gas, at power plant [RNA]: 0.00986701 kWh
  Natural Gas
- Electricity, bituminous coal, at power plant [RNA]: 0.695516 kWh
  Subbituminous Coal
- Electricity, biomass, gas, unspecified, at power plant: 4.41839e-5 kWh
  Gaseous Renewable Fuels (Biomass) OBG – Other Biomass Gases (Digester Gas, Methane, and other biomass gases)
- Electricity, bituminous coal, at power plant [RNA]: 0.0536234 kWh
  Bituminous Coal BIT - Anthracite Coal, and Bituminous Coal.
- Electricity, tire derived fuel, at power plant: 8.32639e-5 kWh
  Solid Renewable Fuels (Biomass) TDF - tires, tire derived fuel
- Electricity, bituminous coal, at power plant [RNA]: 5.17307e-5 kWh
  Bituminous Coal SC - Coal Synfuel. Coal-based solid fuel that has been processed by a coal synfuel plant, and coal-based fuels such as briquettes, pellets, or extrusions, which are formed from fresh or recycled coal and binding materials.
- Electricity, biomass, gas, landfill, at power plant: 0.000998219 kWh
  Gaseous Renewable Fuels (Biomass) LFG - landfill gas

## Sampling procedure
based on EIA electricity reports for all power plants in the US.

## Sources
- EIA
- EIA
- EIA
- Chris Goemans, Athena Institute
- US DOE
- International Energy Agency
- Statistics Canada
- EIA
- Statistics Canada
- EIA
- EIA
- US DOE
- EIA
- USEPA
- Statistics Canada
- unspecified
- Statistics Canada
- EIA
- EIA
- EIA
- Statistics Canada
- USEPA
- Statistics Canada
- EIA
