# Purified terephthalic acid, PTA, at plant, kg

Dataset: openLCA process, unit process
Category: 31-33: Manufacturing/3251: Basic Chemical Manufacturing
Geography: Northern America
Time period: 2014-12-31 to 2015-11-30
Allocation method: no allocation
Data quality: US EPA - Process Pedigree Matrix (4;1)
Generated by: Franklin Associates, A Division of ERG
Owner: NAPCOR
Reviewer: Franklin Associates, A Division of ERG
Published in: Franklin Associates (2019) Cradle-to-Resin LCA PET for NAPCOR
restrictionsDescription: These U.S. LCI Database Project data ("Data") are provided by the National Renewable Energy Laboratory ("NREL"), operated by the Alliance for Sustainable Energy, LLC ("Alliance") for the US Department of Energy ("DOE") under Contract No. DE-AC36-08GO28308. The United States Government (the "Government") retains and the user acknowledges that the Government retains a non-exclusive, paid-up, irrevocable, worldwide license to publish or reproduce the published form of these data, or allow others to do so, for Government purposes.
Access to and use of these Data shall impose the following obligations on the user, as set forth in this Agreement. The user is granted the right, without any fee or cost, to use, copy, modify, alter, enhance and distribute these Data for any purpose whatsoever, provided that this entire notice appears in all copies of the Data. Any modification, alteration or enhancement of these data shall be identified and documented by the user. Further, the user agrees to credit the DOE/NREL/Alliance in any publication that results from the use of these Data. The names DOE/NREL/Alliance, however, may not be used in any advertising or publicity to endorse or promote any products or commercial entities unless specific written permission is obtained from DOE/NREL/Alliance. The user also understands that DOE/NREL/Alliance is not obligated to provide the user with any support, consulting, training or assistance of any kind with regard to the use of these Data or to provide the user with any updates, revisions or new versions of these Data.
YOU AGREE TO INDEMNIFY THE GOVERNMENT AND DOE/NREL/ALLIANCE, AND ITS SUBSIDIARIES, AFFILIATES, OFFICERS, AGENTS, AND EMPLOYEES AGAINST ANY CLAIM OR DEMAND, INCLUDING REASONABLE ATTORNEYS' FEES, RELATED TO YOUR USE OF THESE DATA. THESE DATA ARE PROVIDED BY DOE/NREL/ALLIANCE "AS IS" AND ANY EXPRESS OR IMPLIED WARRANTIES, INCLUDING BUT NOT LIMITED TO, THE IMPLIED WARRANTIES OF MERCHANTABILITY AND FITNESS FOR A PARTICULAR PURPOSE ARE DISCLAIMED. IN NO EVENT SHALL THE GOVERNMENT OR DOE/NREL/ALLIANCE BE LIABLE FOR ANY SPECIAL, INDIRECT OR CONSEQUENTIAL DAMAGES OR ANY DAMAGES WHATSOEVER, INCLUDING BUT NOT LIMITED TO CLAIMS ASSOCIATED WITH THE LOSS OF DATA OR PROFITS, WHICH MAY RESULT FROM AN ACTION IN CONTRACT, NEGLIGENCE OR OTHER TORTIOUS CLAIM THAT ARISES OUT OF OR IN CONNECTION WITH THE ACCESS, USE OR PERFORMANCE OF THESE DATA.
copyright: false

## General comment
The main production method for PTA in North America is by the Amoco technology. Crude terephthalic acid is manufactured primarily by the oxidation of paraxylene in the liquid phase. Liquid paraxylene, acetic acid, and a catalyst, such as manganese or cobalt bromides, are combined as the liquid feed to the oxidizers. The temperature of this exothermic reaction is maintained at about 200° C (Lloyd, 2011). The pressure may range from 300 to 400 psi.

Reactor effluents are continuously removed from the reactor and routed to a series of crystallizers, where they are cooled by flashing the liquids. The partially oxidized impurities are more soluble in acetic acid and tend to remain in solution, while crude TPA crystallizes from the liquor.

The slurry from the crystallizers is sent to solid/liquid separators, where crude TPA is recovered in the solids. The liquid portion is distilled and acetic acid, methyl acetate, and water are recovered overhead. Acetic acid is removed from the solution and recycled back to the oxidizer.

The purification of crude TPA involves the hydrogenation of the crude TPA over a palladium-containing catalyst at about 450°F. High-purity TPA is recrystallized from a high-pressure water solution of the hydrogenated material.

## Technology
Purified terephthalic acid (PTA) production at plant (including acetic acid production)

## Geography
LCI data for the production of TPA/PTA was collected from three producers (three plants) in North America – all in the United States. Not all plants were able to provide data for 2015. One plant provided 2013 data and one provided 2016 data. These variances were due to plant issues (e.g. shut downs/updates/temporary maintenance shut downs) during 2015 that may have skewed the average. Small amounts (less than 1 percent of total output) of off-spec PTA are produced as coproducts during this process. A mass basis was used to allocate the credit for the coproduct.

## Time period
Data collected was from 2013, 2015 and 2016.

## Reference product
- Purified terephthalic acid, PTA, at plant, kg: 1 kg
  This data was reported by fewer than three companies. To indicate known emissions while protecting the confidentiality of individual company responses, the emission is reported only by order of magnitude

## Avoided products
- Natural gas, combusted in industrial boiler [RNA]: 0.00029 m3
  Excess offgas that does not come back as fuel gas and is used in some other process. Off-gas sold as a credit.

## Inputs from technosphere
- Transport, train, diesel powered [RNA]: 0.1 t*km
- Transport, combination truck, diesel powered [RNA]: 2.8e-6 t*km
- Transport, pipeline, unspecified petroleum products [RNA]: 0.00015 t*km
- Electricity, at grid [RNA]: 0.4 kWh; provider Electricity, at Grid, US, 2010
- Natural gas, combusted in industrial boiler [RNA]: 0.054 m3
- Paraxylene, at plant, kg: 0.65 kg
- Methanol, at plant, kg: 0.016 kg
- Carbon monoxide, at plant [RNA]: 0.015 kg
- Transport, barge, diesel powered [RNA]: 0.0013 t*km
- Electricity, at cogen, for natural gas turbine [US]: 0.00012 kWh
- Transport, ocean freighter, diesel powered [US]: 1.66 t*km

## Inputs from nature
- Water [resource, water]: 1.3 kg
  (same comment as for Purified terephthalic acid, PTA, at plant, kg)

## Waste to treatment
- Disposal, solid waste, process, to sanitary landfill: 0.0028 kg
  Solid waste to landfill. This data was reported by fewer than three companies. To indicate known emissions while protecting the confidentiality of individual company responses, the emission is reported only by order of magnitude
- Disposal, hazardous waste, to incineration without energy recovery: 3.1e-7 kg
  Hazardous waste to incineration. This data was reported by fewer than three companies. To indicate known emissions while protecting the confidentiality of individual company responses, the emission is reported only by order of magnitude
- Recycling, solid waste, to recycling or reuse: 0.00039 kg
  Solid waste for recycling/reuse. This data was reported by fewer than three companies. To indicate known emissions while protecting the confidentiality of individual company responses, the emission is reported only by order of magnitude
- Disposal, solid waste, to incineration without energy recovery: 0.0001 kg
  Solid waste to incineration. This data was reported by fewer than three companies. To indicate known emissions while protecting the confidentiality of individual company responses, the emission is reported only by order of magnitude

## Emissions to nature
- Volatile organic compounds [emission, air]: 0.0001 kg
  (same comment as for Purified terephthalic acid, PTA, at plant, kg)
- Sulfur dioxide [emission, air]: 1e-7 kg
  (same comment as for Purified terephthalic acid, PTA, at plant, kg)
- Potassium [emission, water]: 1e-6 kg
  (same comment as for Purified terephthalic acid, PTA, at plant, kg)
- Manganese [emission, water]: 1e-5 kg
  (same comment as for Purified terephthalic acid, PTA, at plant, kg)
- Cobalt [emission, water]: 1e-6 kg
  (same comment as for Purified terephthalic acid, PTA, at plant, kg)
- Sulfate [emission, water]: 0.0001 kg
  (same comment as for Purified terephthalic acid, PTA, at plant, kg)
- Carbon dioxide [emission, air]: 0.043 kg
  (same comment as for Purified terephthalic acid, PTA, at plant, kg)
- Magnesium [emission, water]: 0.0001 kg
  (same comment as for Purified terephthalic acid, PTA, at plant, kg)
- Suspended solids, inorganic [emission, water]: 1e-5 kg
  (same comment as for Purified terephthalic acid, PTA, at plant, kg)
- Acetic acid [emission, water]: 1e-5 kg
  (same comment as for Purified terephthalic acid, PTA, at plant, kg)
- Methyl formate [emission, air]: 1e-7 kg
  (same comment as for Purified terephthalic acid, PTA, at plant, kg)
- Aluminum(III) [emission, water]: 1e-6 kg
  (same comment as for Purified terephthalic acid, PTA, at plant, kg)
- Bromide [emission, water]: 0.0001 kg
  (same comment as for Purified terephthalic acid, PTA, at plant, kg)
- Methyl acetate [emission, air]: 0.0001 kg
  (same comment as for Purified terephthalic acid, PTA, at plant, kg)
- Chemical Oxygen Demand [emission, water]: 0.0001 kg
  (same comment as for Purified terephthalic acid, PTA, at plant, kg)
- Orthophosphate [emission, water]: 1e-6 kg
  (same comment as for Purified terephthalic acid, PTA, at plant, kg)
- Toluene [emission, air]: 1e-6 kg
  (same comment as for Purified terephthalic acid, PTA, at plant, kg)
- Methanol [emission, water]: 1e-5 kg
  (same comment as for Purified terephthalic acid, PTA, at plant, kg)
- Methanol [emission, air]: 3.4e-5 kg
  (same comment as for Purified terephthalic acid, PTA, at plant, kg)
- Benzoic acid [emission, air]: 1e-6 kg
  (same comment as for Purified terephthalic acid, PTA, at plant, kg)
- Sulfide [emission, water]: 1e-11 kg
  (same comment as for Purified terephthalic acid, PTA, at plant, kg)
- Chromium [emission, water]: 1e-15 kg
  (same comment as for Purified terephthalic acid, PTA, at plant, kg)
- Benzene [emission, water]: 1e-6 kg
  (same comment as for Purified terephthalic acid, PTA, at plant, kg)
- Methane [emission, air]: 0.0033 kg
  (same comment as for Purified terephthalic acid, PTA, at plant, kg)
- Lead [emission, water]: 1e-9 kg
  (same comment as for Purified terephthalic acid, PTA, at plant, kg)
- Particulate matter, ≤ 2.5μm [emission, air]: 1e-5 kg
  (same comment as for Purified terephthalic acid, PTA, at plant, kg)
- Particulate matter, ≤ 10μm [emission, air]: 0.0001 kg
  Represents PM > 2.5 and <10. This data was reported by fewer than three companies. To indicate known emissions while protecting the confidentiality of individual company responses, the emission is reported only by order of magnitude
- Hydrogen [emission, air]: 0.00142857 MJ
  (same comment as for Purified terephthalic acid, PTA, at plant, kg)
- Iron [emission, water]: 1e-5 kg
  (same comment as for Purified terephthalic acid, PTA, at plant, kg)
- Particulate matter [emission, air]: 1e-5 kg
  (same comment as for Purified terephthalic acid, PTA, at plant, kg)
- Ammonia [emission, water]: 4.3e-6 kg
  (same comment as for Purified terephthalic acid, PTA, at plant, kg)
- Aldehydes, unspecified [emission, air]: 1e-6 kg
  (same comment as for Purified terephthalic acid, PTA, at plant, kg)
- Methyl bromide [emission, air]: 1e-6 kg
  (same comment as for Purified terephthalic acid, PTA, at plant, kg)
- Acetaldehyde [emission, air]: 1e-7 kg
  (same comment as for Purified terephthalic acid, PTA, at plant, kg)
- Acetic acid [emission, air]: 1e-5 kg
  (same comment as for Purified terephthalic acid, PTA, at plant, kg)
- Zinc [emission, water]: 1e-14 kg
  (same comment as for Purified terephthalic acid, PTA, at plant, kg)
- Benzene [emission, air]: 1e-6 kg
  (same comment as for Purified terephthalic acid, PTA, at plant, kg)
- Nitrate [emission, water]: 1e-5 kg
  (same comment as for Purified terephthalic acid, PTA, at plant, kg)
- Nickel [emission, water]: 1e-8 kg
  (same comment as for Purified terephthalic acid, PTA, at plant, kg)
- Mercury [emission, water]: 1e-15 kg
  (same comment as for Purified terephthalic acid, PTA, at plant, kg)
- Nitrogen oxides [emission, air]: 1e-5 kg
  (same comment as for Purified terephthalic acid, PTA, at plant, kg)
- Formaldehyde [emission, air]: 1e-7 kg
  (same comment as for Purified terephthalic acid, PTA, at plant, kg)
- Total Organic Carbon [emission, water]: 1e-5 kg
  (same comment as for Purified terephthalic acid, PTA, at plant, kg)
- Oils, unspecified [emission, water]: 1e-5 kg
  (same comment as for Purified terephthalic acid, PTA, at plant, kg)
- Xylene [emission, air]: 1e-6 kg
  (same comment as for Purified terephthalic acid, PTA, at plant, kg)
- Biological Oxygen Demand [emission, water]: 1e-6 kg
  (same comment as for Purified terephthalic acid, PTA, at plant, kg)
- Carbon monoxide [emission, air]: 0.00015 kg
  (same comment as for Purified terephthalic acid, PTA, at plant, kg)

## Inventory method
Attributional. Compatible with TRACI

## Modelling constants
LCI data for the production of TPA/PTA was collected from three producers (three plants) all in the United States. Not all plants were able to provide data for 2015. One plant provided 2013 data and one provided 2016 data. Mass allocation was used to allocate all inputs and outputs to each product and co-products.

## Completeness
Data evaluation procedures and criteria were applied consistently to all primary data provided by the participating producers for all data collected. All primary data obtained specifically for this study were considered the most representative available for the systems studied. Data sets were reviewed for completeness and material balances, and follow-up was conducted as needed to resolve any questions about the input and output flows, process technology, etc. The aggregated averaged datasets were also reviewed by the providing companies as compared to the provided dataset. Companies were requested to review whether their data were complete and to comment about their or the average dataset.

## Data treatment
A weighted average was calculated from the data collected and used to develop the LCA model.

## Sampling procedure
BOUNDARY CONDITIONS: The system boundary includes (1) raw material extraction (e.g., extraction of petroleum and natural gas as feedstocks for PET production), (2) ) intermediate material processing, including incoming transportation for each process through PTA and Ethylene Glycol production, and (3) manufacturing of PET, including incoming transportation for each material.
DATA COLLECTION: The primary data for the life cycle inventory of the production of PET, were collected from three producers (seven plants) located in the United States in 2015. A weighted average was calculated from the data collected and used to develop the LCA model. For this process the data sets are based on actual plant data reported by plant personnel. Supporting background data were drawn from credible, widely used databases including the US LCI database, GREET, and Ecoinvent.
UNCERTAINTY ESTIMATION: Primary data collected from actual facilities are considered the best available data for representing industry operations. In this study, primary data were used to model the reclaimer processes used to produce the recycled resins. All data received were carefully evaluated before compiling the production-weighted average data sets used to generate results. Supporting background data were drawn from credible, widely used databases including the US LCI database and Ecoinvent.

## Review details
Internal review of data entry proofreading, mass balance verification and data documentation.

## Intended application
"Accounting, with system-external interactions" - The intended application is a purely descriptive accounting / documentation of the analysed system including existing interactions with other systems in the LCI model. These data are an update to a previously published dataset which is a generic unit process data.

## Sources
- Franklin Associates (2019) Cradle-to-Resin LCA PET for NAPCOR
