# Electricity, at eGrid, RFCM, 2010

Dataset: openLCA process, unit process
Category: 22: Utilities/2211: Electric Power Generation, Transmission and Distribution
Geography: Northern America
Time period: 2009-12-31 to 2009-12-31
Allocation method: no allocation
Generated by: Samantha Wascavage
Published in: Chris Goemans, Athena Institute
restrictionsDescription: All information can be accessed by everybody.
copyright: false

## General comment
The methodology used to put together the grid information is outlined in reference 1.

## Technology
Typical

## Geography
RFC Michigan electricity grid to include most of Michigan less the upper pennisula and a small south west portion of lower peninsula.

## Reference product
- Electricity, at grid [RNA]: 1 kWh

## Inputs from technosphere
- Electricity, biomass,liquid, unspecified, at power plant: 2e-5 kWh
  Liquid Renewable Fuels (Biomass) OBL, BLQ, SLW, WDL – Other Biomass Liquid (Ethanol, Fish Oil, Liquid Acetonitrile Waste, Medical Waste, Tall Oil, Waste Alcohol, and other Biomass not specified)
- Electricity, residual fuel oil, at power plant [RNA]: 0.000816 kWh
  Petroleum (RFO) – Residual Fuel Oil (includes No. 5 and No. 6 Fuel Oils and Bunker C Fuel Oil)
- Electricity, hydropower, at power plant, unspecified: -0.003264 kWh
  Hydroelectric WAT – Water (Conventional, Pumped Storage)
- Electricity, nuclear, at power plant [RNA]: 0.093655 kWh
  Nuclear Fission NUC – Nuclear (Uranium, Plutonium, Thorium)
- Electricity, natural gas, at power plant [RNA]: 0.120838 kWh
  Natural Gas
- Electricity, MSW, non-biogenic, at power plant: 0.001502 kWh
  Other Fuels MSN, OTH, PUR, WH – Municipal Solid Waste – Non-biogenic components
- Electricity, biomass, solid, biogenic MSW, at power plant: 0.015379 kWh
  Solid Renewable Fuels (Biomass) MSB, AB, MSW, OBS, TDF, WDS – Municipal Solid Waste – Biogenic Component
- Electricity, bituminous coal, at power plant [RNA]: 0.588245 kWh
  Subbituminous Coal
- Electricity, diesel, at power plant [RNA]: 0.001285 kWh
  Petroleum (DFO, JF, KER) – Distillate Fuel Oil (includes all Diesel and No. 1, No. 2, and No. 4 Fuel Oils)
- Electricity, at wind power plant, unspecified: 0.003686 kWh
  Wind
- Electricity, petroleum coke, at power plant: 0.00233 kWh
  Petroleum (Other Fossil) PC, SG, WO - petroleum coke
- Electricity, biomass, gas, landfill, at power plant: 0.005144 kWh
  Gaseous Renewable Fuels (Biomass) LFG, OBG - landfill gas
- Electricity, bituminous coal, at power plant [RNA]: 0.170364 kWh
  Bituminous Coal - (BIT, SC, SGC, WC)

## Sampling procedure
based on EIA electricity reports for all power plants in the US.

## Sources
- EIA
- EIA
- Statistics Canada
- Statistics Canada
- Chris Goemans, Athena Institute
- EIA
- USEPA
- EIA
- Statistics Canada
- EIA
- Statistics Canada
- EIA
- unspecified
- EIA
- USEPA
- EIA
- EIA
- Statistics Canada
- US DOE
- International Energy Agency
- EIA
