# Mixed recyclables, to MRF

Dataset: openLCA process, unit process
Category: 56: Administrative and Support and Waste Management and Remediation Services/5629: Remediation and Other Waste Management Services
Geography: Northern America
Time period: 2006-12-31 to 2008-12-31
Allocation method: no allocation
Generated by: Franklin Associates
restrictionsDescription: All information can be accessed by everybody.
copyright: false

## General comment
Important note: although most of the data in the US LCI database has
undergone some sort of review, the database as a whole has not yet
undergone a formal validation process.
Please email comments to lci@nrel.gov.

## Technology
Typical

## Geography
United States

## Reference product
- Mixed recyclables, to MRF [RNA]: 1 kg

## Inputs from technosphere
- Mixed recyclables, at collection, commercial [RNA]: 0.0764206 kg
  Percent of material to MRF from commercial collection.
- Mixed recyclables, at collection, curbside, weight basis [RNA]: 0.750797 kg
  Percent of material to MRF from curbside collection.
- Mixed recyclables, at collection, dropoff center [RNA]: 0.172782 kg
  Percent of material to MRF from dropoff centers.

## Sources
- THE PLASTICS DIVISION OF THE AMERICAN CH
