# Electricity, at grid, Texas US, 2000

Dataset: openLCA process, unit process
Category: 22: Utilities/2211: Electric Power Generation, Transmission and Distribution
Geography: Northern America
Time period: 1999-12-31 to 1999-12-31
Allocation method: no allocation
Generated by: James Littlefield, Franklin Associates
Published in: Franklin Associates
restrictionsDescription: All information can be accessed by everybody.
copyright: false

## General comment
Important note: although most of the data in the US LCI database has
undergone some sort of review, the database as a whole has not yet
undergone a formal validation process.
Please email comments to lci@nrel.gov.

## Technology
Representative of year 2000 mix of fuels used for utility electricity generation in the Texas. Fuels include coals, fuel oil, nuclear, hydroelectric, and unconventional energy sources. Data are weighted according to percent share of consumption. Includes line loss factor of 16.1%, which represents the difference between electricity generated and electricity sold.

## Geography
United States, Texas

## Reference product
- Electricity, at grid [RNA]: 1 kWh

## Inputs from technosphere
- Electricity, photovoltaic, unspecified: 1.5e-7 kWh
  Accounts for average line losses of 16.1%
- Electricity, biomass, at power plant [RNA]: 0.00121 kWh
  Accounts for average line losses of 16.1%
- Electricity, hydropower, at power plant, unspecified: 0.00195 kWh
  Accounts for average line losses of 16.1%
- Electricity, at wind power plant, unspecified: 0.0018 kWh
  Accounts for average line losses of 16.1%
- Electricity, bituminous coal, at power plant [RNA]: 0.223 kWh
  Accounts for average line losses of 16.1%
- Electricity, residual fuel oil, at power plant [RNA]: 0.00993 kWh
  Accounts for average line losses of 16.1%
- Electricity, fossil, unspecified, at power plant: 0.0151 kWh
  Accounts for average line losses of 16.1%
- Electricity, lignite coal, at power plant [RNA]: 0.189 kWh
  Accounts for average line losses of 16.1%
- Electricity, nuclear, at power plant [RNA]: 0.138 kWh
  Accounts for average line losses of 16.1%
- Electricity, natural gas, at power plant [RNA]: 0.581 kWh
  Accounts for average line losses of 16.1%

## Sources
- U.S. Environmental Protection Agency
- Franklin Associates
- U.S. Energy Information Administration
