# Electricity, at eGrid, AKGD, 2010

Dataset: openLCA process, unit process
Category: 22: Utilities/2211: Electric Power Generation, Transmission and Distribution
Geography: Northern America
Time period: 2009-12-31 to 2009-12-31
Allocation method: no allocation
Generated by: Samantha Wascavage
Published in: Chris Goemans, Athena Institute
restrictionsDescription: All information can be accessed by everybody.
copyright: false

## General comment
The methodology used to put together the grid information is outlined in reference 1.

## Technology
Typical

## Geography
Alaska

## Reference product
- Electricity, at grid [RNA]: 1 kWh

## Inputs from technosphere
- Electricity, residual fuel oil, at power plant [RNA]: 0.00224 kWh
  Petroleum (RFO) - Residual Fuel Oil (includes No. 5 and No. 6 Fuel Oils and Bunker C Fuel Oil)
- Electricity, hydropower, at power plant, unspecified: 0.102659 kWh
  Hydroelectric (WAT)
- Electricity, natural gas, at power plant [RNA]: 0.811905 kWh
- Electricity, diesel, at power plant [RNA]: 0.010782 kWh
  Petroleum (DFO) - Distillate Fuel Oil (includes all Diesel and No. 1, No. 2, and No. 4 Fuel Oils also includes DFO, JF, KER)
- Electricity, biomass,liquid, unspecified, at power plant: 0.001383 kWh
  OBL – Other Biomass Liquid (Ethanol, Fish Oil, Liquid Acetonitrile Waste, Medical Waste, Tall Oil, Waste Alcohol, and other Biomass not specified, also consist of OBL, BLQ, SLW, WDL)
- Electricity, bituminous coal, at power plant [RNA]: 0.071031 kWh
  subbituminous coal

## Sampling procedure
based on EIA electricity reports for all power plants in the US.

## Sources
- EIA
- Statistics Canada
- Statistics Canada
- Chris Goemans, Athena Institute
- EIA
- USEPA
- EIA
- Statistics Canada
- EIA
- EIA
- Statistics Canada
- EIA
- unspecified
- EIA
- USEPA
- EIA
- EIA
- Statistics Canada
- US DOE
- International Energy Agency
- EIA
