# Conditioned log, hardwood, green, at veneer mill, E

Dataset: openLCA process, unit process
Category: 31-33: Manufacturing/3212: Veneer, Plywood, and Engineered Wood Product Manufacturing
Geography: United States
Time period: 2006-12-31 to 2006-12-31
Allocation method: no allocation
Generated by: Maureen Puettmann
Published in: Richard D. Bergman
restrictionsDescription: All information can be accessed by everybody.
copyright: false

## General comment
All weights given on an ovendry basis. All moisture contents are on an ovendry basis. MC% =(weight of water in wood / weight of oven dry wood) *100. Reference to specific gravities use oven dry mass and volumes at specified moisture contents. Reference to densities use mass and volume at specified moistrue contents.

Important note: although most of the data in the US LCI database has
undergone some sort of review, the database as a whole has not yet
undergone a formal validation process.
Please email comments to lci@nrel.gov.

## Technology
Typical

## Geography
E= Eastern US United States. The states included MN, IA, MO, WI, IL, NJ, OH, IN, MI, WV, PA, MD, DW, NJ, NY, ME, VT, NH, RI, MA, CT, VA, KY, AR, LA, MS, AL, FL,GA, NC, SC, and TN

## Reference product
- Conditioned log; hardwood; green; at veneer mill [US]: 1 m3
  Based on a weighted average green density and specific gravity of 944 kg/m3 and 0.510. 2.46 M3 = 1255 KG Moisture content (ovendry basis) = 85%.

## Inputs from technosphere
- Natural gas, combusted in industrial equipment, 1.357 m3/kg, 52.13 MJ/kg [RNA]: 0.000180024 m3; provider Natural gas, combusted in industrial equipment
  Amount of natural gas consumed during conditioning. Represents 14.3% of mill use of natural gas; proxy for propane
- Gasoline, combusted in equipment [RNA]: 0.0348263 l
  Amount of gasoline consumed during conditioning. Represents 14.3% of mill use of gasoline.
- Heat; block conditioning; at veneer mill [US]: 617.892 MJ; provider Heat, drying veneer, hardwood, at veneer mill, E
  Amount of heat consumed on-site from burning wood and fossil fuels during block conditioning. Represents 28.7% mill use of heat
- Diesel, combusted in industrial equipment [RNA]: 0.144263 l
  Amount of diesel consumed during conditioning. Represents 5% of mill use of diesel
- Electricity, at grid [RNA]: 10.8479 kWh; provider Electricity, Eastern US, 2014
  Amount of electricity consumed during conditions. Represents 2.4% of mill use of electricity.
- Bucked and debarked log; hardwood; green; at veneer mill [US]: 1 m3; provider Bucked and debarked log, hardwood, green, at veneer mill, E
  (same comment as for Conditioned log; hardwood; green; at veneer mill)

## Inputs from nature
- Water [resource, water, subterranean]: 577052 kg
  Live steam used to heat vats for conditioning logs; Represents 50% of mill use of well water.
- Water [resource, water]: 197498 kg
  Live steam used to heat vats for conditioning logs; Represents 50% of mill use of surface water.

## Sampling procedure
Questionnaires from 4 veneer and 5 flooring mills in the E. United States representing 32 states.

## Sources
- Richard D. Bergman
