# Electricity, at eGrid, CAMX, 2010

Dataset: openLCA process, unit process
Category: 22: Utilities/2211: Electric Power Generation, Transmission and Distribution
Geography: Northern America
Time period: 2009-12-31 to 2009-12-31
Allocation method: no allocation
Generated by: Samantha Wascavage
Published in: Chris Goemans, Athena Institute
restrictionsDescription: All information can be accessed by everybody.
copyright: false

## General comment
The methodology used to put together the grid information is outlined in reference 1.

## Technology
Typical

## Geography
California (except for small portions in the north and south that are part of the NWPP and AZNM grids repsectively. )

## Reference product
- Electricity, at grid [RNA]: 1 kWh

## Inputs from technosphere
- Electricity, petroleum coke, at power plant: 0.002222 kWh
  Petroleum (Other Fossil) PC - petroleum coke also includes SG, WO
- Electricity, biomass, gas, landfill, at power plant: 0.003953 kWh
  Gaseous Renewable Fuels (Biomass) LFG - Landfill Gas also includes OBG
- Electricity, other fuels, unspecified, at power plant: 0.001542 kWh
  Other Fuels OTH - Other (Batteries, Chemicals, Coke Breeze, Hydrogen, Pitch, Sulfur, Tar Coal, and miscellaneous technologies also includes MSN, PUR, WH)
- Electricity, nuclear, at power plant [RNA]: 0.094635 kWh
- Electricity, solar, unspecified, at power plant: 0.001426 kWh
  Solar (Photovoltaic, Thermal)
- Electricity, residual fuel oil, at power plant [RNA]: 9e-6 kWh
  Petroleum (RFO) - Residual Fuel Oil (includes No. 5 and No. 6 Fuel Oils and Bunker C Fuel Oil)
- Electricity, at wind power plant, unspecified: 0.013425 kWh
- Electricity, other gases, unspecified, at power plant: 0.003756 kWh
  Other Gases OG - Other Gas (Butane, Coal Processes, Coke-Oven, Refinery, and other processes also includes BFG PG)
- Electricity, geothermal, unspecified: 0.034125 kWh
- Electricity, hydropower, at power plant, unspecified: 0.131613 kWh
- Electricity, diesel, at power plant [RNA]: 0.101484 kWh
  Petroleum (DFO) - Distillate Fuel Oil (includes all Diesel and No. 1, No. 2, and No. 4 Fuel Oils also includes JF, KER)
- Electricity, bituminous coal, at power plant [RNA]: 0.070081 kWh
  Bituminous Coal (BIT, SC, SGC, WC)
- Electricity, natural gas, at power plant [RNA]: 0.528251 kWh
- Electricity, biomass, solid, agriculture by-products, at power plant: 0.013478 kWh
  Solid Renewable Fuels (Biomass) AB - Agriculture Crop By-products /Straw /Energy Crops also includes MSB, OBS, TDF, WDS

## Sampling procedure
based on EIA electricity reports for all power plants in the US.

## Sources
- EIA
- EIA
- Statistics Canada
- Statistics Canada
- Chris Goemans, Athena Institute
- EIA
- USEPA
- EIA
- Statistics Canada
- EIA
- Statistics Canada
- EIA
- unspecified
- EIA
- USEPA
- EIA
- EIA
- Statistics Canada
- US DOE
- International Energy Agency
- EIA
