# Electricity, at eGrid, NWPP, 2008

Dataset: openLCA process, unit process
Category: 22: Utilities/2211: Electric Power Generation, Transmission and Distribution
Geography: Northern America
Time period: 2007-12-31 to 2007-12-31
Allocation method: no allocation
Generated by: Alberta Carpenter
Published in: Chris Goemans, Athena Institute
restrictionsDescription: All information can be accessed by everybody.
copyright: false

## General comment
The methodology used to put together the grid information is outlined in reference 1.

## Technology
Typical

## Geography
Northwest electricity grid to include Washington, Oregon, Idaho, Utah, most of Montana (less NROW), Wyoming (less RMPA), Nevada (less AZNM) and northern parts of California, Arizona and New Mexico.

## Reference product
- Electricity, at grid [RNA]: 1 kWh

## Inputs from technosphere
- Electricity, residual fuel oil, at power plant [RNA]: 1.65322e-5 kWh
  Petroleum (RFO) – Residual Fuel Oil (includes No. 5 and No. 6 Fuel Oils and Bunker C Fuel Oil)
- Electricity, petroleum, waste oil, at power plant: 7.84082e-5 kWh
  Petroleum (Other Fossil) WO – Waste/Other Oil (including Crude Oil, Liquid Butane, Liquid Propane, Oil Waste, Re-Refined Motor Oil, Sludge Oil, Tar Oil, or other petroleum-based liquid wastes)
- Electricity, other gases, unspecified, at power plant: 0.00189575 kWh
  Other Gases OG – Other Gas (Butane, Coal Processes, Coke-Oven, Refinery, and other processes)
- Electricity, bituminous coal, at power plant [RNA]: 0.000394782 kWh
  Bituminous Coal SC - Coal Synfuel. Coal-based solid fuel that has been processed by a coal synfuel plant, and coal-based fuels such as briquettes, pellets, or extrusions, which are formed from fresh or recycled coal and binding materials.
- Electricity, natural gas, at power plant [RNA]: 0.127799 kWh
  Natural Gas
- Electricity, MSW, non-biogenic, at power plant: 0.000300212 kWh
  Other Fuels MSN – Municipal Solid Waste – Non-biogenic components
- Electricity, bituminous coal, at power plant [RNA]: 0.126016 kWh
  Bituminous Coal BIT - Anthracite Coal, and Bituminous Coal.
- Electricity, biomass, at power plant [RNA]: 0.00537146 kWh
  Solid Renewable Fuels (Biomass) WDS – Wood/Wood Waste Solids (Paper Pellets, Railroad Ties, Utility Poles, Wood Chips, and other wood solids)
- Electricity, hydropower, at power plant, unspecified: 0.423179 kWh
  Hydroelectric
- Electricity, biomass,liquid, unspecified, at power plant: 0.0025872 kWh
  Liquid Renewable Fuels (Biomass) BLQ - black liquor
- Electricity, bituminous coal, at power plant [RNA]: 0.00230858 kWh
  Bituminous Coal WC - Waste/Other Coal (Anthracite Culm, Bituminous Gob, Fine Coal, Lignite Waste, Waste Coal) .
- Electricity, biomass, liquid, sludge, at power plant: 3.8334e-5 kWh
  Liquid Renewable Fuels (Biomass) SLW - sludge waste
- Electricity, bituminous coal, at power plant [RNA]: 0.247396 kWh
  Subbituminous Coal
- Electricity, at wind power plant, unspecified: 0.0236762 kWh
  Wind
- Electricity, diesel, at power plant [RNA]: 0.000438784 kWh
  Petroleum (DFO) – Distillate Fuel Oil (includes all Diesel and No. 1, No. 2, and No. 4 Fuel Oils)
- Electricity, nuclear, at power plant [RNA]: 0.0298084 kWh
  Nuclear Fission
- Electricity, petroleum coke, at power plant: 0.00129791 kWh
  Petroleum (Other Fossil) PC - petroleum coke
- Electricity, biomass, solid, biogenic MSW, at power plant: 0.0003821 kWh
  Solid Renewable Fuels (Biomass) MSB
- Electricity, diesel, at power plant [RNA]: 5.67678e-7 kWh
  Petroleum (DFO) JF - jet fuel
- Electricity, other fuels, unspecified, at power plant: 0.000461956 kWh
  Other Fuels WH – Waste heat not directly attributed to a fuel source. Note that WH should only be reported where the fuel source for the waste heat is undetermined, and for combined cycle steam turbines that are not supplementary fired
- Electricity, biomass, gas, landfill, at power plant: 0.000616033 kWh
  Gaseous Renewable Fuels (Biomass) LFG - landfill gas
- Electricity, other fuels, unspecified, at power plant: 0.000459979 kWh
  Other Fuels OTH – Other (Batteries, Chemicals, Coke Breeze, Hydrogen, Pitch, Sulfur, Tar Coal, and miscellaneous technologies)
- Electricity, geothermal, unspecified: 0.00547597 kWh
  Geothermal

## Sampling procedure
based on EIA electricity reports for all power plants in the US.

## Sources
- EIA
- EIA
- EIA
- Chris Goemans, Athena Institute
- US DOE
- International Energy Agency
- Statistics Canada
- EIA
- Statistics Canada
- EIA
- EIA
- US DOE
- EIA
- USEPA
- Statistics Canada
- unspecified
- Statistics Canada
- EIA
- EIA
- EIA
- Statistics Canada
- USEPA
- Statistics Canada
- EIA
