# Electricity, at Grid, SPP, 2008

Dataset: openLCA process, unit process
Category: 22: Utilities/2211: Electric Power Generation, Transmission and Distribution
Geography: Northern America
Time period: 2007-12-31 to 2007-12-31
Allocation method: no allocation
Generated by: Alberta Carpenter
Published in: Chris Goemans, Athena Institute
restrictionsDescription: All information can be accessed by everybody.
copyright: false

## General comment
The methodology used to put together the grid information is outlined in reference 1.

## Technology
Typical

## Geography
Kansas and Oklahoma, and parts of Arkansas, Louisiana, Missouri, New Mexico, and Texas.

## Reference product
- Electricity, at grid [RNA]: 1 kWh

## Inputs from technosphere
- Electricity, other fuels, unspecified, at power plant: 0.00099986 kWh
  PUR – Purchased Steam
- Electricity, biomass,liquid, unspecified, at power plant: 0.0061066 kWh
  BLQ – Black Liquor
- Electricity, other fuels, unspecified, at power plant: 0.000216945 kWh
  OTH – Other (Batteries, Chemicals, Coke Breeze, Hydrogen, Pitch, Sulfur, Tar Coal, and miscellaneous technologies)
- Electricity, biomass, gas, landfill, at power plant: 0.000128093 kWh
  LFG – Landfill Gas
- Electricity, bituminous coal, at power plant [RNA]: 0.532837 kWh
  SUB – Subbituminous Coal
- Electricity, other gases, unspecified, at power plant: 1.17424e-5 kWh
  PG – Propane
- Electricity, petroleum, waste oil, at power plant: 5.90599e-5 kWh
  WO – Waste/Other Oil (including Crude Oil, Liquid Butane, Liquid Propane, Oil Waste, Re-Refined Motor Oil, Sludge Oil, Tar Oil, or other petroleum-based liquid wastes)
- Electricity, other gases, unspecified, at power plant: 0.000355312 kWh
  BFG – Blast Furnace Gas
- Electricity, biomass, at power plant [RNA]: 0.00248017 kWh
  WDS – Wood/Wood Waste Solids (Paper Pellets, Railroad Ties, Utility Poles, Wood Chips, and other wood solids)
- Electricity, biomass,solid, unspecified, at power plant: 0.000745272 kWh
  OBS – Other Biomass Solid (Animal Manure and Waste, Solid By-products, and other solid biomass not specified)
- Electricity, petroleum coke, at power plant: 0.000401769 kWh
  PC – Petroleum Coke
- Electricity, bituminous coal, at power plant [RNA]: 0.0157502 kWh
  BIT - Anthracite Coal, and Bituminous Coal.
- Electricity, hydropower, at power plant, unspecified: 0.0401758 kWh
  WAT – Water (Conventional, Pumped Storage)
- Electricity, other gases, unspecified, at power plant: 0.00135191 kWh
  OG – Other Gas (Butane, Coal Processes, Coke-Oven, Refinery, and other processes)
- Electricity, natural gas, at power plant [RNA]: 0.28864 kWh
  NG – Natural Gas
- Electricity, residual fuel oil, at power plant [RNA]: 3.7001e-5 kWh
  RFO – Residual Fuel Oil (includes No. 5 and No. 6 Fuel Oils and Bunker C Fuel Oil)
- Electricity, diesel, at power plant [RNA]: 0.00038385 kWh
  DFO – Distillate Fuel Oil (includes all Diesel and No. 1, No. 2, and No. 4 Fuel Oils)
- Electricity, at wind power plant, unspecified: 0.0268163 kWh
  WND – Wind
- Electricity, diesel, at power plant [RNA]: 2.5773e-7 kWh
  JF – Jet Fuel
- Electricity, tire derived fuel, at power plant: 0.000503049 kWh
  TDF – Tired (tire derived fuel)
- Electricity, lignite coal, at power plant [RNA]: 0.0434095 kWh
  LIG – Lignite Coal
- Electricity, nuclear, at power plant [RNA]: 0.0385728 kWh
  NUC – Nuclear (Uranium, Plutonium, Thorium)
- Electricity, biomass, solid, agriculture by-products, at power plant: 1.6815e-5 kWh
  AB – Agriculture Crop By-products / Straw / Energy Crops

## Sampling procedure
based on EIA electricity reports for all power plants in the US.

## Sources
- EIA
- EIA
- EIA
- Chris Goemans, Athena Institute
- US DOE
- International Energy Agency
- Statistics Canada
- EIA
- Statistics Canada
- EIA
- EIA
- US DOE
- EIA
- USEPA
- Statistics Canada
- unspecified
- Statistics Canada
- EIA
- EIA
- EIA
- Statistics Canada
- USEPA
- Statistics Canada
- EIA
