# Wood Combusted, at boiler, at hardboard mill

Dataset: openLCA process, unit process
Category: 31-33: Manufacturing/3212: Veneer, Plywood, and Engineered Wood Product Manufacturing
Geography: Northern America
Time period: 2009-12-31 to 2010-12-30
Allocation method: physical allocation
Generated by: Maureen Puetmann
Reviewer: Maureen Puetmann
Published in: Puettmann&Milota
restrictionsDescription: All information can be accessed by everybody.
copyright: false

## General comment
This process is for the combustion of 1 kg of oven dry wood, combusted in the wood boilers commonly used at wood production facilities. Data is from primary industry data from the softwood lumber, softwood plywood, and oriented strandboard industries located in the US.

This process documents the inputs and outputs associated with wood combustion boilers onsite at wood product producing mills in the U.S. The data were obtained through a scientifically sound and consistent process established by the Consortium for Research on Renewable Industrial Materials (CORRIM), following ISO14040/140444 standards (ISO 2006) and Product Category Rules (PCR) for North American Structural and Architectural Wood Products (FPInnovations 2011). Lumber, plywood, and oriented strandboard production facilities were surveyed asking details regarding onsite energy generation. Regional differences did not exist between the Pacific Northwest and southeast regions to warrant separate boilers based on geographical regions. There was also a potential for emission differences based on biomass type and quality. Plywood and oriented strandboard industries could have boiler inputs likely containing resins. There could be a potential difference in regions, based on wood species, moisture contents, and wood quality. Differences found are reported in this report.

Important note: although most of the data in the US LCI database has undergone some sort of review, the database as a whole has not yet undergone a formal validation process. Please email comments to lci@nrel.gov

## Technology
Average technology

## Geography
North America

## Time period
2010 and after

## Reference product
- Wood Combusted, at boiler, at hardboard mill [RNA]: 1 kg
  combustion of OD wood in onsite boiler. 20.93 MJ/kg.

## By-products
- Wood ash, generated on-site, at hardboard mill [RNA]: 0.0190969 kg
  Sold for fertilizer; transported 43 miles

## Inputs from technosphere
- Ethylene glycol, at plant, kg: 1.07e-6 kg; uniform minimum 1.07e-6, maximum 1.07e-6; provider Ethylene glycol, materials production, organic compound, at plant, kg
  Antifreeze @ 50% dilution: on site transportation and maintenance; density 1.1132 kg/L.
  1.92202363849093E-06 L x 1.1132 kg/L = 2.14E-06 kg / 2 = 1.07E-06 kg
- Urea, at regional storehouse: 0.00314799 kg
  1.32 g/cm3 density
- Gasoline, at refinery: 4.8136e-7 l; uniform minimum 0, maximum 7.62363; provider Petroleum refining, at refinery
  Transmission fluid: on site transportation and maintenance
  MEP change process 12/2014; denisty of lubricants from Johnson et al 7.2054 lb/gal. change based on:
  Athena Institute: 2012. A Cradle-to-Gate Life Cycle Assessment of Canadian Oriented Strand Board. Downloaded November 24, 2014 from: http://www.athenasmi.org/wp-content/uploads/2013/10/CtoG-LCA-of-Canadian-OSB-Update.pdf
- Gasoline, at refinery: 2.21792e-5 l; provider Petroleum refining, at refinery
  Engine oil: boiler maintenance
  MEP change process 12/2014; denisty of lubricants from Johnson et al 7.2054 lb/gal. change based on:
  Athena Institute: 2012. A Cradle-to-Gate Life Cycle Assessment of Canadian Oriented Strand Board. Downloaded November 24, 2014 from: http://www.athenasmi.org/wp-content/uploads/2013/10/CtoG-LCA-of-Canadian-OSB-Update.pdf
- Gasoline, at refinery: 5.9361e-6 l; uniform minimum 0, maximum 2.61042e-5; provider Petroleum refining, at refinery
  Engine Oil; on site transportation and maintenance
  MEP change process 12/2014; denisty of lubricants from Johnson et al 7.2054 lb/gal. change based on:
  Athena Institute: 2012. A Cradle-to-Gate Life Cycle Assessment of Canadian Oriented Strand Board. Downloaded November 24, 2014 from: http://www.athenasmi.org/wp-content/uploads/2013/10/CtoG-LCA-of-Canadian-OSB-Update.pdf
- Solvent, at plant: 6.707e-7 kg
  density of solvent=0.65 kg/L (hexane); boiler maintenance;
  1.031E-6 L x 0.65 kg/L = 6.701e-07 kg
- Disposal, solid waste, unspecified, to unspecified landfill: 7.26421e-6 kg
  other inorganics; Transported 5 miles (8.04672 km)
- Gasoline, at refinery: 1.10307e-5 l; provider Petroleum refining, at refinery
  Boiler maintenance
  MEP change process 12/2014; denisty of lubricants from Johnson et al 7.2054 lb/gal. change based on:
  Athena Institute: 2012. A Cradle-to-Gate Life Cycle Assessment of Canadian Oriented Strand Board. Downloaded November 24, 2014 from: http://www.athenasmi.org/wp-content/uploads/2013/10/CtoG-LCA-of-Canadian-OSB-Update.pdf
- Disposal, metal, to recycling: 3.96e-8 kg
  metal to recycling; transported 55 miles (88.51392 km)
- Wood fuel, unspecified [RNA]: 1 kg
  combustion of OD wood in onsite boiler. 20.93 MJ/kg.
- Disposal, ash, to unspecified landfill: 0.00758618 kg
  Ash from boiler; Transported 2 miles (3.218688 km)
- Electricity, at grid [RNA]: 0 kWh; provider Electricity, at Grid, US, 2010
  0.082 kWh: embedded into system electricity
- Gasoline, at refinery: 5.18903e-5 l; provider Petroleum refining, at refinery
  Hydraulic Oil: boiler maintenance
  MEP change process 12/2014; denisty of lubricants from Johnson et al 7.2054 lb/gal. change based on:
  Athena Institute: 2012. A Cradle-to-Gate Life Cycle Assessment of Canadian Oriented Strand Board. Downloaded November 24, 2014 from: http://www.athenasmi.org/wp-content/uploads/2013/10/CtoG-LCA-of-Canadian-OSB-Update.pdf
- Solvent, at plant: 4.617e-8 kg; uniform minimum 0, maximum 1.43097
  density of solvent=0.65 kg/L (hexane); on site transportation and maintenance;
  7.103E-08 L x 0.65 kg/L = 4.618e-08
- Diesel, combusted in industrial equipment [RNA]: 0.000805448 l; uniform minimum 0, maximum 0.00281037
  on site transportation
- Boiler streamline treatment: 3.66755e-6 kg
- Liquefied petroleum gas, combusted in industrial boiler [RNA]: 1.20748e-5 l; uniform minimum 0, maximum 8.15646e-5
  on site transportation
- Gasoline, at refinery: 2.12e-6 l; uniform minimum 0, maximum 3.4992e-6; provider Petroleum refining, at refinery
  on site transportation and maintenance; 0.96 kg/L
  MEP change process 12/2014; denisty of lubricants from Johnson et al 7.2054 lb/gal. change based on:
  Athena Institute: 2012. A Cradle-to-Gate Life Cycle Assessment of Canadian Oriented Strand Board. Downloaded November 24, 2014 from: http://www.athenasmi.org/wp-content/uploads/2013/10/CtoG-LCA-of-Canadian-OSB-Update.pdf
- Gasoline, combusted in equipment, at pulp and paper mill (EXCL.) [RNA]: 3.95855e-5 m3; uniform minimum 0, maximum 0.000138555
  on site transportation
- Gasoline, at refinery: 8.29142e-6 l; uniform minimum 0, maximum 2.6413e-5; provider Petroleum refining, at refinery
  Hydraulic Oil: on site transportation and maintenance
  MEP change process 12/2014; denisty of lubricants from Johnson et al 7.2054 lb/gal. change based on:
  Athena Institute: 2012. A Cradle-to-Gate Life Cycle Assessment of Canadian Oriented Strand Board. Downloaded November 24, 2014 from: http://www.athenasmi.org/wp-content/uploads/2013/10/CtoG-LCA-of-Canadian-OSB-Update.pdf
- Natural gas, combusted in industrial boiler, at pulp and paper mill (EXCL.) [RNA]: 0 m3
  Boiler startup; 0.00137966951960828 m3
- Water treatment, at plant: 0.0001225 kg
  Water treatment at boiler

## Inputs from nature
- Water [resource, water, subterranean]: 0.24 kg; uniform minimum 0, maximum 2.6
  Municipal; 1 liter water = 1 kg water
- Wood [resource, biotic]: 1 kg
- Water [resource, water, subterranean]: 0.24 kg; uniform minimum 0, maximum 1.3
  1 liter water = 1 kg water
- Water [resource, water]: 0.79 kg; uniform minimum 0, maximum 2.1
  Municipal; 1 liter water = 1 kg water
- Water [resource, water]: 0.31 kg; uniform minimum 0, maximum 3.1
  1 liter water = 1 kg water

## Emissions to nature
- Carbon dioxide [emission, air]: 1.76 kg
- Suspended solids, inorganic [emission, water]: 8.35054e-7 kg
- Sulfur dioxide [emission, air]: 7.7096e-5 kg
- Phenol [emission, air]: 6.2147e-7 kg
- Particulate matter, ≤ 2.5μm [emission, air]: 0.00013897 kg
- Naphthalene [emission, air]: 5.77424e-8 kg
- Hydrochloric acid [emission, air]: 1.1658e-6 kg
- Lead [emission, air]: 1.7459e-7 kg
- Acrolein [emission, air]: 8.0699e-7 kg
- Acetaldehyde [emission, air]: 1.0513e-6 kg
- Nitrous oxide [emission, air]: 2.92651e-6 kg
  N2O; MEP field change 11/22/2014
- Volatile organic compounds [emission, air]: 0.0008755 kg
- Biological Oxygen Demand [emission, water]: 2.10073e-6 kg
- Particulate matter, ≤ 10μm [emission, air]: 0.00047134 kg
- Propionaldehyde [emission, air]: 5.14237e-8 kg
- Mercury [emission, air]: 1.834e-9 kg
- Carbon monoxide [emission, air]: 0.0032276 kg
- Formaldehyde [emission, air]: 1.264e-5 kg
- Wood [emission, air]: 0.00056242 kg
  I assumed wood dust (DK)
- Other Organic [emission, air]: 2.11305e-7 kg
  "dummy substance", not in substance list and will not be part of any impact assessment
- Methane [emission, air]: 2.2277e-5 kg
- Benzene [emission, air]: 1.6889e-7 kg
- Methanol [emission, air]: 7.9521e-6 kg
- Nitrogen oxides [emission, air]: 0.0010955 kg
- HAPs [emission, air]: 6.2743e-6 kg
  "dummy substance", not in substance list and will not be part of any impact assessment

## Allocation factors
- causal, Wood ash, generated on-site, at hardboard mill, for Hydrochloric acid: 0.018739
- causal, Wood ash, generated on-site, at hardboard mill, for Boiler streamline treatment: 0.018739
- causal, Wood Combusted, at boiler, at hardboard mill, for Particulate matter, ≤ 2.5μm: 0.981261
- causal, Wood ash, generated on-site, at hardboard mill, for Acetaldehyde: 0.018739
- causal, Wood ash, generated on-site, at hardboard mill, for Disposal, metal, to recycling: 0.018739
- causal, Wood Combusted, at boiler, at hardboard mill, for Methanol: 0.981261
- causal, Wood ash, generated on-site, at hardboard mill, for Solvent, at plant: 0.018739
- causal, Wood ash, generated on-site, at hardboard mill, for Volatile organic compounds: 0.018739
- causal, Wood Combusted, at boiler, at hardboard mill, for Nitrous oxide: 0.981261
- causal, Wood ash, generated on-site, at hardboard mill, for Propionaldehyde: 0.018739
- causal, Wood Combusted, at boiler, at hardboard mill, for Suspended solids, inorganic: 0.981261
- causal, Wood Combusted, at boiler, at hardboard mill, for Sulfur dioxide: 0.981261
- causal, Wood ash, generated on-site, at hardboard mill, for Liquefied petroleum gas, combusted in industrial boiler: 0.018739
- causal, Wood Combusted, at boiler, at hardboard mill, for Electricity, at grid: 0.981261
- causal, Wood Combusted, at boiler, at hardboard mill, for Naphthalene: 0.981261
- causal, Wood ash, generated on-site, at hardboard mill, for Gasoline, at refinery: 0.018739
- causal, Wood Combusted, at boiler, at hardboard mill, for Natural gas, combusted in industrial boiler, at pulp and paper mill (EXCL.): 0.981261
- causal, Wood Combusted, at boiler, at hardboard mill, for Urea, at regional storehouse: 0.981261
- causal, Wood Combusted, at boiler, at hardboard mill, for Gasoline, at refinery: 0.981261
- causal, Wood Combusted, at boiler, at hardboard mill, for Gasoline, at refinery: 0.981261
- causal, Wood Combusted, at boiler, at hardboard mill, for Solvent, at plant: 0.981261
- causal, Wood Combusted, at boiler, at hardboard mill, for Gasoline, at refinery: 0.981261
- causal, Wood Combusted, at boiler, at hardboard mill, for Phenol: 0.981261
- causal, Wood Combusted, at boiler, at hardboard mill, for Gasoline, at refinery: 0.981261
- causal, Wood Combusted, at boiler, at hardboard mill, for Acetaldehyde: 0.981261
- causal, Wood ash, generated on-site, at hardboard mill, for Disposal, solid waste, unspecified, to unspecified landfill: 0.018739
- causal, Wood ash, generated on-site, at hardboard mill, for Urea, at regional storehouse: 0.018739
- causal, Wood ash, generated on-site, at hardboard mill, for Disposal, ash, to unspecified landfill: 0.018739
- causal, Wood ash, generated on-site, at hardboard mill, for Acrolein: 0.018739
- causal, Wood Combusted, at boiler, at hardboard mill, for Water: 0
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
## Intended application
Only mass allocation factors are available for the multi-functional processes (disregard economic allocation factor values-they are mass allocation factors).

## Sources
- Puettmann&Milota
