# Aluminum, secondary, ingot, at plant, 1998

Dataset: openLCA process, unit process
Category: 31-33: Manufacturing/3313: Alumina and Aluminum Production and Processing
Geography: Northern America
Time period: 1997-12-31 to 2002-12-31
Allocation method: no allocation
Generated by: Franklin Associates
Published in: Franklin Associates, A Division of ERG
restrictionsDescription: All information can be accessed by everybody.
copyright: false

## General comment
In order to reduce aluminum losses and furnace emissions, scrap processing is required before the scrap is melted. Processing steps include shredding and crushing, drying and sweating, delacquering (the removal of paints and other coatings), and air knife processing (the removal of small pieces of non-aluminum materials by using bursts of air). The objectives of melting are to adjust the alloy composition, improve metal quality, and produce the metal in a form suitable for subsequent processing. Secondary aluminum furnaces are fueled by natural gas and operate at temperatures between 700 and 800 degrees Celsius. Reverberatory furnaces, which reflect heat off the furnace walls and roof, are the most common type of furnace for melting aluminum scrap and have capacities of up to 100,000 kilograms. When molten aluminum exits the furnace, it is cast into ingot; there are different sizes and shapes of ingot molds, depending on the intended use of the metal. Dross and salt cake are two byproducts of secondary aluminum furnaces. Dross is formed when molten aluminum reacts with atmospheric oxygen and moisture. The metal composition of dross varies widely, ranging from 10 to 80 percent. The metal extracted from dross is commonly used to produce remelt secondary ingot (RSI), which is a major source of feedstock for both primary and secondary aluminum producers. Salt cake is composed of the spent flux oxides and other oxides and impurities from the melt process. Air emissions from secondary aluminum production are regulated by MACT
(maximum achievable control technology) standards. Such emissions result from furnaces, scrap shredders, dryers, rotary dross coolers, delaquering kilns, and in-line fluxing chambers. Baghouses are the most common emission control devices used in secondary aluminum production. Solid waste management standards are governed by RCRA (Resource Conservation and Recovery Act). Baghouse dust is the predominant solid waste from secondary aluminum production.

Important note: although most of the data in the US LCI database has
undergone some sort of review, the database as a whole has not yet
undergone a formal validation process.
Please email comments to lci@nrel.gov.

## Technology
Processing, smelting, and ingot casting by secondary smelters in the US.

## Geography
North America

## Reference product
- Aluminum, secondary, ingot, at plant [RNA]: 1 kg

## Inputs from technosphere
- Disposal, solid waste, unspecified, to sanitary landfill: 0.0842 kg
- Natural gas, combusted in industrial boiler [RNA]: 0.21613 m3
- Aluminum recovery, transport, to plant [RNA]: 1.053 kg
- Electricity, at grid [RNA]: 0.21826 kWh; provider Electricity, at Grid, US, 2010

## Emissions to nature
- Metals [emission, water]: 2.25e-5 kg
- Suspended solids, inorganic [emission, water]: 2.56e-5 kg
- Chemical Oxygen Demand [emission, water]: 8.3e-7 kg
- Particulate matter [emission, air]: 1.74e-7 kg
- Volatile organic compounds [emission, air]: 4.7e-5 kg
- Organic compounds [emission, water]: 1.29e-6 kg
- Biological Oxygen Demand [emission, water]: 1.35e-9 kg
- Acid compounds [emission, air]: 0.000431 kg
- Total dissolved solids [emission, water]: 2.38e-8 kg
- Lead [emission, air]: 2.16e-7 kg

## Sources
- Franklin Associates, A Division of ERG
- The Aluminum Association
