# Precision sand casting, aluminum

Dataset: openLCA process, unit process
Category: 31-33: Manufacturing/3315: Foundries
Geography: Northern America
Time period: 1995-12-31 to 2000-12-31
Allocation method: no allocation
Generated by: James Littlefield
Published in: VRP (Vehicle Recycling Partnership)
restrictionsDescription: All information can be accessed by everybody.
copyright: false

## General comment
No co-product allocation for scrap materials that are recycled or reused; all environmental flows for scrap are included in the environmental flows for the product. A percent difference is calculated in cases when 2 plants reported the same data point; the percent difference is calculated by dividing the difference between the 2 plants by the average of the 2 plants.
Important note: although most of the data in the US LCI database has
undergone some sort of review, the database as a whole has not yet
undergone a formal validation process.
Please email comments to lci@nrel.gov.

## Technology
representative of current precision sand aluminum casting technologies

## Geography
United States

## Reference product
- Aluminum, cast, precision sand casting [RNA]: 1 kg
  Average of 2 plants

## By-products
- Aluminum scrap, at precision sand casting [RNA]: 0.648 kg
  Average of 2 plants. Composition by weight: 73% sand, 15% aluminum scrap/dross/chips/flash, 9% wood/paper/cardboard, and 3% steel/batteries/etc.
- Byproduct of aluminum casting, precision sand, liquid residuals [RNA]: 0.0289 kg
  Average of 2 plants. Composition by weight: 81% sodium hydroxide and 18% sulfuric acid and spent TEA.

## Inputs from technosphere
- Nitrogen, at plant: 0.0464 kg
  Average of 2 plants. There is a 38% difference between the 2 plants.
- Natural gas, combusted in industrial boiler [RNA]: 0.931 m3
  Average of 2 plants. There is a 28% difference between the 2 plants. In this case, one plant is higher for both natural gas and electricity consumption.
- Glue-adhesive(30-50% terpene,30-50% polybutene,5-10% polyolefin), at plant: 0.00015 kg
  Average of 2 plants. There is a 93% difference between the 2 plants.
- Release agent, unspecified, at plant: 5e-5 kg
  Represents 1 plant.
- Disposal, solid waste, unspecified, to sanitary landfill: 0.0279 kg
  Consists of 16% sand, 11% refractory, 41% oily solids, and 29% boron nitride.
- Oil, at plant: 5e-6 kg
  Represents 1 plant.
- Sulfuric acid, at plant: 0.0137 kg
  Average of 2 plants. There is a 169% difference between the 2 plants.
- Argon, liquid, at plant: 0.00329 kg
  Average of 2 plants. There is a 56% difference between the 2 plants.
- Carbon dioxide, liquid, at plant: 0.0121 kg
  Represents 1 plant. Carbon dioxide is used to clean molds.
- Sodium hydroxide, production mix, at plant [US]: 0.00081 kg; provider Chlorine, production mix, at plant
  Represents 1 plant.
- Phenol formaldehyde, at plant [RNA]: 0.0775 kg
  Average of 2 plants. There is a 66% difference between the 2 plants. Resin system is A and B stage: isocyanate and phenolic.
- Shot blast, unspecified: 0.0149 kg
  Average of 2 plants. There is a 88% difference between the 2 plants.
- Refractory material, unspecified, at plant: 0.0062 kg
  Represents 1 plant.
- Aluminum ingot, production mix, at plant [US]: 1.15 kg
  Average of 2 plants.
- Electricity, at grid [RNA]: 4.29 kWh; provider Electricity, at Grid, US, 2010
  Average of 2 plants. There is a 39% difference between the 2 plants. In this case, one plant is higher for both natural gas and electricity consumption.
- TEA-DMEA (trimethyl amine, dimethylamine), at plant: 0.00825 kg
  Average of 2 plants. There is a 45% difference between the 2 plants.
- Disposal, liquid wastes, unspecified, to sanitary landfill: 0.0132 kg
  Consists of 26% oils/grease/petroleum distillates and 64% cleaner/waste paint.

## Inputs from nature
- Sand [resource, ground]: 0.57 kg
  Average of 2 plants. There is a 143% difference between the 2 plants. Due to different types and grades of sand, costs and physical properties of sand differ from plant to plant.
- Water [resource, water]: 6.09 kg
  Average of 2 plants. There is a 53% difference between the 2 plants.

## Emissions to nature
- Sulfur oxides [emission, air]: 6e-6 kg
  Represents 1 plant. Measured values after abatement which includes both process and on-site fuel emissions.
- Zinc compounds [emission, air]: 6e-7 kg
  Represents 1 plant. Emissions are based on published factors for process emissions.
- Naphthalene [emission, air]: 6e-7 kg
  Represents 1 plant. Emissions are based on published factors for process emissions.
- Particulate matter [emission, air]: 0.00246 kg
  (same comment as for Sulfur oxides)
- Aluminum [emission, air]: 3.2e-6 kg
  Represents 1 plant. Emissions are based on published factors for process emissions.
- Triethylamine [emission, air]: 5.39e-5 kg
  Represents 1 plant. Emissions are based on published factors for process emissions.
- Hydrocarbons [emission, air]: 0.0318 kg
  Represents 1 plant. Measured values after abatement which includes both process and on-site fuel emissions. Hydrocarbons include non-methane hydrocarbons as well as an unknown amount of methane.
- Nitrogen oxides [emission, air]: 0.0156 kg
  (same comment as for Sulfur oxides)
- Carbon monoxide [emission, air]: 0.0156 kg
  (same comment as for Sulfur oxides)
- Copper compounds [emission, air]: 8.9e-6 kg
  Represents 1 plant. Emissions are based on published factors for process emissions.
- 2,3,7,8-Tetrachlorodibenzo-p-dioxin [emission, air]: 3.7e-6 kg
  Represents 1 plant. Emissions are based on published factors for process emissions.
- Carbon dioxide [emission, air]: 1.22 kg
  (same comment as for Sulfur oxides)
- 1,2,4-Trimethylbenzene [emission, air]: 6.51e-5 kg
  Represents 1 plant. Emissions are based on published factors for process emissions.

## Allocation factors
- causal, Aluminum scrap, at precision sand casting, for Disposal, solid waste, unspecified, to sanitary landfill: 0
- causal, Aluminum, cast, precision sand casting, for Nitrogen oxides: 1
- causal, Byproduct of aluminum casting, precision sand, liquid residuals, for Sodium hydroxide, production mix, at plant: 0
- causal, Byproduct of aluminum casting, precision sand, liquid residuals, for 2,3,7,8-Tetrachlorodibenzo-p-dioxin: 0
- causal, Aluminum scrap, at precision sand casting, for Argon, liquid, at plant: 0
- causal, Aluminum scrap, at precision sand casting, for Shot blast, unspecified: 0
- causal, Byproduct of aluminum casting, precision sand, liquid residuals, for Refractory material, unspecified, at plant: 0
- causal, Aluminum, cast, precision sand casting, for Sodium hydroxide, production mix, at plant: 1
- causal, Aluminum, cast, precision sand casting, for Nitrogen, at plant: 1
- causal, Byproduct of aluminum casting, precision sand, liquid residuals, for Shot blast, unspecified: 0
- causal, Aluminum scrap, at precision sand casting, for Sodium hydroxide, production mix, at plant: 0
- causal, Aluminum scrap, at precision sand casting, for Particulate matter: 0
- causal, Aluminum, cast, precision sand casting, for Particulate matter: 1
- causal, Aluminum scrap, at precision sand casting, for TEA-DMEA (trimethyl amine, dimethylamine), at plant: 0
- causal, Byproduct of aluminum casting, precision sand, liquid residuals, for Disposal, liquid wastes, unspecified, to sanitary landfill: 0
- causal, Aluminum, cast, precision sand casting, for Sand: 1
- causal, Byproduct of aluminum casting, precision sand, liquid residuals, for Oil, at plant: 0
- causal, Aluminum, cast, precision sand casting, for Aluminum: 1
- causal, Byproduct of aluminum casting, precision sand, liquid residuals, for Zinc compounds: 0
- causal, Aluminum scrap, at precision sand casting, for 1,2,4-Trimethylbenzene: 0
- causal, Aluminum scrap, at precision sand casting, for Electricity, at grid: 0
- causal, Aluminum, cast, precision sand casting, for Carbon monoxide: 1
- causal, Byproduct of aluminum casting, precision sand, liquid residuals, for Phenol formaldehyde, at plant: 0
- causal, Aluminum scrap, at precision sand casting, for Sulfur oxides: 0
- causal, Aluminum scrap, at precision sand casting, for Nitrogen, at plant: 0
- causal, Aluminum scrap, at precision sand casting, for Water: 0
- causal, Aluminum scrap, at precision sand casting, for Disposal, liquid wastes, unspecified, to sanitary landfill: 0
- causal, Aluminum, cast, precision sand casting, for Refractory material, unspecified, at plant: 1
- causal, Aluminum, cast, precision sand casting, for Release agent, unspecified, at plant: 1
- causal, Aluminum, cast, precision sand casting, for Aluminum ingot, production mix, at plant: 1
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
## Sources
- VRP (Vehicle Recycling Partnership)
