# Lumber, softwood, borate treated, PNW

Dataset: openLCA process, unit process
Category: 31-33: Manufacturing/3211: Sawmills and Wood Preservation
Geography: United States
Time period: 2004-12-31 to 2009-12-30
Allocation method: no allocation
Generated by: Chris Bolin
Reviewer: Paul Cooper
Published in: Chris Bolin
restrictionsDescription: All information can be accessed by everybody.
copyright: false

## General comment
Pressure-treated borate (disodium octaborate tetrahydrate, DOT) softwood lumber. Base process data presented with allocations to within process co-products noted. Refer to allocation worksheet for specifics. All allocations performed using mass or volume., This sheet sets out each unit process in the production of one cubic meter of borate surfaced pressure treated softwood lumber as produced in the US Pacific Northwest Important note: although most of the data in the US LCI database has undergone some sort of review, the database as a whole has not yet undergone a formal validation process. Please email comments to lci@nrel.gov.; Geography: US Pacific Northwest

## Technology
typical

## Geography
US Pacific Northwest

## Time period
2005-2009

## Reference product
- Lumber; softwood; borate treated [US]: 1 m3
  17.0 nominal BF = 1 acutal cubic feet (ft3); 1 nominal BF = 0.0588 ft3
  retention 0.3060 lb/ft3 = 4.92 kg/m3, dry basis

## Inputs from technosphere
- Transport, train, diesel powered [RNA]: 46.92 t*km
  6% of lumber total by rail; survey data
- Gasoline, combusted in equipment [RNA]: 0.02485 l
  Preservative Wood Treatment
- Liquefied petroleum gas, combusted in industrial boiler [RNA]: 0.009003 l
  Preservative Wood Treatment
- Natural gas, combusted in industrial boiler [RNA]: 0.1272 m3
  Preservative Production
- Disposal, solid waste, unspecified, to unspecified landfill: 5.56 kg
  Preservative Wood Treatment; Solid waste disposal associated with the mining of borax for preservative manufacture. Solid waste disposal as reported in treater surveys as chemical or process wastes, hazardous wastes, and other (normal trash or municipal waste).
  40.2 km to disposal
- Residual fuel oil, combusted in industrial boiler [RNA]: 0.008613 l
  Preservative Production
- Bituminous coal, combusted in industrial boiler [RNA]: 0.06246 kg
  Preservative Production
- Disposal, solid waste, unspecified, to unspecified landfill: 17.15 kg
  Preservative Production; Solid waste disposal associated with the mining of borax for preservative manufacture. Solid waste disposal as reported in treater surveys as chemical or process wastes, hazardous wastes, and other (normal trash or municipal waste).
  40.2 km to disposal
- Sawn lumber; softwood; planed; kiln dried; packaged; at planer [US]: 1.00008 m3
  1,616 lbs/MBF 17.067 BF/ft = 27.4720 lb/ft3
  ref. PNWLum worksheet Column D, Row 43
- Diesel, combusted in industrial equipment [RNA]: 0.5325 l
  Preservative Wood Treatment
- Electricity, at grid [RNA]: 4.563 kWh; provider Electricity, Western US, 2014
  Preservative Wood Treatment
- Transport, combination truck, diesel powered [RNA]: 211.3 t*km
  84% of lumber total by truck; 67% of preservative by truck; survey data
- Natural gas, combusted in industrial boiler [RNA]: 0.0002916 m3
  Preservative Wood Treatment
- Gasoline, combusted in equipment [RNA]: 0.008787 l
  Preservative Production
- Electricity, at grid [RNA]: 0.5904 kWh; provider Electricity, Western US, 2014
  Preservative Production
- Transport, ocean freighter, residual fuel oil powered [US]: 288.5 t*km
  10% of lumber total by ship; 33% of preservative by ship; survey data
- Diesel, combusted in industrial boiler [RNA]: 0.5096 l
  Preservative Production
- Disodium octaborate tetrahydrate (DOT), at plant: 4.9435 kg
  DOT Wood Preservative

## Inputs from nature
- Water [resource, water]: 204.8 kg
  Preservative Wood Treatment
- Water [resource, water]: 4126 kg
  Preservative Production

## Emissions to nature
- Boron [emission, water]: 0.0001275 kg
  Preservative Wood Treatment; Stormwater runoff, unspecified location.
- Boron [emission, ground, human-dominated, industrial]: 0.0002765 kg
  Preservative Wood Treatment
- Volatile organic compounds [emission, air, troposphere, rural]: 0.0002543 kg
  Preservative Production
- Particulate matter, ≤ 10μm [emission, air, troposphere, rural]: 0.01659 kg
  Preservative Production
- Methane [emission, air, troposphere, rural]: 0.03947 kg
  Preservative Production

## Sampling procedure
Industry survey

## Sources
- Chris Bolin
- Chris Bolin
