# Transport, intercity bus, diesel powered, Northeast

Dataset: openLCA process, unit process
Category: 48-49: Transportation and Warehousing/4852: Interurban and Rural Bus Transportation
Geography: Northern America
Time period: 2009-12-31 to 2009-12-31
Allocation method: no allocation
Generated by: Nathan Hardesty
Published in: U.S. Environmental Protection Agency (EP
restrictionsDescription: All information can be accessed by everybody.
copyright: false

## General comment
This dataset represents the Northeastern U.S. (CT, DC, DE, ME, MD, MA, NH, NJ, NY, PA, RI, VT (Reference 10)) average airborne emissions for operating a diesel powered intercity bus. The inventory includes all vehicle operation processes, including off-network and refueling activities.
The refinery-to-pump transportation and distribution data are calculated from Argonne National Laboratory's GREET 1.8d.1 model.
The vehicle operation data are calculated from EPA's MOVES2010a model, using the assumptions described in the corresponding detailed spreadsheet. Emissions factors in MOVES2010a are largely based on EPA's Mobile Source Observation Database, which in turn includes data from a variety of vehicle studies (References 6-8).
MOVES2010a acknowledges sources of uncertainty in the model structure, the population and acitivty data, and other model parameters. As of July 2011, the uncertainty calculation function of the model has not been activated.

## Technology
Combustion of diesel in an intercity bus.

## Geography
US

## Reference product
- Transport, intercity bus, diesel powered [RNA]: 1 p*km

## Inputs from technosphere
- Transport, ocean freighter, average fuel mix [RNA]: 0.0336905 t*km
- Transport, barge, average fuel mix [RNA]: 0.00476662 t*km
- Transport, train, diesel powered [RNA]: 0.00919643 t*km
- Diesel, at refinery: 0.0152876 l; provider Petroleum refining, at refinery
- Transport, combination truck, average fuel mix [RNA]: 0.00492809 t*km
- Transport, pipeline, unspecified petroleum products [RNA]: 0.0496735 t*km

## Emissions to nature
- Ammonia [emission, air]: 5.55521e-7 kg
- Nitrous oxide [emission, air]: 5.74964e-8 kg
- Nitrogen oxides [emission, air]: 0.00033602, 0.000364101 kg (2 entries)
- Nitrogen dioxide [emission, air]: 2.80823e-5 kg
- Particulate matter, ≤ 2.5μm [emission, air]: 5.58553e-7 kg
  PM2.5 from brakewear.
- Particulate matter, ≤ 2.5μm [emission, air]: 1.9451e-5 kg
  PM2.5 from organic carbon, elemental carbon, and sulfate particulates.
- Carbon monoxide [emission, air]: 9.73298e-5 kg
- Methane [emission, air]: 4.1715e-7 kg
- Particulate matter, ≤ 10μm [emission, air]: 4.74311e-7 kg
  PM10 from tirewear.
- Volatile organic compounds [emission, air]: 1.64226e-5 kg
- Particulate matter, ≤ 10μm [emission, air]: 2.13368e-6 kg
  PM10 from brakewear.
- Sulfur dioxide [emission, air]: 6.75926e-7 kg
- Hydrocarbons [emission, air]: 1.59344e-5 kg
- Particulate matter, ≤ 10μm [emission, air]: 2.00519e-5 kg
  PM10 from organic carbon, elemental carbon, and sulfate particulates.
- Particulate matter, ≤ 2.5μm [emission, air]: 1.13744e-7 kg
  PM2.5 from tirewear.
- Carbon dioxide [emission, air]: 0.040138 kg

## Sources
- Assessment and Standards Division, Offic
- J. Schwieterman
- National Institute of Standards and Tech
- Wang, M.
- National Climatic Data Center, National
- U.S. Alternative Fuels and Advanced Vehi
- U.S. Environmental Protection Agency (EP
- Eastern Research Group
- Assessment and Standards Division, Offic
- EPA
