# Recycled postconsumer PET flake

Dataset: openLCA process, unit process
Category: 31-33: Manufacturing/3259: Other Chemical Product and Preparation Manufacturing
Geography: Northern America
Time period: 2006-12-31 to 2007-12-31
Allocation method: no allocation
Generated by: Franklin Associates
restrictionsDescription: All information can be accessed by everybody.
copyright: false

## General comment
Important note: although most of the data in the US LCI database has
undergone some sort of review, the database as a whole has not yet
undergone a formal validation process.
Please email comments to lci@nrel.gov.

## Technology
Typical

## Geography
United States

## Reference product
- Recycled postconsumer PET flake [RNA]: 1 kg
  Depending on the practitioner's choice of methodology, some share of the virgin material burdens for initially producing the plastic may be allocated to the recycled resin.

## Inputs from technosphere
- Sodium hydroxide, production mix, at plant [US]: 0.024 kg; provider Chlorine, production mix, at plant
  Pure weight of NaOH for the solution used
- Defoamant, unspecified: 0.0022 kg
- Electricity, at grid [RNA]: 0.46 kWh; provider Electricity, at Grid, US, 2010
- Deposit containers, at collection, CRV [RNA]: 0.27206 kg
  Percentage of postconsumer PET collected via California container refund value (CRV) system. Includes wt of contaminants in incoming material.
- Wetting agent, unspecified: 0.00087 kg
- Natural gas, combusted in industrial boiler [RNA]: 0.075 m3
- Surfactant, unspecified: 0.00076 kg
- Deposit containers, at collection [RNA]: 0.1586 kg
  Percentage of postconsumer PET collected via deposit programs. Includes wt of contaminants in incoming material.
- Disposal, solid waste, unspecified, to unspecified landfill: 0.22 kg
  Includes bale wire trash, labels, PVC in incoming bale, and other materials that become processing wastes or sludges.
- Transport, combination truck, diesel powered [RNA]: 0.974719 t*km
  Represents transport of inbound material (PET and contaminants)
- Liquefied petroleum gas, combusted in industrial boiler [RNA]: 0.000303659 l
- Transport, train, diesel powered [RNA]: 0.235906 t*km
  Represents transport of inbound material (PET and contaminants)
- Mixed recyclables, sorted at MRF [RNA]: 0.78934 kg
  Includes wt of contaminants in incoming material from MRF.

## Inputs from nature
- Water [resource, water]: 4801.06 kg
  Water input to washing

## Emissions to nature
- Suspended solids, inorganic [emission, water]: 0.003 kg
- Particulate matter [emission, air]: 3.9e-5 kg
- Chemical Oxygen Demand [emission, water]: 0.02 kg
- Water [emission, water]: 4401.14 kg
  Water returned after washing (reflects evaporative losses of water carried out with washed resin and evaporated during drying)
- Volatile organic compounds [emission, air]: 3.7e-5 kg
- Biological Oxygen Demand [emission, water]: 0.0073 kg
  Unknown how much of the waterborne emissions are from washing chemicals versus material washed off received plastic. These emissions are not included in the material balance.

## Sources
- THE PLASTICS DIVISION OF THE AMERICAN CH
