# Natural gas, at extraction site

Dataset: openLCA process, unit process
Category: 21: Mining, Quarrying, and Oil and Gas Extraction/2111: Oil and Gas Extraction
Geography: Northern America
Time period: 1996-12-31 to 2000-12-31
Allocation method: no allocation
Generated by: Franklin Associates
Published in: Franklin Associates
restrictionsDescription: All information can be accessed by everybody.
copyright: false

## General comment
Natural gas is commonly co-extracted with crude oil. However, there are enough differences between crude oil and natural gas extraction to merit separate data modules for each product.,
Important note: although most of the data in the US LCI database has
undergone some sort of review, the database as a whole has not yet
undergone a formal validation process.
Please email comments to lci@nrel.gov.

## Technology
Includes data for natural gas extracted from onshore and offshore wells. Includes data for natural gas co-extracted with crude oil as well as for wells that produced only natural gas.

## Geography
United States

## Reference product
- Natural gas, at extraction site, 1.357 m3/kg [RNA]: 1 m3

## Inputs from technosphere
- Residual fuel oil, combusted in industrial boiler [RNA]: 0.000588 l
- Diesel, combusted in industrial boiler [RNA]: 0.000953 l
- Gasoline, combusted in equipment [RNA]: 0.000507 l
- Disposal, solid waste, unspecified, to unspecified treatment: 0.0192 kg
- Natural gas, combusted in industrial boiler [RNA]: 0.0241 m3
- Electricity, at grid [RNA]: 0.0287 kWh; provider Electricity, at Grid, US, 2010

## Inputs from nature
- Natural gas [resource, air, subterranean]: 38.3 MJ

## Emissions to nature
- Lead [emission, water]: 1.01e-6 kg
- Strontium [emission, water]: 0.000173 kg
- Nickel [emission, water]: 5.54e-7 kg
- Biphenyl [emission, water]: 2.02e-9 kg
- Copper(I) [emission, water]: 4.47e-7 kg
- 2-Hexanone [emission, water]: 2.07e-8 kg
- Toluene [emission, water]: 5.02e-6 kg
- Vanadium [emission, water]: 8.6e-8 kg
- Lead-210 [emission, water]: 0.0009212 kBq
  Radioactive substances in kBq in other DB and in impact assessment methods, no conversion factors found.
- Arsenic(V) [emission, water]: 7e-7 kg
- 2-Methylnaphthalene [emission, water]: 5.02e-8 kg
- Zinc [emission, water]: 1.56e-6 kg
- Magnesium [emission, water]: 0.00199 kg
- Boron [emission, water]: 9.94e-6 kg
- Lithium(I) [emission, water]: 0.0034 kg
- Cobalt [emission, water]: 7.02e-8 kg
- Titanium [emission, water]: 5.48e-7 kg
- Ammonia [emission, water]: 3.91e-5 kg
- Dibenzofuran [emission, water]: 6.02e-10 kg
- Benzoic acid [emission, water]: 3.21e-6 kg
- Biological Oxygen Demand [emission, water]: 0.000552 kg
- Total dissolved solids [emission, water]: 0.141 kg
- Phenols [emission, water]: 1.42e-6 kg
- Calcium(II) [emission, water]: 0.0102 kg
- Iron [emission, water]: 0.000184 kg
- Phenanthrenes, alkylated, unspecified [emission, water]: 2.12e-10 kg
- Sulfur [emission, water]: 8.39e-6 kg
- Naphthalene [emission, water]: 5.75e-8 kg
- m-Xylene [emission, water]: 9.6e-8 kg
- Thallium [emission, water]: 7.53e-9 kg
- Bromide [emission, water]: 0.000679 kg
- Hexadecane [emission, water]: 1.91e-7 kg
- p-Cresol [emission, water]: 9.83e-8 kg
- Beryllium [emission, water]: 3.17e-8 kg
- Benzene [emission, water]: 5.31e-6 kg
- Detergents, oil [emission, water]: 3.16e-6 kg
- Methyl ethyl ketone [emission, water]: 2.55e-10 kg
- Aluminum [emission, water]: 5.84e-5 kg
- Oils, unspecified [emission, water]: 6.09e-5 kg
- Dibenzothiophene [emission, water]: 6.22e-12, 4.88e-10 kg (2 entries)
- Dodecane [emission, water]: 1.75e-7 kg
- Ethylbenzene [emission, water]: 2.99e-7 kg
- Antimony [emission, water]: 3.56e-8 kg
- Chloromethane [emission, water]: 1.28e-10 kg
- Xylene [emission, water]: 6.99e-8, 2.54e-6 kg (2 entries)
- 2,4-Dimethylphenol [emission, water]: 8.87e-8 kg
- Chemical Oxygen Demand [emission, water]: 0.000911 kg
- Decane [emission, water]: 9.23e-8 kg
- Cyanide [emission, water]: 2.29e-10 kg
- Sodium(I) [emission, water]: 0.0323 kg
- Chloride [emission, water]: 0.114 kg
- Fluorenes, alkylated, unspecified [emission, water]: 1.81e-9 kg
- Selenium [emission, water]: 7.04e-9 kg
- Methane [emission, air]: 0.00881 kg
- Docosane [emission, water]: 3.39e-9 kg
- Hexacosane [emission, water]: 2.12e-9 kg
- Radium-228 [emission, water]: 0.00586 kBq
  (same comment as for Lead-210)
- Benzene, pentamethyl- [emission, water]: 2.37e-10 kg
- Barium [emission, water]: 0.000902 kg
- Octadecane [emission, water]: 4.72e-8 kg
- 1-Methylfluorene [emission, water]: 3.61e-10 kg
- Radium-226 [emission, water]: 0.004255 kBq
  (same comment as for Lead-210)
- Molybdenum [emission, water]: 7.28e-8 kg
- Tetradecane [emission, water]: 7.68e-8 kg
- Hexanoic acid [emission, water]: 6.66e-7 kg
- Benzenes, alkylated, unspecified [emission, water]: 3.11e-8 kg
- Tin [emission, water]: 3.49e-7 kg
- Manganese [emission, water]: 3.22e-6 kg
- Eicosane [emission, water]: 4.82e-8 kg
- Cadmium(II) [emission, water]: 1.02e-7 kg
- Chromium(III) [emission, water]: 1.6e-6 kg
- o-Cresol [emission, water]: 9.11e-8 kg
- Fluorine [emission, water]: 1.11e-9 kg
- Acetone [emission, water]: 3.17e-8 kg
- Naphthalenes, alkylated, unspecified [emission, water]: 5.1e-10 kg
- Mercury [emission, water]: 6.22e-10 kg
- Silver [emission, water]: 6.64e-6 kg
- p-Cymene [emission, water]: 3.17e-10 kg
- Suspended solids, inorganic [emission, water]: 0.00201 kg
- Pentanone, methyl- [emission, water]: 1.33e-8 kg
- Phenanthrene [emission, water]: 4.06e-10 kg
- Sulfate [emission, water]: 0.000233 kg
- Yttrium [emission, water]: 2.13e-8 kg

## Sources
- Franklin Associates
- Energy Information Administration
- Energy Information Administration
- EPA
- EPA
- unspecified
- Energy Information Administration
- unspecified
- Energy Information Administration: Natur
- unspecified
- Hydrocarbon Processing
- EPA
- NREL (National Renewable Energy Laborato
