# Paper, bag and sack, unbleached kraft, average production, at mill

Dataset: openLCA process, unit process
Category: 31-33: Manufacturing/3221: Pulp, Paper, and Paperboard Mills
Geography: Northern America
Time period: 2005-12-31 to 2005-12-31
Allocation method: no allocation
Generated by: Caroline Gaudreault
Reviewer: Martha Stevenson
Published in: AF&PA
restrictionsDescription: All information can be accessed by everybody.
copyright: false

## General comment
Unbleached Kraft Bag and Sack Paper, average North American production, at mill. By-products were allocated 0% of the impacts to enable the user to choose and apply their own allocation method more easily. All flows are production-weighted means. Data were developed for a full LCA that was critically reviewed. Reviewers were: • Martha Stevenson, Chairperson – Private Consultant to the public interest with ten years of experience in sustainability, environmental management, packaging and materials recovery; led the development of the Design Guidelines for Sustainable Packaging and the COMPASS software used to compare the environmental impacts of package designs; • Pascal Lesage – Life cycle assessment consultant, Researcher at École Polytechnique de Montréal [at the Inter-University Research Centre for the Life Cycle of Products, Processes and Services (CIRAIG) in Montreal]; and • Dale Phenicie, Environmental Affairs Consulting – Consultant with 35 years of experience in environmental protection and process consulting for the forest products industry. Has served on several U.S. EPA Task Forces dealing with water quality issues and authored several AF&PA Environmental, Health and Safety/Sustainability reports.

## Technology
current technology mix for unbleached kraft bag and sack paper

## Time period
Primary data collected from participating companies and associations for their operational activities are representative for 2006 and 2007.

## Reference product
- Paper, bag and sack, unbleached kraft, average production, at mill [RNA]: 834.61 kg
  834.61 dry kg is equal to 1 market-dried short ton (8% water).

## By-products
- Turpentine, at unbleached kraft bag and sack paper mill [RNA]: 1.9504 kg
  Produced as byproduct of pulp production. Sold i.e., not used on site. Allocation set to 0%.
- Electricity, at unbleached kraft bag and sack paper mill [RNA]: 65 kWh
  (same comment as for Turpentine, at unbleached kraft bag and sack paper mill)
- Tall oil, at unbleached kraft bag and sack paper mill [RNA]: 25.174 kg
  (same comment as for Turpentine, at unbleached kraft bag and sack paper mill)

## Inputs from technosphere
- Disposal, wastewater treatment plant residuals, to uns. land application: 0.45359 kg
  Typically off-site agricultural/silvicultural. (uns. = unspecified)
- Transport, combination truck, average fuel mix [RNA]: 36.791 t*km
  Transportation of chemicals. Talc, Sodium sulfate, Alum, and Sodium carbonate: 295 km. Lime: 183 km. Sizers, Retention aid and Dry strengths: 272 km. Starch: 510 km. Sodium hydroxide: 230 km. Transports of fuels. Coal: 153 km. Residual fuel oil, Distillate fuel oil: 50 km. Liquefied petroleum gas, Kerosene and gasoline, Other fossil assumed to be diesel: 80 km.
- Core board, at plant: 1.7599 kg
  Packaging material
- Polyethylene, linear low density, LLDPE, resin, at plant [RNA]: 0.045813 kg
  Packaging material
- Transport, combination truck, average fuel mix [RNA]: 0.92416 t*km
  Transport of packaging. Containerboard: 201 km. Core board: 369 km. Polypropylene and Polyethylene: 417 km. Steel: 257 km.
- Containerboard, average production, at mill [US]: 4.2139 kg
  Packaging material
- Sodium hydroxide, production mix, at plant [US]: 1.5876 kg; provider Chlorine, production mix, at plant
- Quicklime, at plant [RNA]: 10.841 kg
- Starch, at plant: 8.2554 kg
  ei: Maize starch, at plant and/or Potato starch, at plant
- Old news paper: 7.1668 kg
- Transport, pipeline, natural gas [RNA]: 83.2 t*km
  Transports of fuels. Natural gas: 33584 tkm/MMcf, Average transportation for natural gas in North America according to the US LCI database
- Disposal, unspecified ashes, to unspecified beneficial use: 1.1793 kg
  Mix of wood and coal ashes. Based on typical ash contents can be assumed to be 78% from wood and 22% from coal. Typically off-site.
- Aluminium, at plant: 6.9853 kg
  ei: Aluminium sulphate, powder, at plant
- Sizer, at plant: 0.55338 kg
  ei: AKD sizer, in paper production, at plant
- Sizer, at plant: 3.3112 kg
  ei: Rosin size, in paper production, at plant
- Softwood with bark, avg. intst. harvest, at mill, US SE, in pulp: 0.621 m3
  Mass of incoming southern softwood logs intended for pulping that actually ends up in pulp. Assumed density: 450 kg/m3. US LCI: "Softwood logs with bark, harvested at average intensity site, at mill, US SE/US" can be used but transportation needs to be removed as it is already included here.
- Transport, train, diesel powered [RNA]: 3.7375 t*km
  Transport of packaging. Containerboard: 1410 km. Core board: 1276 km. Polypropylene and Polyethylene: 1806 km. Steel: 1083 km.
- Retention aid, at plant: 0.48081 kg
  ei: Retention aids, in paper production, at plant
- Transport, combination truck, average fuel mix [RNA]: 575.23 t*km
  Transportation of pulpwood and chips to pulp mill. Pulpwood: 200 km (rounded trip distance), chips: 254 km (rounded trip distance). Recycled fiber: 256 km.
- Electricity, at grid [RNA]: 172.2, 148.05 kWh (2 entries); provider Electricity, at Grid, US, 2010
  Net purchased, National average grid, Medium voltage: <50 kV
- Old corrugated containers: 209.56 kg
- Natural soda ash (Sodium carbonate), at plant [US]: 0.13608 kg
  ei: Sodium carbonate from ammonium chloride production, at plant
- Disposal, solid waste, unspecified, to unspecified landfill: 20.775 kg
  Typically company-owned, but some third party.
- Electricity, at grid, BC: 108.15 kWh
- Disposal, unspecified ashes, to unspecified landfill: 20.321 kg
  Mix of wood and coal ashes. Based on typical ash contents can be assumed to be 78% from wood and 22% from coal. Typically company-owned, but some third party.
- Old magazines: 3.792 kg
- Natural gas, combusted in industrial boiler [RNA]: 1.1148 m3
  Purchased steam, assumed to be natural gas.
- Softwood with bark, avg.intst. harvest, at mill, US SE, in self-gen. hogged fuel: 0.17 m3
  Mass of incoming southern softwood logs intended for pulping that ends up as hogged fuel. All combusted onsite. Combustion of this fuel is important to the economic viability of all modern pulp mills. Substitution of other fuels for this fuel is not recommended. Assumed density: 450 kg/m3. US LCI: "Softwood logs with bark, harvested at average intensity site, at mill, US SE/US" can be used but transportation needs to be removed as it is already included here. "Self-generated hogged fuel, combusted in industrial boiler, at pulp and paper mill".
- Disposal, wastewater treatment plant residuals, to uns. landfill: 10.07 kg
  Typically company-owned, but some third party. (uns. = unspecified)
- Disposal, solid waste, unspecified, to unspecified land application: 0.45359 kg
  Typically off-site agricultural/silvicultural
- Disposal, solid waste, unspecified, to unspecified beneficial use: 2.268 kg
  Typically off-site.
- Disposal, solid waste, unspecified, to unspecified incinerator: 0.45359 kg
  Typically on-site with energy recovery.
- Talc, at plant: 7.0307 kg
  ei: Malusil, at plant
- Transport, ocean freighter, average fuel mix [RNA]: 8.643 t*km
  Transportation of chemicals. Lime: 517 km. Sodium hydroxide: 24 km. Transports of fuels. Residual fuel oil , Distillate fuel oil: 682 km. Kerosene and gasoline, Other fossil assumed to be diesel: 1183 km.
- Electricity, at grid, MB: 99.75 kWh
- Transport, barge, average fuel mix [RNA]: 2.9053 t*km
  Transportation of chemicals. Lime: 489 km. Sodium hydroxide: 776 km. Transports of fuels. Coal: 515 km. Residual fuel oil, Distillate fuel oil: 163 km. Kerosene and gasoline, Other fossil assumed to be diesel : 163 km.
- Fuels, burned at unbleached kraft bag sack paper, average production, at mill [RNA]: 11045 MJ
  Includes all fuels burned on site
- Disposal, wastewater treatment plant residuals, to uns. beneficial use: 0.090718 kg
  Typically off-site. (uns. = unspecified)
- Dry strengths, at plant: 0.20865 kg
- Hot rolled sheet, steel, at plant [RNA]: 0.094347 kg
  Packaging material
- Chips; softwood; green; at sawmill [US]: 335.45 kg
  Mass of incoming pulp chips intended for pulping that ends up as black liquor solids. Combusted onsite as part of the pulping chemical recovery process that is integral to and is essential to the economic viability of all modern pulp mills. Substitution of other fuels for this fuel is not recommended. US LCI dataset used as a proxy for a mix of chips (northern softwood chips: 66%, northern hardwood chips: 18%, southern softwood chips: 11% and southern hardwood chips: 6%).
- Sodium sulfate, at plant: 13.109 kg
  ei: Sodium sulphate, powder, production mix, at plant
- Transport, train, diesel powered [RNA]: 229.22 t*km
  Transportation of pulpwood and chips to pulp mill. Pulpwood: 375 km, chips: 127 km. Recycled fiber: 1794 km.
- Softwood with bark, avg. intst. harvest, at mill, US SE, in black liquor: 0.66 m3
  Mass of incoming southern softwood logs intended for pulping that ends up as black liquor solids. Combusted onsite as part of the pulping chemical recovery process that is integral to and is essential to the economic viability of all modern pulp mills. Substitution of other fuels for this fuel is not recommended. Assumed density: 450 kg/m3. US LCI: "Softwood logs with bark, harvested at average intensity site, at mill, US SE/US" can be used but transportation needs to be removed as it is already included here.
- Transport, train, diesel powered [RNA]: 38.981 t*km
  Transportation of chemicals. Lime: 1088 km. Sizers, Retention aid and Dry strengths: 2438 km. Starch: 1788 km. Talc: 1204 km. Sodium hydroxide: 927 km. Transports of fuels. Coal: 653 km. Residual fuel oil, Distillate fuel oil: 1114 km. Liquefied petroleum gas: 1246 km.
- Polypropylene, PP, resin, at plant [RNA]: 0.53524 kg
  Packaging material
- Disposal, wastewater treatment plant residuals, to uns. Incinerator: 4.173 kg
  Typically on-site with energy recovery. (uns. = unspecified)
- Chips; softwood; green; at sawmill [US]: 315.9 kg
  Mass of incoming pulp chips intended for pulping that actually ends up in pulp. US LCI dataset used as a proxy for a mix of chips (northern softwood chips: 66%, northern hardwood chips: 18%, southern softwood chips: 11% and southern hardwood chips: 6%).

## Inputs from nature
- Water [resource, water]: 12563 kg
  Estimated based on individual mill process effluent and cooling water flows and process characteristics. Share between process and cooling estimated. Includes evaporation and other losses (e.g., water in solid waste).
- Water [resource, water]: 49518 kg
  Estimated based on individual mill process effluent and cooling water flows and process characteristics. Share between process and cooling estimated.

## Emissions to nature
- Ammonia [emission, ground]: 7.12e-6 kg
  From onsite management of solid waste. All metals reported as elemental althought in most cases they are releases into metal compounds.
- Arsenic [emission, ground]: 0.000906 kg
  (same comment as for Ammonia)
- Barium [emission, ground]: 0.0222 kg
  (same comment as for Ammonia)
- Acetaldehyde [emission, air]: 0.0482 kg
  From process
- Water [emission, air]: 1047 kg
  (same comment as for Water)
- Acetaldehyde [emission, water]: 0.048191 kg
  In effluent.
- Copper [emission, water]: 0.00015914 kg
  In effluent.
- Ammonia [emission, water]: 0.038163 kg
  In effluent.
- Nickel [emission, ground]: 0.000972 kg
  (same comment as for Ammonia)
- Ethylene glycol [emission, water]: 0.00041445 kg
  In effluent.
- Water [emission, water]: 12563 kg
  (same comment as for Water)
- Phosphorus [emission, water]: 0.021964 kg
  In effluent.
- Methanol [emission, air]: 0.59749 kg
  From process
- Mercury [emission, water]: 1.0449e-7 kg
  In effluent.
- Vanadium [emission, ground]: 0.00101 kg
  (same comment as for Ammonia)
- Phenol [emission, ground]: 1.43e-5 kg
  (same comment as for Ammonia)
- Formaldehyde [emission, water]: 0.00052771 kg
  In effluent.
- Zinc [emission, water]: 0.0016815 kg
  In effluent.
- Chromium [emission, ground]: 0.00329 kg
  (same comment as for Ammonia)
- Ammonia [emission, air]: 0.19427 kg
  From process
- Phenol [emission, water]: 1.5436e-5 kg
  In effluent.
- Biological Oxygen Demand [emission, water]: 0.9831 kg
  In effluent.
- Manganese [emission, water]: 0.016995 kg
  In effluent.
- Lead [emission, ground]: 0.00885 kg
  (same comment as for Ammonia)
- Vanadium [emission, water]: 0.00027504 kg
  In effluent.
- Nickel [emission, water]: 0.0001141 kg
  In effluent.
- Barium [emission, water]: 0.0024201 kg
  In effluent.
- Zinc [emission, ground]: 0.0227 kg
  (same comment as for Ammonia)
- Lead [emission, water]: 0.00023901 kg
  In effluent.
- Arsenic [emission, water]: 0.00012491 kg
  In effluent.
- Methanol [emission, water]: 0.0078039 kg
  In effluent.
- Methanol [emission, ground]: 0.0024 kg
  (same comment as for Ammonia)
- Chromium [emission, water]: 0.00014773 kg
  In effluent.
- Mercury [emission, ground]: 4.96e-6 kg
  (same comment as for Ammonia)
- Polycyclic aromatic hydrocarbons [emission, ground]: 1.79e-5 kg
  (same comment as for Ammonia)
- Process effluent [emission, water]: 49967 kg
  (same comment as for Water)
- Polycyclic aromatic hydrocarbons [emission, water]: 7.3095e-6 kg
  In effluent.
- Nitrogen [emission, water]: 0.2127 kg
  In effluent.
- Manganese [emission, ground]: 0.0709 kg
  (same comment as for Ammonia)
- Copper [emission, ground]: 0.00342 kg
  (same comment as for Ammonia)
- Acetaldehyde [emission, ground]: 6.98e-5 kg
  (same comment as for Ammonia)
- Formaldehyde [emission, ground]: 1.01e-5 kg
  (same comment as for Ammonia)
- Suspended solids, inorganic [emission, water]: 1.8874 kg
  In effluent.

## Allocation factors
- causal, Turpentine, at unbleached kraft bag and sack paper mill, for Phenol: 0
- causal, Tall oil, at unbleached kraft bag and sack paper mill, for Softwood with bark, avg.intst. harvest, at mill, US SE, in self-gen. hogged fuel: 0
- causal, Tall oil, at unbleached kraft bag and sack paper mill, for Phenol: 0
- causal, Tall oil, at unbleached kraft bag and sack paper mill, for Zinc: 0
- causal, Electricity, at unbleached kraft bag and sack paper mill, for Softwood with bark, avg. intst. harvest, at mill, US SE, in black liquor: 0
- causal, Tall oil, at unbleached kraft bag and sack paper mill, for Polycyclic aromatic hydrocarbons: 0
- causal, Turpentine, at unbleached kraft bag and sack paper mill, for Sizer, at plant: 0
- causal, Tall oil, at unbleached kraft bag and sack paper mill, for Polyethylene, linear low density, LLDPE, resin, at plant: 0
- causal, Tall oil, at unbleached kraft bag and sack paper mill, for Transport, combination truck, average fuel mix: 0
- causal, Electricity, at unbleached kraft bag and sack paper mill, for Ammonia: 0
- causal, Paper, bag and sack, unbleached kraft, average production, at mill, for Disposal, unspecified ashes, to unspecified landfill: 1
- causal, Paper, bag and sack, unbleached kraft, average production, at mill, for Transport, train, diesel powered: 1
- causal, Turpentine, at unbleached kraft bag and sack paper mill, for Acetaldehyde: 0
- physical, Turpentine, at unbleached kraft bag and sack paper mill: 0
- causal, Electricity, at unbleached kraft bag and sack paper mill, for Electricity, at grid, MB: 0
- causal, Electricity, at unbleached kraft bag and sack paper mill, for Arsenic: 0
- causal, Tall oil, at unbleached kraft bag and sack paper mill, for Methanol: 0
- causal, Turpentine, at unbleached kraft bag and sack paper mill, for Transport, train, diesel powered: 0
- causal, Turpentine, at unbleached kraft bag and sack paper mill, for Suspended solids, inorganic: 0
- causal, Paper, bag and sack, unbleached kraft, average production, at mill, for Lead: 1
- causal, Tall oil, at unbleached kraft bag and sack paper mill, for Sizer, at plant: 0
- causal, Turpentine, at unbleached kraft bag and sack paper mill, for Methanol: 0
- causal, Turpentine, at unbleached kraft bag and sack paper mill, for Disposal, unspecified ashes, to unspecified beneficial use: 0
- causal, Electricity, at unbleached kraft bag and sack paper mill, for Disposal, wastewater treatment plant residuals, to uns. beneficial use: 0
- causal, Electricity, at unbleached kraft bag and sack paper mill, for Barium: 0
- causal, Electricity, at unbleached kraft bag and sack paper mill, for Copper: 0
- causal, Electricity, at unbleached kraft bag and sack paper mill, for Natural soda ash (Sodium carbonate), at plant: 0
- causal, Paper, bag and sack, unbleached kraft, average production, at mill, for Disposal, solid waste, unspecified, to unspecified beneficial use: 1
- causal, Paper, bag and sack, unbleached kraft, average production, at mill, for Containerboard, average production, at mill: 1
- causal, Electricity, at unbleached kraft bag and sack paper mill, for Disposal, solid waste, unspecified, to unspecified land application: 0
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
## Sampling procedure
The survey included results from 9 paper mills representing 1.17 million short tons per year (TPY), nearly 89% of 2006/2007 North American production volume.

## Sources
- AF&PA
