# Polybutadiene, butadiene rubber, BR, at plant

Dataset: openLCA process, unit process
Category: 31-33: Manufacturing/3252: Resin, Synthetic Rubber, and Artificial and Synthetic Fibers and Filaments Manufacturing
Geography: Northern America
Time period: 1969-12-31 to 2002-12-31
Allocation method: no allocation
Generated by: Franklin Associates
Published in: THE PLASTICS DIVISION OF THE AMERICAN C
restrictionsDescription: All information can be accessed by everybody.
copyright: false

## General comment
Complete inventory data and metadata are available in full in the final report and appendices, Cradle-to-Gate Life Cycle Inventory of Nine Plastic Resins and Four Polyurethane Precursors. This report has been extensively reviewed within Franklin Associates and has undergone partial critical review by ACC Plastics Division members and is available at: www.americanchemistry.com. Quantities may vary slightly between the reference to main source and and this module due to rounding. Important note: although most of the data in the US LCI database has undergone some sort of review, the database as a whole has not yet undergone a formal validation process. Please email comments to lci@nrel.gov.

## Technology
Polymerization of a butadiene solution using Ziegler-Natta catalysts

## Geography
US

## Reference product
- Polybutadiene, butadiene rubber, BR, at plant [RNA]: 1 kg

## Inputs from technosphere
- Transport, combination truck, diesel powered [RNA]: 0.310296 t*km
- Butadiene, at plant [RNA]: 1.015 kg
- Transport, pipeline, unspecified petroleum products [RNA]: 0.146982 t*km
- Transport, train, diesel powered [RNA]: 0.310296 t*km
- Natural gas, combusted in industrial boiler [RNA]: 0.145455 m3
- Disposal, solid waste, unspecified, to sanitary landfill: 0.0001 kg

## Emissions to nature
- Suspended solids, inorganic [emission, water]: 0.00125 kg
- Oil and grease, unspecified [emission, water]: 7e-5 kg
- Volatile organic compounds [emission, air]: 0.013 kg
- Chemical Oxygen Demand [emission, water]: 0.00083 kg

## Sampling procedure
Data are from both primary and secondary sources.

## Sources
- THE PLASTICS DIVISION OF THE AMERICAN C
