# Chlor-alkali electrolysis, chlorine for PVC, at plant

Dataset: openLCA process, unit process
Category: 31-33: Manufacturing/3251: Basic Chemical Manufacturing
Geography: United States
Time period: 1988-12-31 to 2003-12-31
Allocation method: no allocation
Generated by: Franklin Associates
Published in: THE PLASTICS DIVISION OF THE ACC
restrictionsDescription: All information can be accessed by everybody.
copyright: false

## General comment
Diaphragm and membrane cells are considered as the main source of chlorine/caustic in this module dataset. Per the Vinyl Institute, there are no producers of chlorine using the mercury cell technology and selling to the EDC producers in the United States. This data module assigns 100% of chlorine production to diaphragm/membrane cell electrolysis. The collected datasets were weighted using these fractions. Mass imbalance is due to unavailability of the weight of water inputs to production. Complete inventory data and metadata are available in full in the final report and appendices, Cradle-to-Gate Life Cycle Inventory of Nine Plastic Resins and Four Polyurethane Precursors. This report has been extensively reviewed within Franklin Associates by Rebe Feraldi and Melissa Huff and has undergone partial critical review by ACC Plastics Division members and is available at: www.americanchemistry.com. Quantities may vary slightly between the reference to main source and this module due to rounding. Important note: although most of the data in the US LCI database has undergone some sort of review, the database as a whole has not yet undergone a formal validation process. Please email comments to lci@nrel.gov.

## Technology
There are two commercial processes for the electrolysis of sodium chloride for chlorine sold to the EDC producers: (1) the diaphragm cell process-69.5% and (2) the membrane cell process-30.5%. These two technologies are represented in this average mix using the production percentages listed

## Geography
US

## Reference product
- Chlor-alkali electrolysis, chlorine for PVC, at plant [US]: 1 kg
  Mass imbalance greater than 5% is due to unavailability of the weight of water inputs to production.

## Inputs from technosphere
- Natural gas, combusted in industrial boiler [RNA]: 0.12293 m3
- Sodium chloride, at plant [RNA]: 0.89365 kg
- Residual fuel oil, combusted in industrial boiler [RNA]: 0.00031758 l
- Transport, pipeline, unspecified petroleum products [RNA]: 0.32784 t*km
  Individual amounts of each incoming material were multiplied by the incoming distance travelled. These are totaled weighted averages of the primary incoming transport data from each participating facility. An average pipeline distance of 114 miles was used.
- Disposal, solid waste, unspecified, to sanitary landfill: 0.0005149 kg
  Solid waste consists of control device wastes and unknown process wastes.
- Bituminous coal, combusted in industrial boiler [RNA]: 0.025726 kg
- Electricity, at grid [RNA]: 0.59878 kWh; provider Electricity, at Grid, US, 2010
- Electricity, at cogen, for natural gas turbine [US]: 0.37958 kWh
- Disposal, solid waste, unspecified, to municipal incineration: 0.0014437 kg
  Solid waste consists of control device wastes and hazardous wastes.
- Transport, train, diesel powered [RNA]: 0.0035947 t*km
  Individual amounts of each incoming material were multiplied by the incoming distance travelled. These are totaled weighted averages of the primary incoming transport data from each participating facility. An average rail distance of 1.25 miles was used.
- Transport, barge, average fuel mix [RNA]: 0.0035947 t*km
  Individual amounts of each incoming material were multiplied by the incoming distance travelled. These are totaled weighted averages of the primary incoming transport data from each participating facility. An average barge distance of 1.25 miles was used.

## Inputs from nature
- Water [resource, water]: 3.4363 kg
  Franklin Associates uses a default as opposed to Egalitarian approach in collecting data for water use. During data collection, water use data were only requested and compiled in terms of 'evaporative' or consumptive use (i.e., ultimate withdraws, evaporation, or incorporation into the product). Data were not collected to determine reliable averages for non-evaporative water use. In other words, averages for water inputs and outputs are not available for this unit process. Consumptive use includes: water incorporated into the product, water evaporated during the process, and/or water used and released to a body other than that from which it was drawn.

## Emissions to nature
- Total dissolved solids [emission, water]: 0.044879 kg
- Nickel [emission, water]: 5.9037e-10 kg
- Copper [emission, water]: 1.2422e-10 kg
- Benzene [emission, air]: 2.2586e-8 kg
- Nitrogen oxides [emission, air]: 3.8585e-6 kg
- Carbon tetrachloride [emission, air]: 1.9385e-7 kg
- Suspended solids, inorganic [emission, water]: 8.1309e-5 kg
- Particulate matter, ≤ 2.5μm [emission, air]: 1.1926e-7 kg
- Carbon dioxide [emission, air]: 7.5216e-5 kg
- Hydrochloric acid [emission, air]: 3.2638e-7 kg
- Volatile organic compounds [emission, air]: 2.736e-7 kg
- Methane [emission, air]: 1.0874e-9 kg
- Chlorine [emission, air]: 1.1482e-6 kg
- Carbon monoxide [emission, air]: 1.3814e-7 kg
- Lead [emission, air]: 1.1293e-11 kg
- Biological Oxygen Demand [emission, water]: 0.00027386 kg
- Sulfur oxides [emission, air]: 5.5326e-7 kg
- Particulate matter, > 2.5μm and ≤ 10μm [emission, air]: 2.1292e-5 kg
- Particulate matter [emission, air]: 2.7914e-6 kg
- HFC-134a [emission, air]: 9.0687e-8 kg
- HCFC-123 [emission, air]: 9.0687e-8 kg
- Organic compounds [emission, air]: 8.1309e-9 kg

## Sampling procedure
Data are from primary sources. The chlorine/caustic data collected for this module represent 1 producer and 3 plants in the U.S. Also included in this average are 2 diaphragm plants collected from 1989. The chlorine/caustic producer who provided data for this module verified that the characteristics of their plant are representative of the diaphragm/membrane cell technology for North American chlorine/caustic production.

## Sources
- THE PLASTICS DIVISION OF THE ACC
