# Chlorine, production mix, at plant

Dataset: openLCA process, unit process
Category: 31-33: Manufacturing/3251: Basic Chemical Manufacturing
Geography: United States
Time period: 1988-12-31 to 2003-12-31
Allocation method: no allocation
Generated by: Franklin Associates
Published in: THE PLASTICS DIVISION OF THE ACC
restrictionsDescription: All information can be accessed by everybody.
copyright: false

## General comment
Diaphragm, membrane, and mercury cells are considered as the main source of chlorine/caustic in this module dataset. Per the Chemical Economics Handbook, SRI Consulting, 2011, the production mix data module assigns 96.5% of chlorine and caustic soda production to diaphragm/membrane cell electrolysis and 3.5% to mercury cathode cell electrolysis. This data module for average production assigns 96.5 percent of chlorine and caustic soda production to diaphragm/membrane cell electrolysis and 3.5 percent of chlorine and caustic soda production to mercury cathode cell electrolysis. The collected datasets were weighted using these fractions. Co-product credit is given because sodium hydroxide and a small amount of hydrogen are produced when chlorine is produced from salt using an electrolytic cell. Mass imbalance is due to unavailability of the weight of water inputs to production. Complete inventory data and metadata are available in full in the final report and appendices, Cradle-to-Gate Life Cycle Inventory of Nine Plastic Resins and Four Polyurethane Precursors. This report has been extensively reviewed within Franklin Associates by Rebe Feraldi and Melissa Huff and has undergone partial critical review by ACC Plastics Division members and is available at: www.americanchemistry.com. Quantities may vary slightly between the reference to main source and this module due to rounding. Important note: although most of the data in the US LCI database has undergone some sort of review, the database as a whole has not yet undergone a formal validation process. Please email comments to lci@nrel.gov.

## Technology
There are three commercial processes for the electrolysis of sodium chloride: (1) the diaphragm cell process-67%, (2) the mercury cathode cell process-3.5%, and (3) the membrane cell process-29.5%. These three technologies are represented in this average mix using the production percentages listed.

## Geography
US

## Reference product
- Chlorine, production mix, at plant [US]: 0.48 kg

## By-products
- Sodium hydroxide, production mix, at plant [US]: 0.52 kg

## Inputs from technosphere
All rows: lognormal geomSd 1
- Transport, barge, average fuel mix [RNA]: 0.0035793 t*km
- Electricity, at cogen, for natural gas turbine [US]: 0.36634 kWh
- Transport, train, diesel powered [RNA]: 0.0035793 t*km
- Disposal, solid waste, unspecified, to sanitary landfill: 0.00079308 kg
- Natural gas, combusted in industrial boiler [RNA]: 0.11918 m3
- Electricity, at grid [RNA]: 0.629 kWh; provider Electricity, at Grid, US, 2010
- Residual fuel oil, combusted in industrial boiler [RNA]: 0.00069398 l
- Transport, pipeline, unspecified petroleum products [RNA]: 0.32643 t*km
- Sodium chloride, at plant [RNA]: 0.88982 kg
- Bituminous coal, combusted in industrial boiler [RNA]: 0.025421 kg
- Disposal, solid waste, unspecified, to municipal incineration: 0.0013933 kg

## Inputs from nature
- Water [resource, water]: 3.3419 kg; lognormal geomSd 1

## Emissions to nature
All rows: lognormal geomSd 1
- Mercury [emission, water]: 1.5443e-10 kg
- Sulfide [emission, water]: 1.8168e-8 kg
- Copper [emission, water]: 1.1989e-10 kg
- Particulate matter [emission, air]: 2.7485e-6 kg
- Total dissolved solids [emission, water]: 0.043313 kg
- Chlorine [emission, air]: 1.1454e-6 kg
- Carbon dioxide [emission, air]: 7.2592e-5 kg
- Sulfur oxides [emission, air]: 5.3396e-7 kg
- Organic compounds [emission, air]: 7.8472e-9 kg
- HFC-134a [emission, air]: 8.7523e-8 kg
- HCFC-123 [emission, air]: 8.7523e-8 kg
- Nickel [emission, water]: 5.6977e-10 kg
- Particulate matter, ≤ 2.5μm [emission, air]: 1.151e-7 kg
- Carbon monoxide [emission, air]: 1.3332e-7 kg
- Volatile organic compounds [emission, air]: 2.6406e-7 kg
- Carbon tetrachloride [emission, air]: 1.8708e-7 kg
- Hydrochloric acid [emission, air]: 3.1499e-7 kg
- Nitrogen oxides [emission, air]: 3.7239e-6 kg
- Benzene [emission, air]: 2.1798e-8 kg
- Suspended solids, inorganic [emission, water]: 7.8472e-5 kg
- Methane [emission, air]: 1.0495e-9 kg
- Lead [emission, air]: 1.0899e-11 kg
- Particulate matter, > 2.5μm and ≤ 10μm [emission, air]: 2.0549e-5 kg
- Mercury [emission, air]: 6.5404e-8 kg
- Biological Oxygen Demand [emission, water]: 0.0002643 kg

## Allocation factors
- causal, Chlorine, production mix, at plant, for Particulate matter, ≤ 2.5μm: 1
- causal, Sodium hydroxide, production mix, at plant, for Suspended solids, inorganic: 0
- causal, Sodium hydroxide, production mix, at plant, for Hydrochloric acid: 0
- causal, Sodium hydroxide, production mix, at plant, for Lead: 0
- causal, Chlorine, production mix, at plant, for Natural gas, combusted in industrial boiler: 1
- causal, Sodium hydroxide, production mix, at plant, for Copper: 0
- causal, Chlorine, production mix, at plant, for Methane: 1
- causal, Chlorine, production mix, at plant, for HFC-134a: 1
- causal, Chlorine, production mix, at plant, for HCFC-123: 1
- causal, Sodium hydroxide, production mix, at plant, for Transport, train, diesel powered: 0
- causal, Chlorine, production mix, at plant, for Benzene: 1
- causal, Chlorine, production mix, at plant, for Mercury: 1
- causal, Chlorine, production mix, at plant, for Disposal, solid waste, unspecified, to sanitary landfill: 1
- causal, Sodium hydroxide, production mix, at plant, for Particulate matter: 0
- causal, Chlorine, production mix, at plant, for Sulfur oxides: 1
- causal, Sodium hydroxide, production mix, at plant, for Disposal, solid waste, unspecified, to sanitary landfill: 0
- causal, Chlorine, production mix, at plant, for Residual fuel oil, combusted in industrial boiler: 1
- economic, Chlorine, production mix, at plant: 1
- causal, Chlorine, production mix, at plant, for Transport, pipeline, unspecified petroleum products: 1
- causal, Sodium hydroxide, production mix, at plant, for Carbon tetrachloride: 0
- causal, Sodium hydroxide, production mix, at plant, for Residual fuel oil, combusted in industrial boiler: 0
- causal, Chlorine, production mix, at plant, for Total dissolved solids: 1
- causal, Sodium hydroxide, production mix, at plant, for Nitrogen oxides: 0
- causal, Sodium hydroxide, production mix, at plant, for Disposal, solid waste, unspecified, to municipal incineration: 0
- causal, Chlorine, production mix, at plant, for Disposal, solid waste, unspecified, to municipal incineration: 1
- causal, Chlorine, production mix, at plant, for Nickel: 1
- causal, Chlorine, production mix, at plant, for Transport, barge, average fuel mix: 1
- causal, Chlorine, production mix, at plant, for Sodium chloride, at plant: 1
- causal, Sodium hydroxide, production mix, at plant, for Chlorine: 0
- causal, Sodium hydroxide, production mix, at plant, for Mercury: 0
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
## Sampling procedure
Data are from primary sources. The chlorine/caustic data collected for this module represent 1 producer and 3 plants in the U.S. The chlorine/caustic producer who provided data for this module verified that the characteristics of their plant are representative of the diaphragm/membrane cell technology for North American chlorine/caustic production.

## Sources
- THE PLASTICS DIVISION OF THE ACC
