# Deposit containers, at collection, CRV

Dataset: openLCA process, unit process
Category: 56: Administrative and Support and Waste Management and Remediation Services/5621: Waste Collection
Geography: Northern America
Time period: 2006-12-31 to 2007-12-31
Allocation method: no allocation
Generated by: Franklin Associates
restrictionsDescription: All information can be accessed by everybody.
copyright: false

## General comment
Important note: although most of the data in the US LCI database has
undergone some sort of review, the database as a whole has not yet
undergone a formal validation process.
Please email comments to lci@nrel.gov.

## Technology
Typical

## Geography
United States

## Reference product
- Deposit containers, at collection, CRV [RNA]: 1 kg
  Applies to one kg of any type of deposit container collected via the CRV system

## Inputs from technosphere
- Transport, combination truck, diesel powered [RNA]: 1.16 t*km
  Fuel use per kg of material collected via California refund value (CRV) system
- Mixed deposit containers, at source: 1 kg
  Includes weight of co-collected wastes later removed at reclaimer.
- Electricity, at grid [RNA]: 0.0132 kWh; provider Electricity, at Grid, US, 2010
  For baling at intermediate processing center prior to shipment to reclaimer

## Sources
- THE PLASTICS DIVISION OF THE AMERICAN CH
