# Metallurgical coke, at plant

Dataset: openLCA process, unit process
Category: 31-33: Manufacturing/3311: Iron and Steel Mills and Ferroalloy Manufacturing
Geography: Northern America
Time period: 2002-12-31 to 2002-12-31
Allocation method: no allocation
Generated by: James Littlefield, Franklin Associates
Published in: Franklin Associates, A Division of ERG
restrictionsDescription: All information can be accessed by everybody.
copyright: false

## General comment
The primary method for manufacturing coke is the byproduct method, which accounts for more than 98 percent of U.S. coke production. In the byproduct method, air is excluded from the coking chambers, and the necessary heat for distillation is supplied from external combustion of some of the gas recovered from the coking process. Coproduct credit is given on a weight basis to all of the byproducts from the oven, except water.
Important note: although most of the data in the US LCI database has
undergone some sort of review, the database as a whole has not yet
undergone a formal validation process.
Please email comments to lci@nrel.gov.

## Technology
Byproduct method

## Geography
North America

## Reference product
- Metallurgical coke, at plant [RNA]: 1 kg

## Inputs from technosphere
- Electricity, at grid [RNA]: 0.0388 kWh; provider Electricity, at Grid, US, 2010
- Disposal, solid waste, unspecified, to unspecified treatment: 0.004 kg
- Bituminous coal, at mine [RNA]: 1.1 kg

## Emissions to nature
- Ammonia [emission, air]: 8e-5 kg
- Ammonia [emission, water]: 3.2e-6 kg
- Carbon monoxide [emission, air]: 0.00073 kg
- Suspended solids, inorganic [emission, water]: 6e-7 kg
- Carbon dioxide [emission, air]: 0.13 kg
- Cyanide [emission, water]: 3.4e-6 kg
- Nitrogen oxides [emission, air]: 0.00077 kg
- Sulfur oxides [emission, air]: 0.004 kg
- Volatile organic compounds [emission, air]: 0.00317 kg
- Particulate matter [emission, air]: 0.00142 kg
- Phenol [emission, water]: 1.5e-6 kg
- Total dissolved solids [emission, water]: 8.9e-5 kg

## Sources
- US Geological Survey
- Franklin Associates, A Division of ERG
- The Aluminum Association
- Energy Information Administration (EIA)
- IAI Statistical Report: Electrical Power
- US EPA
